// SBML level 2 version 4

model toy_model1_allosteric2()

  // Compartments:
  compartment unnamed = 1;

  // Species:
  species $m_m3 in unnamed = 1;
  species m_m6 in unnamed = 1;
  species m_m5 in unnamed = 1;
  species $m_m14 in unnamed = 1;
  species m_m7 in unnamed = 1;
  species $m_m1 in unnamed = 1;
  species m_m8 in unnamed = 1;
  species $m_m12 in unnamed = 1;
  species $m_m2 in unnamed = 1;
  species m_m9 in unnamed = 1;
  species $m_m13 in unnamed = 1;
  species m_m10 in unnamed = 1;
  species m_m11 in unnamed = 1;
  species $m_m4 in unnamed = 1;
  species $m_m16 in unnamed = 1;
  species $m_m20 in unnamed = 1;
  species $m_m15 in unnamed = 1;
  species $m_m17 in unnamed = 1;
  species $m_m19 in unnamed = 1;
  species $m_m18 in unnamed = 1;

  // Parameters:
  m_m1_ref = 0.01935526;
  m_m2_ref = 6.364611e-8;
  m_m3_ref = 3.717012e-7;
  m_m4_ref = 1.570901e-8;
  m_m5_ref = 0.005629735;
  m_m6_ref = 1.618774;
  m_m7_ref = 2.218498;
  m_m8_ref = 1.028684;
  m_m9_ref = 19.6614;
  m_m10_ref = 2.853528;
  m_m11_ref = 0.006141874;
  m_m12_ref = 1.512457;
  m_m13_ref = 7.099428e-7;
  m_m14_ref = 5.328019e-8;
  m_m15_ref = 0.01640424;
  m_m16_ref = 6.629742e-6;
  m_m17_ref = 9.317303e-6;
  m_m18_ref = 0.006726697;
  m_m19_ref = 3.546114;
  m_m20_ref = 0.5951634;
  k01_r_r1 = 92.5897;
  k02_r_r1 = 12.17788;
  k03_r_r1 = 25.01477;
  k04_r_r1 = 10.21585;
  k05_r_r1 = 40.60715;
  k06_r_r1 = 0.2347665;
  k07_r_r1 = 20.98625;
  k08_r_r1 = 0.568597;
  k09_r_r1 = 101.3074;
  k10_r_r1 = 117.7823;
  k11_r_r1 = 277.8554;
  k12_r_r1 = 0.0001153719;
  k01_r_r2 = 3011.53;
  k02_r_r2 = 516.8469;
  k03_r_r2 = 78.05277;
  k04_r_r2 = 437.6296;
  k05_r_r2 = 481.334;
  k06_r_r2 = 375.1481;
  k07_r_r2 = 0.04725191;
  k08_r_r2 = 0.05629109;
  k09_r_r2 = 0.002810511;
  k10_r_r2 = 0.1098444;
  k11_r_r2 = 0.009477114;
  k12_r_r2 = 0.2761269;
  L_0_r_r2 = 6.328395;
  n_sub_r_r2 = 2;
  Keff_m_m6_r_r2 = 0.9219639;
  k01_r_r3 = 3320886;
  k02_r_r3 = 58893.34;
  k03_r_r3 = 595253.3;
  k04_r_r3 = 2616067;
  k05_r_r3 = 360945.9;
  k06_r_r3 = 65579.99;
  k07_r_r3 = 57236.55;
  k08_r_r3 = 1690785;
  k09_r_r3 = 3.436491e7;
  k10_r_r3 = 7.979438e7;
  k11_r_r3 = 0.3452174;
  k12_r_r3 = 0.06098758;
  k13_r_r3 = 0.05086823;
  k14_r_r3 = 0.02895489;
  k15_r_r3 = 0.003443154;
  k16_r_r3 = 0.05961754;
  k17_r_r3 = 0.0001416397;
  k18_r_r3 = 0.01757422;
  k19_r_r3 = 0.00252486;
  k20_r_r3 = 0.7204746;
  L_0_r_r3 = 5179.019;
  n_sub_r_r3 = 1;
  Keff_m_m5_r_r3 = 6.72675;
  Keff_m_m9_r_r3 = 10.4397;
  k01_r_r4 = 1896.032;
  k02_r_r4 = 1221.37;
  k03_r_r4 = 39.03011;
  k04_r_r4 = 2403.721;
  k05_r_r4 = 5477.709;
  k06_r_r4 = 69.448;
  k07_r_r4 = 375.1095;
  k08_r_r4 = 262.5518;
  k09_r_r4 = 65.39503;
  k10_r_r4 = 78.37172;
  L_0_r_r4 = 25.05281;
  n_sub_r_r4 = 2;
  Keff_m_m5_r_r4 = 18.05858;
  Keff_m_m8_r_r4 = 0.3505022;
  k01_r_r5 = 3011.53;
  k02_r_r5 = 516.8469;
  k03_r_r5 = 78.05277;
  k04_r_r5 = 437.6296;
  k05_r_r5 = 481.334;
  k06_r_r5 = 375.1481;
  k07_r_r5 = 0.04725191;
  k08_r_r5 = 0.05629109;
  k09_r_r5 = 0.002810511;
  k10_r_r5 = 0.1098444;
  k11_r_r5 = 0.009477114;
  k12_r_r5 = 0.2761269;
  L_0_r_r5 = 1763.293;
  n_sub_r_r5 = 2;
  Keff_m_m5_r_r5 = 4.631276;
  Keff_m_m7_r_r5 = 12.15653;
  k01_r_r6 = 3320886;
  k02_r_r6 = 58893.34;
  k03_r_r6 = 595253.3;
  k04_r_r6 = 2616067;
  k05_r_r6 = 360945.9;
  k06_r_r6 = 65579.99;
  k07_r_r6 = 57236.55;
  k08_r_r6 = 1690785;
  k09_r_r6 = 3.436491e7;
  k10_r_r6 = 7.979438e7;
  k11_r_r6 = 0.3452174;
  k12_r_r6 = 0.06098758;
  k13_r_r6 = 0.05086823;
  k14_r_r6 = 0.02895489;
  k15_r_r6 = 0.003443154;
  k16_r_r6 = 0.05961754;
  k17_r_r6 = 0.0001416397;
  k18_r_r6 = 0.01757422;
  k19_r_r6 = 0.00252486;
  k20_r_r6 = 0.7204746;
  L_0_r_r6 = 2.36699;
  n_sub_r_r6 = 1;
  Keff_m_m9_r_r6 = 2.671262;
  k01_r_r7 = 0.001666778;
  k02_r_r7 = 14.83157;
  k01_r_r8 = 2.113677;
  k02_r_r8 = 24.12861;
  k01_r_r9 = 0.2923169;
  k02_r_r9 = 0.006947812;
  k01_r_r10 = 0.07468727;
  k02_r_r10 = 0.0168675;
  k01_r_r11 = -0.004394084;
  k01_r_r12 = 7.96209;
  k02_r_r12 = 1.113434;

  // Rate rules:
  m_m5' = (-(n_sub_r_r2*(k01_r_r2*k03_r_r2*k05_r_r2*m_m5 - k02_r_r2*k04_r_r2*k06_r_r2*m_m7)*(k08_r_r2*k10_r_r2 + k08_r_r2*k11_r_r2 + k09_r_r2*k11_r_r2)/((L_0_r_r2*(Keff_m_m6_r_r2/(Keff_m_m6_r_r2 + m_m6))^n_sub_r_r2*((k02_r_r2*k04_r_r2 + k02_r_r2*k05_r_r2 + k03_r_r2*k05_r_r2)*(k08_r_r2*k10_r_r2 + k08_r_r2*k11_r_r2 + k09_r_r2*k11_r_r2)/(k02_r_r2*k04_r_r2*k08_r_r2*k10_r_r2 + k02_r_r2*k04_r_r2*k08_r_r2*k11_r_r2 + k02_r_r2*k05_r_r2*k08_r_r2*k10_r_r2 + k02_r_r2*k04_r_r2*k09_r_r2*k11_r_r2 + k02_r_r2*k05_r_r2*k08_r_r2*k11_r_r2 + k03_r_r2*k05_r_r2*k08_r_r2*k10_r_r2 + k02_r_r2*k05_r_r2*k09_r_r2*k11_r_r2 + k03_r_r2*k05_r_r2*k08_r_r2*k11_r_r2 + k03_r_r2*k05_r_r2*k09_r_r2*k11_r_r2 + k01_r_r2*k03_r_r2*k08_r_r2*k10_r_r2*m_m5 + k01_r_r2*k03_r_r2*k08_r_r2*k11_r_r2*m_m5 + k01_r_r2*k04_r_r2*k08_r_r2*k10_r_r2*m_m5 + k02_r_r2*k04_r_r2*k07_r_r2*k09_r_r2*m_m6 + k01_r_r2*k03_r_r2*k09_r_r2*k11_r_r2*m_m5 + k01_r_r2*k04_r_r2*k08_r_r2*k11_r_r2*m_m5 + k01_r_r2*k05_r_r2*k08_r_r2*k10_r_r2*m_m5 + k02_r_r2*k04_r_r2*k07_r_r2*k10_r_r2*m_m6 + k02_r_r2*k05_r_r2*k07_r_r2*k09_r_r2*m_m6 + k01_r_r2*k04_r_r2*k09_r_r2*k11_r_r2*m_m5 + k01_r_r2*k05_r_r2*k08_r_r2*k11_r_r2*m_m5 + k02_r_r2*k04_r_r2*k07_r_r2*k11_r_r2*m_m6 + k02_r_r2*k05_r_r2*k07_r_r2*k10_r_r2*m_m6 + k03_r_r2*k05_r_r2*k07_r_r2*k09_r_r2*m_m6 + k01_r_r2*k05_r_r2*k09_r_r2*k11_r_r2*m_m5 + k02_r_r2*k05_r_r2*k07_r_r2*k11_r_r2*m_m6 + k03_r_r2*k05_r_r2*k07_r_r2*k10_r_r2*m_m6 + k03_r_r2*k05_r_r2*k07_r_r2*k11_r_r2*m_m6 + k02_r_r2*k06_r_r2*k08_r_r2*k10_r_r2*m_m7 + k02_r_r2*k06_r_r2*k08_r_r2*k11_r_r2*m_m7 + k03_r_r2*k06_r_r2*k08_r_r2*k10_r_r2*m_m7 + k02_r_r2*k06_r_r2*k09_r_r2*k11_r_r2*m_m7 + k03_r_r2*k06_r_r2*k08_r_r2*k11_r_r2*m_m7 + k04_r_r2*k06_r_r2*k08_r_r2*k10_r_r2*m_m7 + k02_r_r2*k04_r_r2*k08_r_r2*k12_r_r2*m_m10 + k03_r_r2*k06_r_r2*k09_r_r2*k11_r_r2*m_m7 + k04_r_r2*k06_r_r2*k08_r_r2*k11_r_r2*m_m7 + k02_r_r2*k04_r_r2*k09_r_r2*k12_r_r2*m_m10 + k02_r_r2*k05_r_r2*k08_r_r2*k12_r_r2*m_m10 + k04_r_r2*k06_r_r2*k09_r_r2*k11_r_r2*m_m7 + k02_r_r2*k04_r_r2*k10_r_r2*k12_r_r2*m_m10 + k02_r_r2*k05_r_r2*k09_r_r2*k12_r_r2*m_m10 + k03_r_r2*k05_r_r2*k08_r_r2*k12_r_r2*m_m10 + k02_r_r2*k05_r_r2*k10_r_r2*k12_r_r2*m_m10 + k03_r_r2*k05_r_r2*k09_r_r2*k12_r_r2*m_m10 + k03_r_r2*k05_r_r2*k10_r_r2*k12_r_r2*m_m10))^n_sub_r_r2 + 1)*(k02_r_r2*k04_r_r2*k08_r_r2*k10_r_r2 + k02_r_r2*k04_r_r2*k08_r_r2*k11_r_r2 + k02_r_r2*k05_r_r2*k08_r_r2*k10_r_r2 + k02_r_r2*k04_r_r2*k09_r_r2*k11_r_r2 + k02_r_r2*k05_r_r2*k08_r_r2*k11_r_r2 + k03_r_r2*k05_r_r2*k08_r_r2*k10_r_r2 + k02_r_r2*k05_r_r2*k09_r_r2*k11_r_r2 + k03_r_r2*k05_r_r2*k08_r_r2*k11_r_r2 + k03_r_r2*k05_r_r2*k09_r_r2*k11_r_r2 + k01_r_r2*k03_r_r2*k08_r_r2*k10_r_r2*m_m5 + k01_r_r2*k03_r_r2*k08_r_r2*k11_r_r2*m_m5 + k01_r_r2*k04_r_r2*k08_r_r2*k10_r_r2*m_m5 + k02_r_r2*k04_r_r2*k07_r_r2*k09_r_r2*m_m6 + k01_r_r2*k03_r_r2*k09_r_r2*k11_r_r2*m_m5 + k01_r_r2*k04_r_r2*k08_r_r2*k11_r_r2*m_m5 + k01_r_r2*k05_r_r2*k08_r_r2*k10_r_r2*m_m5 + k02_r_r2*k04_r_r2*k07_r_r2*k10_r_r2*m_m6 + k02_r_r2*k05_r_r2*k07_r_r2*k09_r_r2*m_m6 + k01_r_r2*k04_r_r2*k09_r_r2*k11_r_r2*m_m5 + k01_r_r2*k05_r_r2*k08_r_r2*k11_r_r2*m_m5 + k02_r_r2*k04_r_r2*k07_r_r2*k11_r_r2*m_m6 + k02_r_r2*k05_r_r2*k07_r_r2*k10_r_r2*m_m6 + k03_r_r2*k05_r_r2*k07_r_r2*k09_r_r2*m_m6 + k01_r_r2*k05_r_r2*k09_r_r2*k11_r_r2*m_m5 + k02_r_r2*k05_r_r2*k07_r_r2*k11_r_r2*m_m6 + k03_r_r2*k05_r_r2*k07_r_r2*k10_r_r2*m_m6 + k03_r_r2*k05_r_r2*k07_r_r2*k11_r_r2*m_m6 + k02_r_r2*k06_r_r2*k08_r_r2*k10_r_r2*m_m7 + k02_r_r2*k06_r_r2*k08_r_r2*k11_r_r2*m_m7 + k03_r_r2*k06_r_r2*k08_r_r2*k10_r_r2*m_m7 + k02_r_r2*k06_r_r2*k09_r_r2*k11_r_r2*m_m7 + k03_r_r2*k06_r_r2*k08_r_r2*k11_r_r2*m_m7 + k04_r_r2*k06_r_r2*k08_r_r2*k10_r_r2*m_m7 + k02_r_r2*k04_r_r2*k08_r_r2*k12_r_r2*m_m10 + k03_r_r2*k06_r_r2*k09_r_r2*k11_r_r2*m_m7 + k04_r_r2*k06_r_r2*k08_r_r2*k11_r_r2*m_m7 + k02_r_r2*k04_r_r2*k09_r_r2*k12_r_r2*m_m10 + k02_r_r2*k05_r_r2*k08_r_r2*k12_r_r2*m_m10 + k04_r_r2*k06_r_r2*k09_r_r2*k11_r_r2*m_m7 + k02_r_r2*k04_r_r2*k10_r_r2*k12_r_r2*m_m10 + k02_r_r2*k05_r_r2*k09_r_r2*k12_r_r2*m_m10 + k03_r_r2*k05_r_r2*k08_r_r2*k12_r_r2*m_m10 + k02_r_r2*k05_r_r2*k10_r_r2*k12_r_r2*m_m10 + k03_r_r2*k05_r_r2*k09_r_r2*k12_r_r2*m_m10 + k03_r_r2*k05_r_r2*k10_r_r2*k12_r_r2*m_m10))) - (k01_r_r10*m_m5 - k02_r_r10*m_m15) + k04_r_r1*(k01_r_r1*k05_r_r1*k07_r_r1*k09_r_r1*k11_r_r1*m_m3*m_m6 - k02_r_r1*k06_r_r1*k08_r_r1*k10_r_r1*k12_r_r1*m_m5*m_m14)/(k02_r_r1*k04_r_r1*k06_r_r1*k08_r_r1*k11_r_r1 + k02_r_r1*k04_r_r1*k06_r_r1*k09_r_r1*k11_r_r1 + k02_r_r1*k04_r_r1*k07_r_r1*k09_r_r1*k11_r_r1 + k03_r_r1*k05_r_r1*k07_r_r1*k09_r_r1*k11_r_r1*m_m6^2 + k01_r_r1*k04_r_r1*k06_r_r1*k08_r_r1*k11_r_r1*m_m3 + k01_r_r1*k04_r_r1*k06_r_r1*k09_r_r1*k11_r_r1*m_m3 + k01_r_r1*k04_r_r1*k07_r_r1*k09_r_r1*k11_r_r1*m_m3 + k02_r_r1*k04_r_r1*k06_r_r1*k08_r_r1*k10_r_r1*m_m5 + k02_r_r1*k03_r_r1*k06_r_r1*k08_r_r1*k11_r_r1*m_m6 + k02_r_r1*k03_r_r1*k06_r_r1*k09_r_r1*k11_r_r1*m_m6 + k02_r_r1*k03_r_r1*k07_r_r1*k09_r_r1*k11_r_r1*m_m6 + k04_r_r1*k05_r_r1*k07_r_r1*k09_r_r1*k11_r_r1*m_m6 + k02_r_r1*k04_r_r1*k06_r_r1*k08_r_r1*k12_r_r1*m_m14 + k02_r_r1*k04_r_r1*k06_r_r1*k09_r_r1*k12_r_r1*m_m14 + k02_r_r1*k04_r_r1*k07_r_r1*k09_r_r1*k12_r_r1*m_m14 + k01_r_r1*k04_r_r1*k05_r_r1*k07_r_r1*k09_r_r1*m_m3*m_m6 + k01_r_r1*k04_r_r1*k05_r_r1*k07_r_r1*k11_r_r1*m_m3*m_m6 + k01_r_r1*k04_r_r1*k06_r_r1*k08_r_r1*k10_r_r1*m_m3*m_m5 + k01_r_r1*k04_r_r1*k05_r_r1*k08_r_r1*k11_r_r1*m_m3*m_m6 + k01_r_r1*k04_r_r1*k05_r_r1*k09_r_r1*k11_r_r1*m_m3*m_m6 + k02_r_r1*k03_r_r1*k06_r_r1*k08_r_r1*k10_r_r1*m_m5*m_m6 + k02_r_r1*k04_r_r1*k06_r_r1*k10_r_r1*k12_r_r1*m_m5*m_m14 + k02_r_r1*k04_r_r1*k07_r_r1*k10_r_r1*k12_r_r1*m_m5*m_m14 + k02_r_r1*k04_r_r1*k08_r_r1*k10_r_r1*k12_r_r1*m_m5*m_m14 + k04_r_r1*k05_r_r1*k07_r_r1*k09_r_r1*k12_r_r1*m_m6*m_m14 + k04_r_r1*k06_r_r1*k08_r_r1*k10_r_r1*k12_r_r1*m_m5*m_m14 + k01_r_r1*k04_r_r1*k05_r_r1*k07_r_r1*k10_r_r1*m_m3*m_m5*m_m6 + k01_r_r1*k04_r_r1*k05_r_r1*k08_r_r1*k10_r_r1*m_m3*m_m5*m_m6 + k04_r_r1*k05_r_r1*k07_r_r1*k10_r_r1*k12_r_r1*m_m5*m_m6*m_m14 + k04_r_r1*k05_r_r1*k08_r_r1*k10_r_r1*k12_r_r1*m_m5*m_m6*m_m14))*(1/m_m5_ref);
  m_m6' = (-(k04_r_r1*(k01_r_r1*k05_r_r1*k07_r_r1*k09_r_r1*k11_r_r1*m_m3*m_m6 - k02_r_r1*k06_r_r1*k08_r_r1*k10_r_r1*k12_r_r1*m_m5*m_m14)/(k02_r_r1*k04_r_r1*k06_r_r1*k08_r_r1*k11_r_r1 + k02_r_r1*k04_r_r1*k06_r_r1*k09_r_r1*k11_r_r1 + k02_r_r1*k04_r_r1*k07_r_r1*k09_r_r1*k11_r_r1 + k03_r_r1*k05_r_r1*k07_r_r1*k09_r_r1*k11_r_r1*m_m6^2 + k01_r_r1*k04_r_r1*k06_r_r1*k08_r_r1*k11_r_r1*m_m3 + k01_r_r1*k04_r_r1*k06_r_r1*k09_r_r1*k11_r_r1*m_m3 + k01_r_r1*k04_r_r1*k07_r_r1*k09_r_r1*k11_r_r1*m_m3 + k02_r_r1*k04_r_r1*k06_r_r1*k08_r_r1*k10_r_r1*m_m5 + k02_r_r1*k03_r_r1*k06_r_r1*k08_r_r1*k11_r_r1*m_m6 + k02_r_r1*k03_r_r1*k06_r_r1*k09_r_r1*k11_r_r1*m_m6 + k02_r_r1*k03_r_r1*k07_r_r1*k09_r_r1*k11_r_r1*m_m6 + k04_r_r1*k05_r_r1*k07_r_r1*k09_r_r1*k11_r_r1*m_m6 + k02_r_r1*k04_r_r1*k06_r_r1*k08_r_r1*k12_r_r1*m_m14 + k02_r_r1*k04_r_r1*k06_r_r1*k09_r_r1*k12_r_r1*m_m14 + k02_r_r1*k04_r_r1*k07_r_r1*k09_r_r1*k12_r_r1*m_m14 + k01_r_r1*k04_r_r1*k05_r_r1*k07_r_r1*k09_r_r1*m_m3*m_m6 + k01_r_r1*k04_r_r1*k05_r_r1*k07_r_r1*k11_r_r1*m_m3*m_m6 + k01_r_r1*k04_r_r1*k06_r_r1*k08_r_r1*k10_r_r1*m_m3*m_m5 + k01_r_r1*k04_r_r1*k05_r_r1*k08_r_r1*k11_r_r1*m_m3*m_m6 + k01_r_r1*k04_r_r1*k05_r_r1*k09_r_r1*k11_r_r1*m_m3*m_m6 + k02_r_r1*k03_r_r1*k06_r_r1*k08_r_r1*k10_r_r1*m_m5*m_m6 + k02_r_r1*k04_r_r1*k06_r_r1*k10_r_r1*k12_r_r1*m_m5*m_m14 + k02_r_r1*k04_r_r1*k07_r_r1*k10_r_r1*k12_r_r1*m_m5*m_m14 + k02_r_r1*k04_r_r1*k08_r_r1*k10_r_r1*k12_r_r1*m_m5*m_m14 + k04_r_r1*k05_r_r1*k07_r_r1*k09_r_r1*k12_r_r1*m_m6*m_m14 + k04_r_r1*k06_r_r1*k08_r_r1*k10_r_r1*k12_r_r1*m_m5*m_m14 + k01_r_r1*k04_r_r1*k05_r_r1*k07_r_r1*k10_r_r1*m_m3*m_m5*m_m6 + k01_r_r1*k04_r_r1*k05_r_r1*k08_r_r1*k10_r_r1*m_m3*m_m5*m_m6 + k04_r_r1*k05_r_r1*k07_r_r1*k10_r_r1*k12_r_r1*m_m5*m_m6*m_m14 + k04_r_r1*k05_r_r1*k08_r_r1*k10_r_r1*k12_r_r1*m_m5*m_m6*m_m14)) - n_sub_r_r5*(k07_r_r5*k09_r_r5*k11_r_r5*m_m6 - k08_r_r5*k10_r_r5*k12_r_r5*m_m10)*(k02_r_r5*k04_r_r5 + k02_r_r5*k05_r_r5 + k03_r_r5*k05_r_r5)/((L_0_r_r5*(m_m5/Keff_m_m5_r_r5 + m_m7/Keff_m_m7_r_r5 + 1)^n_sub_r_r5*((k02_r_r5*k04_r_r5 + k02_r_r5*k05_r_r5 + k03_r_r5*k05_r_r5)*(k08_r_r5*k10_r_r5 + k08_r_r5*k11_r_r5 + k09_r_r5*k11_r_r5)/(k02_r_r5*k04_r_r5*k08_r_r5*k10_r_r5 + k02_r_r5*k04_r_r5*k08_r_r5*k11_r_r5 + k02_r_r5*k05_r_r5*k08_r_r5*k10_r_r5 + k02_r_r5*k04_r_r5*k09_r_r5*k11_r_r5 + k02_r_r5*k05_r_r5*k08_r_r5*k11_r_r5 + k03_r_r5*k05_r_r5*k08_r_r5*k10_r_r5 + k02_r_r5*k05_r_r5*k09_r_r5*k11_r_r5 + k03_r_r5*k05_r_r5*k08_r_r5*k11_r_r5 + k03_r_r5*k05_r_r5*k09_r_r5*k11_r_r5 + k01_r_r5*k03_r_r5*k08_r_r5*k10_r_r5*m_m5 + k01_r_r5*k03_r_r5*k08_r_r5*k11_r_r5*m_m5 + k01_r_r5*k04_r_r5*k08_r_r5*k10_r_r5*m_m5 + k02_r_r5*k04_r_r5*k07_r_r5*k09_r_r5*m_m6 + k01_r_r5*k03_r_r5*k09_r_r5*k11_r_r5*m_m5 + k01_r_r5*k04_r_r5*k08_r_r5*k11_r_r5*m_m5 + k01_r_r5*k05_r_r5*k08_r_r5*k10_r_r5*m_m5 + k02_r_r5*k04_r_r5*k07_r_r5*k10_r_r5*m_m6 + k02_r_r5*k05_r_r5*k07_r_r5*k09_r_r5*m_m6 + k01_r_r5*k04_r_r5*k09_r_r5*k11_r_r5*m_m5 + k01_r_r5*k05_r_r5*k08_r_r5*k11_r_r5*m_m5 + k02_r_r5*k04_r_r5*k07_r_r5*k11_r_r5*m_m6 + k02_r_r5*k05_r_r5*k07_r_r5*k10_r_r5*m_m6 + k03_r_r5*k05_r_r5*k07_r_r5*k09_r_r5*m_m6 + k01_r_r5*k05_r_r5*k09_r_r5*k11_r_r5*m_m5 + k02_r_r5*k05_r_r5*k07_r_r5*k11_r_r5*m_m6 + k03_r_r5*k05_r_r5*k07_r_r5*k10_r_r5*m_m6 + k03_r_r5*k05_r_r5*k07_r_r5*k11_r_r5*m_m6 + k02_r_r5*k06_r_r5*k08_r_r5*k10_r_r5*m_m7 + k02_r_r5*k06_r_r5*k08_r_r5*k11_r_r5*m_m7 + k03_r_r5*k06_r_r5*k08_r_r5*k10_r_r5*m_m7 + k02_r_r5*k06_r_r5*k09_r_r5*k11_r_r5*m_m7 + k03_r_r5*k06_r_r5*k08_r_r5*k11_r_r5*m_m7 + k04_r_r5*k06_r_r5*k08_r_r5*k10_r_r5*m_m7 + k02_r_r5*k04_r_r5*k08_r_r5*k12_r_r5*m_m10 + k03_r_r5*k06_r_r5*k09_r_r5*k11_r_r5*m_m7 + k04_r_r5*k06_r_r5*k08_r_r5*k11_r_r5*m_m7 + k02_r_r5*k04_r_r5*k09_r_r5*k12_r_r5*m_m10 + k02_r_r5*k05_r_r5*k08_r_r5*k12_r_r5*m_m10 + k04_r_r5*k06_r_r5*k09_r_r5*k11_r_r5*m_m7 + k02_r_r5*k04_r_r5*k10_r_r5*k12_r_r5*m_m10 + k02_r_r5*k05_r_r5*k09_r_r5*k12_r_r5*m_m10 + k03_r_r5*k05_r_r5*k08_r_r5*k12_r_r5*m_m10 + k02_r_r5*k05_r_r5*k10_r_r5*k12_r_r5*m_m10 + k03_r_r5*k05_r_r5*k09_r_r5*k12_r_r5*m_m10 + k03_r_r5*k05_r_r5*k10_r_r5*k12_r_r5*m_m10))^n_sub_r_r5 + 1)*(k02_r_r5*k04_r_r5*k08_r_r5*k10_r_r5 + k02_r_r5*k04_r_r5*k08_r_r5*k11_r_r5 + k02_r_r5*k05_r_r5*k08_r_r5*k10_r_r5 + k02_r_r5*k04_r_r5*k09_r_r5*k11_r_r5 + k02_r_r5*k05_r_r5*k08_r_r5*k11_r_r5 + k03_r_r5*k05_r_r5*k08_r_r5*k10_r_r5 + k02_r_r5*k05_r_r5*k09_r_r5*k11_r_r5 + k03_r_r5*k05_r_r5*k08_r_r5*k11_r_r5 + k03_r_r5*k05_r_r5*k09_r_r5*k11_r_r5 + k01_r_r5*k03_r_r5*k08_r_r5*k10_r_r5*m_m5 + k01_r_r5*k03_r_r5*k08_r_r5*k11_r_r5*m_m5 + k01_r_r5*k04_r_r5*k08_r_r5*k10_r_r5*m_m5 + k02_r_r5*k04_r_r5*k07_r_r5*k09_r_r5*m_m6 + k01_r_r5*k03_r_r5*k09_r_r5*k11_r_r5*m_m5 + k01_r_r5*k04_r_r5*k08_r_r5*k11_r_r5*m_m5 + k01_r_r5*k05_r_r5*k08_r_r5*k10_r_r5*m_m5 + k02_r_r5*k04_r_r5*k07_r_r5*k10_r_r5*m_m6 + k02_r_r5*k05_r_r5*k07_r_r5*k09_r_r5*m_m6 + k01_r_r5*k04_r_r5*k09_r_r5*k11_r_r5*m_m5 + k01_r_r5*k05_r_r5*k08_r_r5*k11_r_r5*m_m5 + k02_r_r5*k04_r_r5*k07_r_r5*k11_r_r5*m_m6 + k02_r_r5*k05_r_r5*k07_r_r5*k10_r_r5*m_m6 + k03_r_r5*k05_r_r5*k07_r_r5*k09_r_r5*m_m6 + k01_r_r5*k05_r_r5*k09_r_r5*k11_r_r5*m_m5 + k02_r_r5*k05_r_r5*k07_r_r5*k11_r_r5*m_m6 + k03_r_r5*k05_r_r5*k07_r_r5*k10_r_r5*m_m6 + k03_r_r5*k05_r_r5*k07_r_r5*k11_r_r5*m_m6 + k02_r_r5*k06_r_r5*k08_r_r5*k10_r_r5*m_m7 + k02_r_r5*k06_r_r5*k08_r_r5*k11_r_r5*m_m7 + k03_r_r5*k06_r_r5*k08_r_r5*k10_r_r5*m_m7 + k02_r_r5*k06_r_r5*k09_r_r5*k11_r_r5*m_m7 + k03_r_r5*k06_r_r5*k08_r_r5*k11_r_r5*m_m7 + k04_r_r5*k06_r_r5*k08_r_r5*k10_r_r5*m_m7 + k02_r_r5*k04_r_r5*k08_r_r5*k12_r_r5*m_m10 + k03_r_r5*k06_r_r5*k09_r_r5*k11_r_r5*m_m7 + k04_r_r5*k06_r_r5*k08_r_r5*k11_r_r5*m_m7 + k02_r_r5*k04_r_r5*k09_r_r5*k12_r_r5*m_m10 + k02_r_r5*k05_r_r5*k08_r_r5*k12_r_r5*m_m10 + k04_r_r5*k06_r_r5*k09_r_r5*k11_r_r5*m_m7 + k02_r_r5*k04_r_r5*k10_r_r5*k12_r_r5*m_m10 + k02_r_r5*k05_r_r5*k09_r_r5*k12_r_r5*m_m10 + k03_r_r5*k05_r_r5*k08_r_r5*k12_r_r5*m_m10 + k02_r_r5*k05_r_r5*k10_r_r5*k12_r_r5*m_m10 + k03_r_r5*k05_r_r5*k09_r_r5*k12_r_r5*m_m10 + k03_r_r5*k05_r_r5*k10_r_r5*k12_r_r5*m_m10)) - (k01_r_r8*m_m6 - k02_r_r8*m_m16) + (k01_r_r7*m_m4 - k02_r_r7*m_m6))*(1/m_m6_ref);
  m_m7' = (-(n_sub_r_r3*(k01_r_r3*k03_r_r3*k05_r_r3*k07_r_r3*k09_r_r3*m_m1*m_m7 - k02_r_r3*k04_r_r3*k06_r_r3*k08_r_r3*k10_r_r3*m_m8*m_m12)*(k12_r_r3*k14_r_r3*k16_r_r3*k19_r_r3 + k12_r_r3*k14_r_r3*k17_r_r3*k19_r_r3 + k12_r_r3*k15_r_r3*k17_r_r3*k19_r_r3 + k12_r_r3*k14_r_r3*k16_r_r3*k18_r_r3*m_m11 + k13_r_r3*k15_r_r3*k17_r_r3*k19_r_r3*m_m10)/((L_0_r_r3*(Keff_m_m5_r_r3/(Keff_m_m5_r_r3 + m_m5))^n_sub_r_r3*((Keff_m_m9_r_r3 + m_m9)/Keff_m_m9_r_r3)^n_sub_r_r3*((k02_r_r3*k04_r_r3*k06_r_r3*k09_r_r3 + k02_r_r3*k04_r_r3*k07_r_r3*k09_r_r3 + k02_r_r3*k05_r_r3*k07_r_r3*k09_r_r3 + k02_r_r3*k04_r_r3*k06_r_r3*k08_r_r3*m_m8 + k03_r_r3*k05_r_r3*k07_r_r3*k09_r_r3*m_m7)*(k12_r_r3*k14_r_r3*k16_r_r3*k19_r_r3 + k12_r_r3*k14_r_r3*k17_r_r3*k19_r_r3 + k12_r_r3*k15_r_r3*k17_r_r3*k19_r_r3 + k12_r_r3*k14_r_r3*k16_r_r3*k18_r_r3*m_m11 + k13_r_r3*k15_r_r3*k17_r_r3*k19_r_r3*m_m10)/(k02_r_r3*k04_r_r3*k06_r_r3*k09_r_r3*k12_r_r3*k14_r_r3*k16_r_r3*k19_r_r3 + k02_r_r3*k04_r_r3*k06_r_r3*k09_r_r3*k12_r_r3*k14_r_r3*k17_r_r3*k19_r_r3 + k02_r_r3*k04_r_r3*k07_r_r3*k09_r_r3*k12_r_r3*k14_r_r3*k16_r_r3*k19_r_r3 + k02_r_r3*k04_r_r3*k06_r_r3*k09_r_r3*k12_r_r3*k15_r_r3*k17_r_r3*k19_r_r3 + k02_r_r3*k04_r_r3*k07_r_r3*k09_r_r3*k12_r_r3*k14_r_r3*k17_r_r3*k19_r_r3 + k02_r_r3*k05_r_r3*k07_r_r3*k09_r_r3*k12_r_r3*k14_r_r3*k16_r_r3*k19_r_r3 + k02_r_r3*k04_r_r3*k07_r_r3*k09_r_r3*k12_r_r3*k15_r_r3*k17_r_r3*k19_r_r3 + k02_r_r3*k05_r_r3*k07_r_r3*k09_r_r3*k12_r_r3*k14_r_r3*k17_r_r3*k19_r_r3 + k02_r_r3*k05_r_r3*k07_r_r3*k09_r_r3*k12_r_r3*k15_r_r3*k17_r_r3*k19_r_r3 + k01_r_r3*k04_r_r3*k06_r_r3*k09_r_r3*k12_r_r3*k14_r_r3*k16_r_r3*k19_r_r3*m_m1 + k02_r_r3*k04_r_r3*k06_r_r3*k09_r_r3*k11_r_r3*k14_r_r3*k16_r_r3*k19_r_r3*m_m1 + k01_r_r3*k04_r_r3*k06_r_r3*k09_r_r3*k12_r_r3*k14_r_r3*k17_r_r3*k19_r_r3*m_m1 + k01_r_r3*k04_r_r3*k07_r_r3*k09_r_r3*k12_r_r3*k14_r_r3*k16_r_r3*k19_r_r3*m_m1 + k02_r_r3*k04_r_r3*k06_r_r3*k09_r_r3*k11_r_r3*k14_r_r3*k17_r_r3*k19_r_r3*m_m1 + k02_r_r3*k04_r_r3*k07_r_r3*k09_r_r3*k11_r_r3*k14_r_r3*k16_r_r3*k19_r_r3*m_m1 + k01_r_r3*k04_r_r3*k06_r_r3*k09_r_r3*k12_r_r3*k15_r_r3*k17_r_r3*k19_r_r3*m_m1 + k01_r_r3*k04_r_r3*k07_r_r3*k09_r_r3*k12_r_r3*k14_r_r3*k17_r_r3*k19_r_r3*m_m1 + k01_r_r3*k05_r_r3*k07_r_r3*k09_r_r3*k12_r_r3*k14_r_r3*k16_r_r3*k19_r_r3*m_m1 + k02_r_r3*k04_r_r3*k06_r_r3*k09_r_r3*k11_r_r3*k15_r_r3*k17_r_r3*k19_r_r3*m_m1 + k02_r_r3*k04_r_r3*k07_r_r3*k09_r_r3*k11_r_r3*k14_r_r3*k17_r_r3*k19_r_r3*m_m1 + k02_r_r3*k05_r_r3*k07_r_r3*k09_r_r3*k11_r_r3*k14_r_r3*k16_r_r3*k19_r_r3*m_m1 + k01_r_r3*k04_r_r3*k07_r_r3*k09_r_r3*k12_r_r3*k15_r_r3*k17_r_r3*k19_r_r3*m_m1 + k01_r_r3*k05_r_r3*k07_r_r3*k09_r_r3*k12_r_r3*k14_r_r3*k17_r_r3*k19_r_r3*m_m1 + k02_r_r3*k04_r_r3*k07_r_r3*k09_r_r3*k11_r_r3*k15_r_r3*k17_r_r3*k19_r_r3*m_m1 + k02_r_r3*k05_r_r3*k07_r_r3*k09_r_r3*k11_r_r3*k14_r_r3*k17_r_r3*k19_r_r3*m_m1 + k01_r_r3*k05_r_r3*k07_r_r3*k09_r_r3*k12_r_r3*k15_r_r3*k17_r_r3*k19_r_r3*m_m1 + k02_r_r3*k05_r_r3*k07_r_r3*k09_r_r3*k11_r_r3*k15_r_r3*k17_r_r3*k19_r_r3*m_m1 + k02_r_r3*k04_r_r3*k06_r_r3*k08_r_r3*k12_r_r3*k14_r_r3*k16_r_r3*k19_r_r3*m_m8 + k02_r_r3*k04_r_r3*k06_r_r3*k08_r_r3*k12_r_r3*k14_r_r3*k17_r_r3*k19_r_r3*m_m8 + k02_r_r3*k04_r_r3*k06_r_r3*k08_r_r3*k12_r_r3*k15_r_r3*k17_r_r3*k19_r_r3*m_m8 + k02_r_r3*k04_r_r3*k06_r_r3*k09_r_r3*k12_r_r3*k14_r_r3*k16_r_r3*k18_r_r3*m_m11 + k03_r_r3*k05_r_r3*k07_r_r3*k09_r_r3*k12_r_r3*k14_r_r3*k16_r_r3*k19_r_r3*m_m7 + k02_r_r3*k04_r_r3*k07_r_r3*k09_r_r3*k12_r_r3*k14_r_r3*k16_r_r3*k18_r_r3*m_m11 + k03_r_r3*k05_r_r3*k07_r_r3*k09_r_r3*k12_r_r3*k14_r_r3*k17_r_r3*k19_r_r3*m_m7 + k02_r_r3*k05_r_r3*k07_r_r3*k09_r_r3*k12_r_r3*k14_r_r3*k16_r_r3*k18_r_r3*m_m11 + k03_r_r3*k05_r_r3*k07_r_r3*k09_r_r3*k12_r_r3*k15_r_r3*k17_r_r3*k19_r_r3*m_m7 + k02_r_r3*k04_r_r3*k06_r_r3*k09_r_r3*k12_r_r3*k14_r_r3*k16_r_r3*k20_r_r3*m_m12 + k02_r_r3*k04_r_r3*k06_r_r3*k09_r_r3*k13_r_r3*k15_r_r3*k17_r_r3*k19_r_r3*m_m10 + k02_r_r3*k04_r_r3*k06_r_r3*k10_r_r3*k12_r_r3*k14_r_r3*k16_r_r3*k19_r_r3*m_m12 + k02_r_r3*k04_r_r3*k06_r_r3*k09_r_r3*k12_r_r3*k14_r_r3*k17_r_r3*k20_r_r3*m_m12 + k02_r_r3*k04_r_r3*k06_r_r3*k10_r_r3*k12_r_r3*k14_r_r3*k17_r_r3*k19_r_r3*m_m12 + k02_r_r3*k04_r_r3*k07_r_r3*k09_r_r3*k12_r_r3*k14_r_r3*k16_r_r3*k20_r_r3*m_m12 + k02_r_r3*k04_r_r3*k07_r_r3*k09_r_r3*k13_r_r3*k15_r_r3*k17_r_r3*k19_r_r3*m_m10 + k02_r_r3*k04_r_r3*k07_r_r3*k10_r_r3*k12_r_r3*k14_r_r3*k16_r_r3*k19_r_r3*m_m12 + k02_r_r3*k04_r_r3*k06_r_r3*k09_r_r3*k12_r_r3*k15_r_r3*k17_r_r3*k20_r_r3*m_m12 + k02_r_r3*k04_r_r3*k06_r_r3*k10_r_r3*k12_r_r3*k15_r_r3*k17_r_r3*k19_r_r3*m_m12 + k02_r_r3*k04_r_r3*k07_r_r3*k09_r_r3*k12_r_r3*k14_r_r3*k17_r_r3*k20_r_r3*m_m12 + k02_r_r3*k04_r_r3*k07_r_r3*k10_r_r3*k12_r_r3*k14_r_r3*k17_r_r3*k19_r_r3*m_m12 + k02_r_r3*k05_r_r3*k07_r_r3*k09_r_r3*k12_r_r3*k14_r_r3*k16_r_r3*k20_r_r3*m_m12 + k02_r_r3*k05_r_r3*k07_r_r3*k09_r_r3*k13_r_r3*k15_r_r3*k17_r_r3*k19_r_r3*m_m10 + k02_r_r3*k05_r_r3*k07_r_r3*k10_r_r3*k12_r_r3*k14_r_r3*k16_r_r3*k19_r_r3*m_m12 + k02_r_r3*k04_r_r3*k07_r_r3*k09_r_r3*k12_r_r3*k15_r_r3*k17_r_r3*k20_r_r3*m_m12 + k02_r_r3*k04_r_r3*k07_r_r3*k10_r_r3*k12_r_r3*k15_r_r3*k17_r_r3*k19_r_r3*m_m12 + k02_r_r3*k05_r_r3*k07_r_r3*k09_r_r3*k12_r_r3*k14_r_r3*k17_r_r3*k20_r_r3*m_m12 + k02_r_r3*k05_r_r3*k07_r_r3*k10_r_r3*k12_r_r3*k14_r_r3*k17_r_r3*k19_r_r3*m_m12 + k02_r_r3*k05_r_r3*k07_r_r3*k09_r_r3*k12_r_r3*k15_r_r3*k17_r_r3*k20_r_r3*m_m12 + k02_r_r3*k05_r_r3*k07_r_r3*k10_r_r3*k12_r_r3*k15_r_r3*k17_r_r3*k19_r_r3*m_m12 + k01_r_r3*k03_r_r3*k05_r_r3*k07_r_r3*k12_r_r3*k14_r_r3*k16_r_r3*k19_r_r3*m_m1*m_m7 + k01_r_r3*k03_r_r3*k05_r_r3*k07_r_r3*k12_r_r3*k14_r_r3*k17_r_r3*k19_r_r3*m_m1*m_m7 + k01_r_r3*k03_r_r3*k05_r_r3*k07_r_r3*k12_r_r3*k15_r_r3*k17_r_r3*k19_r_r3*m_m1*m_m7 + k01_r_r3*k03_r_r3*k05_r_r3*k09_r_r3*k12_r_r3*k14_r_r3*k16_r_r3*k19_r_r3*m_m1*m_m7 + k01_r_r3*k03_r_r3*k05_r_r3*k09_r_r3*k12_r_r3*k14_r_r3*k17_r_r3*k19_r_r3*m_m1*m_m7 + k01_r_r3*k03_r_r3*k06_r_r3*k09_r_r3*k12_r_r3*k14_r_r3*k16_r_r3*k19_r_r3*m_m1*m_m7 + k02_r_r3*k04_r_r3*k06_r_r3*k09_r_r3*k11_r_r3*k13_r_r3*k15_r_r3*k17_r_r3*m_m1*m_m10 + k01_r_r3*k03_r_r3*k05_r_r3*k09_r_r3*k12_r_r3*k15_r_r3*k17_r_r3*k19_r_r3*m_m1*m_m7 + k01_r_r3*k03_r_r3*k06_r_r3*k09_r_r3*k12_r_r3*k14_r_r3*k17_r_r3*k19_r_r3*m_m1*m_m7 + k01_r_r3*k03_r_r3*k07_r_r3*k09_r_r3*k12_r_r3*k14_r_r3*k16_r_r3*k19_r_r3*m_m1*m_m7 + k01_r_r3*k04_r_r3*k06_r_r3*k08_r_r3*k12_r_r3*k14_r_r3*k16_r_r3*k19_r_r3*m_m1*m_m8 + k02_r_r3*k04_r_r3*k06_r_r3*k08_r_r3*k11_r_r3*k14_r_r3*k16_r_r3*k19_r_r3*m_m1*m_m8 + k02_r_r3*k04_r_r3*k07_r_r3*k09_r_r3*k11_r_r3*k13_r_r3*k15_r_r3*k17_r_r3*m_m1*m_m10 + k01_r_r3*k03_r_r3*k06_r_r3*k09_r_r3*k12_r_r3*k15_r_r3*k17_r_r3*k19_r_r3*m_m1*m_m7 + k01_r_r3*k03_r_r3*k07_r_r3*k09_r_r3*k12_r_r3*k14_r_r3*k17_r_r3*k19_r_r3*m_m1*m_m7 + k01_r_r3*k04_r_r3*k06_r_r3*k08_r_r3*k12_r_r3*k14_r_r3*k17_r_r3*k19_r_r3*m_m1*m_m8 + k02_r_r3*k04_r_r3*k06_r_r3*k08_r_r3*k11_r_r3*k14_r_r3*k17_r_r3*k19_r_r3*m_m1*m_m8 + k02_r_r3*k04_r_r3*k06_r_r3*k09_r_r3*k11_r_r3*k13_r_r3*k15_r_r3*k19_r_r3*m_m1*m_m10 + k02_r_r3*k05_r_r3*k07_r_r3*k09_r_r3*k11_r_r3*k13_r_r3*k15_r_r3*k17_r_r3*m_m1*m_m10 + k01_r_r3*k03_r_r3*k07_r_r3*k09_r_r3*k12_r_r3*k15_r_r3*k17_r_r3*k19_r_r3*m_m1*m_m7 + k01_r_r3*k04_r_r3*k06_r_r3*k08_r_r3*k12_r_r3*k15_r_r3*k17_r_r3*k19_r_r3*m_m1*m_m8 + k02_r_r3*k04_r_r3*k06_r_r3*k08_r_r3*k11_r_r3*k15_r_r3*k17_r_r3*k19_r_r3*m_m1*m_m8 + k02_r_r3*k04_r_r3*k06_r_r3*k09_r_r3*k11_r_r3*k13_r_r3*k16_r_r3*k19_r_r3*m_m1*m_m10 + k02_r_r3*k04_r_r3*k07_r_r3*k09_r_r3*k11_r_r3*k13_r_r3*k15_r_r3*k19_r_r3*m_m1*m_m10 + k01_r_r3*k04_r_r3*k06_r_r3*k09_r_r3*k12_r_r3*k14_r_r3*k16_r_r3*k18_r_r3*m_m1*m_m11 + k02_r_r3*k04_r_r3*k06_r_r3*k09_r_r3*k11_r_r3*k13_r_r3*k17_r_r3*k19_r_r3*m_m1*m_m10 + k02_r_r3*k04_r_r3*k06_r_r3*k09_r_r3*k11_r_r3*k14_r_r3*k16_r_r3*k18_r_r3*m_m1*m_m11 + k02_r_r3*k04_r_r3*k07_r_r3*k09_r_r3*k11_r_r3*k13_r_r3*k16_r_r3*k19_r_r3*m_m1*m_m10 + k02_r_r3*k05_r_r3*k07_r_r3*k09_r_r3*k11_r_r3*k13_r_r3*k15_r_r3*k19_r_r3*m_m1*m_m10 + k03_r_r3*k05_r_r3*k07_r_r3*k09_r_r3*k11_r_r3*k14_r_r3*k16_r_r3*k19_r_r3*m_m1*m_m7 + k01_r_r3*k04_r_r3*k07_r_r3*k09_r_r3*k12_r_r3*k14_r_r3*k16_r_r3*k18_r_r3*m_m1*m_m11 + k02_r_r3*k04_r_r3*k07_r_r3*k09_r_r3*k11_r_r3*k13_r_r3*k17_r_r3*k19_r_r3*m_m1*m_m10 + k02_r_r3*k04_r_r3*k07_r_r3*k09_r_r3*k11_r_r3*k14_r_r3*k16_r_r3*k18_r_r3*m_m1*m_m11 + k02_r_r3*k05_r_r3*k07_r_r3*k09_r_r3*k11_r_r3*k13_r_r3*k16_r_r3*k19_r_r3*m_m1*m_m10 + k03_r_r3*k05_r_r3*k07_r_r3*k09_r_r3*k11_r_r3*k14_r_r3*k17_r_r3*k19_r_r3*m_m1*m_m7 + k01_r_r3*k05_r_r3*k07_r_r3*k09_r_r3*k12_r_r3*k14_r_r3*k16_r_r3*k18_r_r3*m_m1*m_m11 + k02_r_r3*k05_r_r3*k07_r_r3*k09_r_r3*k11_r_r3*k13_r_r3*k17_r_r3*k19_r_r3*m_m1*m_m10 + k02_r_r3*k05_r_r3*k07_r_r3*k09_r_r3*k11_r_r3*k14_r_r3*k16_r_r3*k18_r_r3*m_m1*m_m11 + k03_r_r3*k05_r_r3*k07_r_r3*k09_r_r3*k11_r_r3*k15_r_r3*k17_r_r3*k19_r_r3*m_m1*m_m7 + k01_r_r3*k04_r_r3*k06_r_r3*k09_r_r3*k13_r_r3*k15_r_r3*k17_r_r3*k19_r_r3*m_m1*m_m10 + k01_r_r3*k04_r_r3*k07_r_r3*k09_r_r3*k13_r_r3*k15_r_r3*k17_r_r3*k19_r_r3*m_m1*m_m10 + k01_r_r3*k05_r_r3*k07_r_r3*k09_r_r3*k13_r_r3*k15_r_r3*k17_r_r3*k19_r_r3*m_m1*m_m10 + k02_r_r3*k04_r_r3*k06_r_r3*k08_r_r3*k12_r_r3*k14_r_r3*k16_r_r3*k18_r_r3*m_m8*m_m11 + k02_r_r3*k04_r_r3*k06_r_r3*k08_r_r3*k12_r_r3*k14_r_r3*k16_r_r3*k20_r_r3*m_m8*m_m12 + k02_r_r3*k04_r_r3*k06_r_r3*k08_r_r3*k13_r_r3*k15_r_r3*k17_r_r3*k19_r_r3*m_m8*m_m10 + k03_r_r3*k05_r_r3*k07_r_r3*k09_r_r3*k12_r_r3*k14_r_r3*k16_r_r3*k18_r_r3*m_m7*m_m11 + k02_r_r3*k04_r_r3*k06_r_r3*k08_r_r3*k12_r_r3*k14_r_r3*k17_r_r3*k20_r_r3*m_m8*m_m12 + k02_r_r3*k04_r_r3*k06_r_r3*k08_r_r3*k12_r_r3*k15_r_r3*k17_r_r3*k20_r_r3*m_m8*m_m12 + k02_r_r3*k04_r_r3*k06_r_r3*k10_r_r3*k12_r_r3*k14_r_r3*k16_r_r3*k18_r_r3*m_m11*m_m12 + k02_r_r3*k04_r_r3*k08_r_r3*k10_r_r3*k12_r_r3*k14_r_r3*k16_r_r3*k19_r_r3*m_m8*m_m12 + k03_r_r3*k05_r_r3*k07_r_r3*k09_r_r3*k12_r_r3*k14_r_r3*k16_r_r3*k20_r_r3*m_m7*m_m12 + k03_r_r3*k05_r_r3*k07_r_r3*k09_r_r3*k13_r_r3*k15_r_r3*k17_r_r3*k19_r_r3*m_m7*m_m10 + k03_r_r3*k05_r_r3*k07_r_r3*k10_r_r3*k12_r_r3*k14_r_r3*k16_r_r3*k19_r_r3*m_m7*m_m12 + k02_r_r3*k04_r_r3*k07_r_r3*k10_r_r3*k12_r_r3*k14_r_r3*k16_r_r3*k18_r_r3*m_m11*m_m12 + k02_r_r3*k04_r_r3*k08_r_r3*k10_r_r3*k12_r_r3*k14_r_r3*k17_r_r3*k19_r_r3*m_m8*m_m12 + k02_r_r3*k05_r_r3*k08_r_r3*k10_r_r3*k12_r_r3*k14_r_r3*k16_r_r3*k19_r_r3*m_m8*m_m12 + k03_r_r3*k05_r_r3*k07_r_r3*k09_r_r3*k12_r_r3*k14_r_r3*k17_r_r3*k20_r_r3*m_m7*m_m12 + k03_r_r3*k05_r_r3*k07_r_r3*k10_r_r3*k12_r_r3*k14_r_r3*k17_r_r3*k19_r_r3*m_m7*m_m12 + k02_r_r3*k04_r_r3*k08_r_r3*k10_r_r3*k12_r_r3*k15_r_r3*k17_r_r3*k19_r_r3*m_m8*m_m12 + k02_r_r3*k05_r_r3*k07_r_r3*k10_r_r3*k12_r_r3*k14_r_r3*k16_r_r3*k18_r_r3*m_m11*m_m12 + k02_r_r3*k05_r_r3*k08_r_r3*k10_r_r3*k12_r_r3*k14_r_r3*k17_r_r3*k19_r_r3*m_m8*m_m12 + k02_r_r3*k06_r_r3*k08_r_r3*k10_r_r3*k12_r_r3*k14_r_r3*k16_r_r3*k19_r_r3*m_m8*m_m12 + k03_r_r3*k05_r_r3*k07_r_r3*k09_r_r3*k12_r_r3*k15_r_r3*k17_r_r3*k20_r_r3*m_m7*m_m12 + k03_r_r3*k05_r_r3*k07_r_r3*k10_r_r3*k12_r_r3*k15_r_r3*k17_r_r3*k19_r_r3*m_m7*m_m12 + k02_r_r3*k04_r_r3*k06_r_r3*k09_r_r3*k12_r_r3*k14_r_r3*k18_r_r3*k20_r_r3*m_m11*m_m12 + k02_r_r3*k04_r_r3*k06_r_r3*k09_r_r3*k13_r_r3*k15_r_r3*k17_r_r3*k20_r_r3*m_m10*m_m12 + k02_r_r3*k04_r_r3*k06_r_r3*k10_r_r3*k13_r_r3*k15_r_r3*k17_r_r3*k19_r_r3*m_m10*m_m12 + k02_r_r3*k05_r_r3*k08_r_r3*k10_r_r3*k12_r_r3*k15_r_r3*k17_r_r3*k19_r_r3*m_m8*m_m12 + k02_r_r3*k06_r_r3*k08_r_r3*k10_r_r3*k12_r_r3*k14_r_r3*k17_r_r3*k19_r_r3*m_m8*m_m12 + k02_r_r3*k04_r_r3*k06_r_r3*k09_r_r3*k12_r_r3*k15_r_r3*k18_r_r3*k20_r_r3*m_m11*m_m12 + k02_r_r3*k04_r_r3*k07_r_r3*k09_r_r3*k12_r_r3*k14_r_r3*k18_r_r3*k20_r_r3*m_m11*m_m12 + k02_r_r3*k04_r_r3*k07_r_r3*k09_r_r3*k13_r_r3*k15_r_r3*k17_r_r3*k20_r_r3*m_m10*m_m12 + k02_r_r3*k04_r_r3*k07_r_r3*k10_r_r3*k13_r_r3*k15_r_r3*k17_r_r3*k19_r_r3*m_m10*m_m12 + k02_r_r3*k06_r_r3*k08_r_r3*k10_r_r3*k12_r_r3*k15_r_r3*k17_r_r3*k19_r_r3*m_m8*m_m12 + k04_r_r3*k06_r_r3*k08_r_r3*k10_r_r3*k12_r_r3*k14_r_r3*k16_r_r3*k19_r_r3*m_m8*m_m12 + k02_r_r3*k04_r_r3*k06_r_r3*k09_r_r3*k12_r_r3*k16_r_r3*k18_r_r3*k20_r_r3*m_m11*m_m12 + k02_r_r3*k04_r_r3*k07_r_r3*k09_r_r3*k12_r_r3*k15_r_r3*k18_r_r3*k20_r_r3*m_m11*m_m12 + k02_r_r3*k05_r_r3*k07_r_r3*k09_r_r3*k12_r_r3*k14_r_r3*k18_r_r3*k20_r_r3*m_m11*m_m12 + k02_r_r3*k05_r_r3*k07_r_r3*k09_r_r3*k13_r_r3*k15_r_r3*k17_r_r3*k20_r_r3*m_m10*m_m12 + k02_r_r3*k05_r_r3*k07_r_r3*k10_r_r3*k13_r_r3*k15_r_r3*k17_r_r3*k19_r_r3*m_m10*m_m12 + k04_r_r3*k06_r_r3*k08_r_r3*k10_r_r3*k12_r_r3*k14_r_r3*k17_r_r3*k19_r_r3*m_m8*m_m12 + k02_r_r3*k04_r_r3*k07_r_r3*k09_r_r3*k12_r_r3*k16_r_r3*k18_r_r3*k20_r_r3*m_m11*m_m12 + k02_r_r3*k05_r_r3*k07_r_r3*k09_r_r3*k12_r_r3*k15_r_r3*k18_r_r3*k20_r_r3*m_m11*m_m12 + k04_r_r3*k06_r_r3*k08_r_r3*k10_r_r3*k12_r_r3*k15_r_r3*k17_r_r3*k19_r_r3*m_m8*m_m12 + k02_r_r3*k04_r_r3*k06_r_r3*k09_r_r3*k14_r_r3*k16_r_r3*k18_r_r3*k20_r_r3*m_m11*m_m12 + k02_r_r3*k05_r_r3*k07_r_r3*k09_r_r3*k12_r_r3*k16_r_r3*k18_r_r3*k20_r_r3*m_m11*m_m12 + k02_r_r3*k04_r_r3*k07_r_r3*k09_r_r3*k14_r_r3*k16_r_r3*k18_r_r3*k20_r_r3*m_m11*m_m12 + k02_r_r3*k05_r_r3*k07_r_r3*k09_r_r3*k14_r_r3*k16_r_r3*k18_r_r3*k20_r_r3*m_m11*m_m12 + k01_r_r3*k03_r_r3*k05_r_r3*k08_r_r3*k12_r_r3*k14_r_r3*k16_r_r3*k19_r_r3*m_m1*m_m7*m_m8 + k01_r_r3*k03_r_r3*k05_r_r3*k07_r_r3*k12_r_r3*k14_r_r3*k16_r_r3*k18_r_r3*m_m1*m_m7*m_m11 + k01_r_r3*k03_r_r3*k05_r_r3*k08_r_r3*k12_r_r3*k14_r_r3*k17_r_r3*k19_r_r3*m_m1*m_m7*m_m8 + k01_r_r3*k03_r_r3*k06_r_r3*k08_r_r3*k12_r_r3*k14_r_r3*k16_r_r3*k19_r_r3*m_m1*m_m7*m_m8 + k02_r_r3*k04_r_r3*k06_r_r3*k08_r_r3*k11_r_r3*k13_r_r3*k15_r_r3*k17_r_r3*m_m1*m_m8*m_m10 + k01_r_r3*k03_r_r3*k05_r_r3*k08_r_r3*k12_r_r3*k15_r_r3*k17_r_r3*k19_r_r3*m_m1*m_m7*m_m8 + k01_r_r3*k03_r_r3*k06_r_r3*k08_r_r3*k12_r_r3*k14_r_r3*k17_r_r3*k19_r_r3*m_m1*m_m7*m_m8 + k01_r_r3*k03_r_r3*k05_r_r3*k09_r_r3*k12_r_r3*k14_r_r3*k16_r_r3*k18_r_r3*m_m1*m_m7*m_m11 + k01_r_r3*k03_r_r3*k06_r_r3*k08_r_r3*k12_r_r3*k15_r_r3*k17_r_r3*k19_r_r3*m_m1*m_m7*m_m8 + k02_r_r3*k04_r_r3*k06_r_r3*k08_r_r3*k11_r_r3*k13_r_r3*k15_r_r3*k19_r_r3*m_m1*m_m8*m_m10 + k01_r_r3*k03_r_r3*k05_r_r3*k07_r_r3*k13_r_r3*k15_r_r3*k17_r_r3*k19_r_r3*m_m1*m_m7*m_m10 + k01_r_r3*k03_r_r3*k06_r_r3*k09_r_r3*k12_r_r3*k14_r_r3*k16_r_r3*k18_r_r3*m_m1*m_m7*m_m11 + k02_r_r3*k04_r_r3*k06_r_r3*k08_r_r3*k11_r_r3*k13_r_r3*k16_r_r3*k19_r_r3*m_m1*m_m8*m_m10 + k03_r_r3*k05_r_r3*k07_r_r3*k09_r_r3*k11_r_r3*k13_r_r3*k15_r_r3*k17_r_r3*m_m1*m_m7*m_m10 + k01_r_r3*k03_r_r3*k07_r_r3*k09_r_r3*k12_r_r3*k14_r_r3*k16_r_r3*k18_r_r3*m_m1*m_m7*m_m11 + k01_r_r3*k04_r_r3*k06_r_r3*k08_r_r3*k12_r_r3*k14_r_r3*k16_r_r3*k18_r_r3*m_m1*m_m8*m_m11 + k02_r_r3*k04_r_r3*k06_r_r3*k08_r_r3*k11_r_r3*k13_r_r3*k17_r_r3*k19_r_r3*m_m1*m_m8*m_m10 + k02_r_r3*k04_r_r3*k06_r_r3*k08_r_r3*k11_r_r3*k14_r_r3*k16_r_r3*k18_r_r3*m_m1*m_m8*m_m11 + k01_r_r3*k03_r_r3*k05_r_r3*k09_r_r3*k13_r_r3*k15_r_r3*k17_r_r3*k19_r_r3*m_m1*m_m7*m_m10 + k02_r_r3*k04_r_r3*k06_r_r3*k09_r_r3*k11_r_r3*k13_r_r3*k15_r_r3*k18_r_r3*m_m1*m_m10*m_m11 + k03_r_r3*k05_r_r3*k07_r_r3*k09_r_r3*k11_r_r3*k13_r_r3*k15_r_r3*k19_r_r3*m_m1*m_m7*m_m10 + k01_r_r3*k03_r_r3*k06_r_r3*k09_r_r3*k13_r_r3*k15_r_r3*k17_r_r3*k19_r_r3*m_m1*m_m7*m_m10 + k02_r_r3*k04_r_r3*k06_r_r3*k09_r_r3*k11_r_r3*k13_r_r3*k16_r_r3*k18_r_r3*m_m1*m_m10*m_m11 + k02_r_r3*k04_r_r3*k07_r_r3*k09_r_r3*k11_r_r3*k13_r_r3*k15_r_r3*k18_r_r3*m_m1*m_m10*m_m11 + k03_r_r3*k05_r_r3*k07_r_r3*k09_r_r3*k11_r_r3*k13_r_r3*k16_r_r3*k19_r_r3*m_m1*m_m7*m_m10 + k01_r_r3*k03_r_r3*k07_r_r3*k09_r_r3*k13_r_r3*k15_r_r3*k17_r_r3*k19_r_r3*m_m1*m_m7*m_m10 + k01_r_r3*k04_r_r3*k06_r_r3*k08_r_r3*k13_r_r3*k15_r_r3*k17_r_r3*k19_r_r3*m_m1*m_m8*m_m10 + k02_r_r3*k04_r_r3*k07_r_r3*k09_r_r3*k11_r_r3*k13_r_r3*k16_r_r3*k18_r_r3*m_m1*m_m10*m_m11 + k02_r_r3*k05_r_r3*k07_r_r3*k09_r_r3*k11_r_r3*k13_r_r3*k15_r_r3*k18_r_r3*m_m1*m_m10*m_m11 + k03_r_r3*k05_r_r3*k07_r_r3*k09_r_r3*k11_r_r3*k13_r_r3*k17_r_r3*k19_r_r3*m_m1*m_m7*m_m10 + k03_r_r3*k05_r_r3*k07_r_r3*k09_r_r3*k11_r_r3*k14_r_r3*k16_r_r3*k18_r_r3*m_m1*m_m7*m_m11 + k02_r_r3*k05_r_r3*k07_r_r3*k09_r_r3*k11_r_r3*k13_r_r3*k16_r_r3*k18_r_r3*m_m1*m_m10*m_m11 + k03_r_r3*k05_r_r3*k08_r_r3*k10_r_r3*k12_r_r3*k14_r_r3*k16_r_r3*k19_r_r3*m_m7*m_m8*m_m12 + k02_r_r3*k04_r_r3*k06_r_r3*k08_r_r3*k12_r_r3*k14_r_r3*k18_r_r3*k20_r_r3*m_m8*m_m11*m_m12 + k02_r_r3*k04_r_r3*k06_r_r3*k08_r_r3*k13_r_r3*k15_r_r3*k17_r_r3*k20_r_r3*m_m8*m_m10*m_m12 + k02_r_r3*k04_r_r3*k08_r_r3*k10_r_r3*k12_r_r3*k14_r_r3*k16_r_r3*k18_r_r3*m_m8*m_m11*m_m12 + k03_r_r3*k05_r_r3*k07_r_r3*k10_r_r3*k12_r_r3*k14_r_r3*k16_r_r3*k18_r_r3*m_m7*m_m11*m_m12 + k03_r_r3*k05_r_r3*k08_r_r3*k10_r_r3*k12_r_r3*k14_r_r3*k17_r_r3*k19_r_r3*m_m7*m_m8*m_m12 + k03_r_r3*k06_r_r3*k08_r_r3*k10_r_r3*k12_r_r3*k14_r_r3*k16_r_r3*k19_r_r3*m_m7*m_m8*m_m12 + k02_r_r3*k04_r_r3*k06_r_r3*k08_r_r3*k12_r_r3*k15_r_r3*k18_r_r3*k20_r_r3*m_m8*m_m11*m_m12 + k02_r_r3*k05_r_r3*k08_r_r3*k10_r_r3*k12_r_r3*k14_r_r3*k16_r_r3*k18_r_r3*m_m8*m_m11*m_m12 + k03_r_r3*k05_r_r3*k08_r_r3*k10_r_r3*k12_r_r3*k15_r_r3*k17_r_r3*k19_r_r3*m_m7*m_m8*m_m12 + k03_r_r3*k06_r_r3*k08_r_r3*k10_r_r3*k12_r_r3*k14_r_r3*k17_r_r3*k19_r_r3*m_m7*m_m8*m_m12 + k02_r_r3*k04_r_r3*k06_r_r3*k08_r_r3*k12_r_r3*k16_r_r3*k18_r_r3*k20_r_r3*m_m8*m_m11*m_m12 + k02_r_r3*k06_r_r3*k08_r_r3*k10_r_r3*k12_r_r3*k14_r_r3*k16_r_r3*k18_r_r3*m_m8*m_m11*m_m12 + k03_r_r3*k06_r_r3*k08_r_r3*k10_r_r3*k12_r_r3*k15_r_r3*k17_r_r3*k19_r_r3*m_m7*m_m8*m_m12 + k02_r_r3*k04_r_r3*k08_r_r3*k10_r_r3*k13_r_r3*k15_r_r3*k17_r_r3*k19_r_r3*m_m8*m_m10*m_m12 + k03_r_r3*k05_r_r3*k07_r_r3*k09_r_r3*k12_r_r3*k14_r_r3*k18_r_r3*k20_r_r3*m_m7*m_m11*m_m12 + k03_r_r3*k05_r_r3*k07_r_r3*k09_r_r3*k13_r_r3*k15_r_r3*k17_r_r3*k20_r_r3*m_m7*m_m10*m_m12 + k03_r_r3*k05_r_r3*k07_r_r3*k10_r_r3*k13_r_r3*k15_r_r3*k17_r_r3*k19_r_r3*m_m7*m_m10*m_m12 + k02_r_r3*k04_r_r3*k06_r_r3*k08_r_r3*k14_r_r3*k16_r_r3*k18_r_r3*k20_r_r3*m_m8*m_m11*m_m12 + k02_r_r3*k05_r_r3*k08_r_r3*k10_r_r3*k13_r_r3*k15_r_r3*k17_r_r3*k19_r_r3*m_m8*m_m10*m_m12 + k03_r_r3*k05_r_r3*k07_r_r3*k09_r_r3*k12_r_r3*k15_r_r3*k18_r_r3*k20_r_r3*m_m7*m_m11*m_m12 + k04_r_r3*k06_r_r3*k08_r_r3*k10_r_r3*k12_r_r3*k14_r_r3*k16_r_r3*k18_r_r3*m_m8*m_m11*m_m12 + k02_r_r3*k04_r_r3*k06_r_r3*k09_r_r3*k13_r_r3*k15_r_r3*k18_r_r3*k20_r_r3*m_m10*m_m11*m_m12 + k02_r_r3*k06_r_r3*k08_r_r3*k10_r_r3*k13_r_r3*k15_r_r3*k17_r_r3*k19_r_r3*m_m8*m_m10*m_m12 + k03_r_r3*k05_r_r3*k07_r_r3*k09_r_r3*k12_r_r3*k16_r_r3*k18_r_r3*k20_r_r3*m_m7*m_m11*m_m12 + k02_r_r3*k04_r_r3*k06_r_r3*k09_r_r3*k13_r_r3*k16_r_r3*k18_r_r3*k20_r_r3*m_m10*m_m11*m_m12 + k02_r_r3*k04_r_r3*k07_r_r3*k09_r_r3*k13_r_r3*k15_r_r3*k18_r_r3*k20_r_r3*m_m10*m_m11*m_m12 + k02_r_r3*k04_r_r3*k07_r_r3*k09_r_r3*k13_r_r3*k16_r_r3*k18_r_r3*k20_r_r3*m_m10*m_m11*m_m12 + k02_r_r3*k05_r_r3*k07_r_r3*k09_r_r3*k13_r_r3*k15_r_r3*k18_r_r3*k20_r_r3*m_m10*m_m11*m_m12 + k03_r_r3*k05_r_r3*k07_r_r3*k09_r_r3*k14_r_r3*k16_r_r3*k18_r_r3*k20_r_r3*m_m7*m_m11*m_m12 + k04_r_r3*k06_r_r3*k08_r_r3*k10_r_r3*k13_r_r3*k15_r_r3*k17_r_r3*k19_r_r3*m_m8*m_m10*m_m12 + k02_r_r3*k05_r_r3*k07_r_r3*k09_r_r3*k13_r_r3*k16_r_r3*k18_r_r3*k20_r_r3*m_m10*m_m11*m_m12 + k01_r_r3*k03_r_r3*k05_r_r3*k08_r_r3*k12_r_r3*k14_r_r3*k16_r_r3*k18_r_r3*m_m1*m_m7*m_m8*m_m11 + k01_r_r3*k03_r_r3*k06_r_r3*k08_r_r3*k12_r_r3*k14_r_r3*k16_r_r3*k18_r_r3*m_m1*m_m7*m_m8*m_m11 + k01_r_r3*k03_r_r3*k05_r_r3*k08_r_r3*k13_r_r3*k15_r_r3*k17_r_r3*k19_r_r3*m_m1*m_m7*m_m8*m_m10 + k02_r_r3*k04_r_r3*k06_r_r3*k08_r_r3*k11_r_r3*k13_r_r3*k15_r_r3*k18_r_r3*m_m1*m_m8*m_m10*m_m11 + k01_r_r3*k03_r_r3*k06_r_r3*k08_r_r3*k13_r_r3*k15_r_r3*k17_r_r3*k19_r_r3*m_m1*m_m7*m_m8*m_m10 + k02_r_r3*k04_r_r3*k06_r_r3*k08_r_r3*k11_r_r3*k13_r_r3*k16_r_r3*k18_r_r3*m_m1*m_m8*m_m10*m_m11 + k03_r_r3*k05_r_r3*k07_r_r3*k09_r_r3*k11_r_r3*k13_r_r3*k15_r_r3*k18_r_r3*m_m1*m_m7*m_m10*m_m11 + k03_r_r3*k05_r_r3*k07_r_r3*k09_r_r3*k11_r_r3*k13_r_r3*k16_r_r3*k18_r_r3*m_m1*m_m7*m_m10*m_m11 + k03_r_r3*k05_r_r3*k08_r_r3*k10_r_r3*k12_r_r3*k14_r_r3*k16_r_r3*k18_r_r3*m_m7*m_m8*m_m11*m_m12 + k03_r_r3*k06_r_r3*k08_r_r3*k10_r_r3*k12_r_r3*k14_r_r3*k16_r_r3*k18_r_r3*m_m7*m_m8*m_m11*m_m12 + k02_r_r3*k04_r_r3*k06_r_r3*k08_r_r3*k13_r_r3*k15_r_r3*k18_r_r3*k20_r_r3*m_m8*m_m10*m_m11*m_m12 + k03_r_r3*k05_r_r3*k08_r_r3*k10_r_r3*k13_r_r3*k15_r_r3*k17_r_r3*k19_r_r3*m_m7*m_m8*m_m10*m_m12 + k02_r_r3*k04_r_r3*k06_r_r3*k08_r_r3*k13_r_r3*k16_r_r3*k18_r_r3*k20_r_r3*m_m8*m_m10*m_m11*m_m12 + k03_r_r3*k06_r_r3*k08_r_r3*k10_r_r3*k13_r_r3*k15_r_r3*k17_r_r3*k19_r_r3*m_m7*m_m8*m_m10*m_m12 + k03_r_r3*k05_r_r3*k07_r_r3*k09_r_r3*k13_r_r3*k15_r_r3*k18_r_r3*k20_r_r3*m_m7*m_m10*m_m11*m_m12 + k03_r_r3*k05_r_r3*k07_r_r3*k09_r_r3*k13_r_r3*k16_r_r3*k18_r_r3*k20_r_r3*m_m7*m_m10*m_m11*m_m12))^n_sub_r_r3 + 1)*(k02_r_r3*k04_r_r3*k06_r_r3*k09_r_r3*k12_r_r3*k14_r_r3*k16_r_r3*k19_r_r3 + k02_r_r3*k04_r_r3*k06_r_r3*k09_r_r3*k12_r_r3*k14_r_r3*k17_r_r3*k19_r_r3 + k02_r_r3*k04_r_r3*k07_r_r3*k09_r_r3*k12_r_r3*k14_r_r3*k16_r_r3*k19_r_r3 + k02_r_r3*k04_r_r3*k06_r_r3*k09_r_r3*k12_r_r3*k15_r_r3*k17_r_r3*k19_r_r3 + k02_r_r3*k04_r_r3*k07_r_r3*k09_r_r3*k12_r_r3*k14_r_r3*k17_r_r3*k19_r_r3 + k02_r_r3*k05_r_r3*k07_r_r3*k09_r_r3*k12_r_r3*k14_r_r3*k16_r_r3*k19_r_r3 + k02_r_r3*k04_r_r3*k07_r_r3*k09_r_r3*k12_r_r3*k15_r_r3*k17_r_r3*k19_r_r3 + k02_r_r3*k05_r_r3*k07_r_r3*k09_r_r3*k12_r_r3*k14_r_r3*k17_r_r3*k19_r_r3 + k02_r_r3*k05_r_r3*k07_r_r3*k09_r_r3*k12_r_r3*k15_r_r3*k17_r_r3*k19_r_r3 + k01_r_r3*k04_r_r3*k06_r_r3*k09_r_r3*k12_r_r3*k14_r_r3*k16_r_r3*k19_r_r3*m_m1 + k02_r_r3*k04_r_r3*k06_r_r3*k09_r_r3*k11_r_r3*k14_r_r3*k16_r_r3*k19_r_r3*m_m1 + k01_r_r3*k04_r_r3*k06_r_r3*k09_r_r3*k12_r_r3*k14_r_r3*k17_r_r3*k19_r_r3*m_m1 + k01_r_r3*k04_r_r3*k07_r_r3*k09_r_r3*k12_r_r3*k14_r_r3*k16_r_r3*k19_r_r3*m_m1 + k02_r_r3*k04_r_r3*k06_r_r3*k09_r_r3*k11_r_r3*k14_r_r3*k17_r_r3*k19_r_r3*m_m1 + k02_r_r3*k04_r_r3*k07_r_r3*k09_r_r3*k11_r_r3*k14_r_r3*k16_r_r3*k19_r_r3*m_m1 + k01_r_r3*k04_r_r3*k06_r_r3*k09_r_r3*k12_r_r3*k15_r_r3*k17_r_r3*k19_r_r3*m_m1 + k01_r_r3*k04_r_r3*k07_r_r3*k09_r_r3*k12_r_r3*k14_r_r3*k17_r_r3*k19_r_r3*m_m1 + k01_r_r3*k05_r_r3*k07_r_r3*k09_r_r3*k12_r_r3*k14_r_r3*k16_r_r3*k19_r_r3*m_m1 + k02_r_r3*k04_r_r3*k06_r_r3*k09_r_r3*k11_r_r3*k15_r_r3*k17_r_r3*k19_r_r3*m_m1 + k02_r_r3*k04_r_r3*k07_r_r3*k09_r_r3*k11_r_r3*k14_r_r3*k17_r_r3*k19_r_r3*m_m1 + k02_r_r3*k05_r_r3*k07_r_r3*k09_r_r3*k11_r_r3*k14_r_r3*k16_r_r3*k19_r_r3*m_m1 + k01_r_r3*k04_r_r3*k07_r_r3*k09_r_r3*k12_r_r3*k15_r_r3*k17_r_r3*k19_r_r3*m_m1 + k01_r_r3*k05_r_r3*k07_r_r3*k09_r_r3*k12_r_r3*k14_r_r3*k17_r_r3*k19_r_r3*m_m1 + k02_r_r3*k04_r_r3*k07_r_r3*k09_r_r3*k11_r_r3*k15_r_r3*k17_r_r3*k19_r_r3*m_m1 + k02_r_r3*k05_r_r3*k07_r_r3*k09_r_r3*k11_r_r3*k14_r_r3*k17_r_r3*k19_r_r3*m_m1 + k01_r_r3*k05_r_r3*k07_r_r3*k09_r_r3*k12_r_r3*k15_r_r3*k17_r_r3*k19_r_r3*m_m1 + k02_r_r3*k05_r_r3*k07_r_r3*k09_r_r3*k11_r_r3*k15_r_r3*k17_r_r3*k19_r_r3*m_m1 + k02_r_r3*k04_r_r3*k06_r_r3*k08_r_r3*k12_r_r3*k14_r_r3*k16_r_r3*k19_r_r3*m_m8 + k02_r_r3*k04_r_r3*k06_r_r3*k08_r_r3*k12_r_r3*k14_r_r3*k17_r_r3*k19_r_r3*m_m8 + k02_r_r3*k04_r_r3*k06_r_r3*k08_r_r3*k12_r_r3*k15_r_r3*k17_r_r3*k19_r_r3*m_m8 + k02_r_r3*k04_r_r3*k06_r_r3*k09_r_r3*k12_r_r3*k14_r_r3*k16_r_r3*k18_r_r3*m_m11 + k03_r_r3*k05_r_r3*k07_r_r3*k09_r_r3*k12_r_r3*k14_r_r3*k16_r_r3*k19_r_r3*m_m7 + k02_r_r3*k04_r_r3*k07_r_r3*k09_r_r3*k12_r_r3*k14_r_r3*k16_r_r3*k18_r_r3*m_m11 + k03_r_r3*k05_r_r3*k07_r_r3*k09_r_r3*k12_r_r3*k14_r_r3*k17_r_r3*k19_r_r3*m_m7 + k02_r_r3*k05_r_r3*k07_r_r3*k09_r_r3*k12_r_r3*k14_r_r3*k16_r_r3*k18_r_r3*m_m11 + k03_r_r3*k05_r_r3*k07_r_r3*k09_r_r3*k12_r_r3*k15_r_r3*k17_r_r3*k19_r_r3*m_m7 + k02_r_r3*k04_r_r3*k06_r_r3*k09_r_r3*k12_r_r3*k14_r_r3*k16_r_r3*k20_r_r3*m_m12 + k02_r_r3*k04_r_r3*k06_r_r3*k09_r_r3*k13_r_r3*k15_r_r3*k17_r_r3*k19_r_r3*m_m10 + k02_r_r3*k04_r_r3*k06_r_r3*k10_r_r3*k12_r_r3*k14_r_r3*k16_r_r3*k19_r_r3*m_m12 + k02_r_r3*k04_r_r3*k06_r_r3*k09_r_r3*k12_r_r3*k14_r_r3*k17_r_r3*k20_r_r3*m_m12 + k02_r_r3*k04_r_r3*k06_r_r3*k10_r_r3*k12_r_r3*k14_r_r3*k17_r_r3*k19_r_r3*m_m12 + k02_r_r3*k04_r_r3*k07_r_r3*k09_r_r3*k12_r_r3*k14_r_r3*k16_r_r3*k20_r_r3*m_m12 + k02_r_r3*k04_r_r3*k07_r_r3*k09_r_r3*k13_r_r3*k15_r_r3*k17_r_r3*k19_r_r3*m_m10 + k02_r_r3*k04_r_r3*k07_r_r3*k10_r_r3*k12_r_r3*k14_r_r3*k16_r_r3*k19_r_r3*m_m12 + k02_r_r3*k04_r_r3*k06_r_r3*k09_r_r3*k12_r_r3*k15_r_r3*k17_r_r3*k20_r_r3*m_m12 + k02_r_r3*k04_r_r3*k06_r_r3*k10_r_r3*k12_r_r3*k15_r_r3*k17_r_r3*k19_r_r3*m_m12 + k02_r_r3*k04_r_r3*k07_r_r3*k09_r_r3*k12_r_r3*k14_r_r3*k17_r_r3*k20_r_r3*m_m12 + k02_r_r3*k04_r_r3*k07_r_r3*k10_r_r3*k12_r_r3*k14_r_r3*k17_r_r3*k19_r_r3*m_m12 + k02_r_r3*k05_r_r3*k07_r_r3*k09_r_r3*k12_r_r3*k14_r_r3*k16_r_r3*k20_r_r3*m_m12 + k02_r_r3*k05_r_r3*k07_r_r3*k09_r_r3*k13_r_r3*k15_r_r3*k17_r_r3*k19_r_r3*m_m10 + k02_r_r3*k05_r_r3*k07_r_r3*k10_r_r3*k12_r_r3*k14_r_r3*k16_r_r3*k19_r_r3*m_m12 + k02_r_r3*k04_r_r3*k07_r_r3*k09_r_r3*k12_r_r3*k15_r_r3*k17_r_r3*k20_r_r3*m_m12 + k02_r_r3*k04_r_r3*k07_r_r3*k10_r_r3*k12_r_r3*k15_r_r3*k17_r_r3*k19_r_r3*m_m12 + k02_r_r3*k05_r_r3*k07_r_r3*k09_r_r3*k12_r_r3*k14_r_r3*k17_r_r3*k20_r_r3*m_m12 + k02_r_r3*k05_r_r3*k07_r_r3*k10_r_r3*k12_r_r3*k14_r_r3*k17_r_r3*k19_r_r3*m_m12 + k02_r_r3*k05_r_r3*k07_r_r3*k09_r_r3*k12_r_r3*k15_r_r3*k17_r_r3*k20_r_r3*m_m12 + k02_r_r3*k05_r_r3*k07_r_r3*k10_r_r3*k12_r_r3*k15_r_r3*k17_r_r3*k19_r_r3*m_m12 + k01_r_r3*k03_r_r3*k05_r_r3*k07_r_r3*k12_r_r3*k14_r_r3*k16_r_r3*k19_r_r3*m_m1*m_m7 + k01_r_r3*k03_r_r3*k05_r_r3*k07_r_r3*k12_r_r3*k14_r_r3*k17_r_r3*k19_r_r3*m_m1*m_m7 + k01_r_r3*k03_r_r3*k05_r_r3*k07_r_r3*k12_r_r3*k15_r_r3*k17_r_r3*k19_r_r3*m_m1*m_m7 + k01_r_r3*k03_r_r3*k05_r_r3*k09_r_r3*k12_r_r3*k14_r_r3*k16_r_r3*k19_r_r3*m_m1*m_m7 + k01_r_r3*k03_r_r3*k05_r_r3*k09_r_r3*k12_r_r3*k14_r_r3*k17_r_r3*k19_r_r3*m_m1*m_m7 + k01_r_r3*k03_r_r3*k06_r_r3*k09_r_r3*k12_r_r3*k14_r_r3*k16_r_r3*k19_r_r3*m_m1*m_m7 + k02_r_r3*k04_r_r3*k06_r_r3*k09_r_r3*k11_r_r3*k13_r_r3*k15_r_r3*k17_r_r3*m_m1*m_m10 + k01_r_r3*k03_r_r3*k05_r_r3*k09_r_r3*k12_r_r3*k15_r_r3*k17_r_r3*k19_r_r3*m_m1*m_m7 + k01_r_r3*k03_r_r3*k06_r_r3*k09_r_r3*k12_r_r3*k14_r_r3*k17_r_r3*k19_r_r3*m_m1*m_m7 + k01_r_r3*k03_r_r3*k07_r_r3*k09_r_r3*k12_r_r3*k14_r_r3*k16_r_r3*k19_r_r3*m_m1*m_m7 + k01_r_r3*k04_r_r3*k06_r_r3*k08_r_r3*k12_r_r3*k14_r_r3*k16_r_r3*k19_r_r3*m_m1*m_m8 + k02_r_r3*k04_r_r3*k06_r_r3*k08_r_r3*k11_r_r3*k14_r_r3*k16_r_r3*k19_r_r3*m_m1*m_m8 + k02_r_r3*k04_r_r3*k07_r_r3*k09_r_r3*k11_r_r3*k13_r_r3*k15_r_r3*k17_r_r3*m_m1*m_m10 + k01_r_r3*k03_r_r3*k06_r_r3*k09_r_r3*k12_r_r3*k15_r_r3*k17_r_r3*k19_r_r3*m_m1*m_m7 + k01_r_r3*k03_r_r3*k07_r_r3*k09_r_r3*k12_r_r3*k14_r_r3*k17_r_r3*k19_r_r3*m_m1*m_m7 + k01_r_r3*k04_r_r3*k06_r_r3*k08_r_r3*k12_r_r3*k14_r_r3*k17_r_r3*k19_r_r3*m_m1*m_m8 + k02_r_r3*k04_r_r3*k06_r_r3*k08_r_r3*k11_r_r3*k14_r_r3*k17_r_r3*k19_r_r3*m_m1*m_m8 + k02_r_r3*k04_r_r3*k06_r_r3*k09_r_r3*k11_r_r3*k13_r_r3*k15_r_r3*k19_r_r3*m_m1*m_m10 + k02_r_r3*k05_r_r3*k07_r_r3*k09_r_r3*k11_r_r3*k13_r_r3*k15_r_r3*k17_r_r3*m_m1*m_m10 + k01_r_r3*k03_r_r3*k07_r_r3*k09_r_r3*k12_r_r3*k15_r_r3*k17_r_r3*k19_r_r3*m_m1*m_m7 + k01_r_r3*k04_r_r3*k06_r_r3*k08_r_r3*k12_r_r3*k15_r_r3*k17_r_r3*k19_r_r3*m_m1*m_m8 + k02_r_r3*k04_r_r3*k06_r_r3*k08_r_r3*k11_r_r3*k15_r_r3*k17_r_r3*k19_r_r3*m_m1*m_m8 + k02_r_r3*k04_r_r3*k06_r_r3*k09_r_r3*k11_r_r3*k13_r_r3*k16_r_r3*k19_r_r3*m_m1*m_m10 + k02_r_r3*k04_r_r3*k07_r_r3*k09_r_r3*k11_r_r3*k13_r_r3*k15_r_r3*k19_r_r3*m_m1*m_m10 + k01_r_r3*k04_r_r3*k06_r_r3*k09_r_r3*k12_r_r3*k14_r_r3*k16_r_r3*k18_r_r3*m_m1*m_m11 + k02_r_r3*k04_r_r3*k06_r_r3*k09_r_r3*k11_r_r3*k13_r_r3*k17_r_r3*k19_r_r3*m_m1*m_m10 + k02_r_r3*k04_r_r3*k06_r_r3*k09_r_r3*k11_r_r3*k14_r_r3*k16_r_r3*k18_r_r3*m_m1*m_m11 + k02_r_r3*k04_r_r3*k07_r_r3*k09_r_r3*k11_r_r3*k13_r_r3*k16_r_r3*k19_r_r3*m_m1*m_m10 + k02_r_r3*k05_r_r3*k07_r_r3*k09_r_r3*k11_r_r3*k13_r_r3*k15_r_r3*k19_r_r3*m_m1*m_m10 + k03_r_r3*k05_r_r3*k07_r_r3*k09_r_r3*k11_r_r3*k14_r_r3*k16_r_r3*k19_r_r3*m_m1*m_m7 + k01_r_r3*k04_r_r3*k07_r_r3*k09_r_r3*k12_r_r3*k14_r_r3*k16_r_r3*k18_r_r3*m_m1*m_m11 + k02_r_r3*k04_r_r3*k07_r_r3*k09_r_r3*k11_r_r3*k13_r_r3*k17_r_r3*k19_r_r3*m_m1*m_m10 + k02_r_r3*k04_r_r3*k07_r_r3*k09_r_r3*k11_r_r3*k14_r_r3*k16_r_r3*k18_r_r3*m_m1*m_m11 + k02_r_r3*k05_r_r3*k07_r_r3*k09_r_r3*k11_r_r3*k13_r_r3*k16_r_r3*k19_r_r3*m_m1*m_m10 + k03_r_r3*k05_r_r3*k07_r_r3*k09_r_r3*k11_r_r3*k14_r_r3*k17_r_r3*k19_r_r3*m_m1*m_m7 + k01_r_r3*k05_r_r3*k07_r_r3*k09_r_r3*k12_r_r3*k14_r_r3*k16_r_r3*k18_r_r3*m_m1*m_m11 + k02_r_r3*k05_r_r3*k07_r_r3*k09_r_r3*k11_r_r3*k13_r_r3*k17_r_r3*k19_r_r3*m_m1*m_m10 + k02_r_r3*k05_r_r3*k07_r_r3*k09_r_r3*k11_r_r3*k14_r_r3*k16_r_r3*k18_r_r3*m_m1*m_m11 + k03_r_r3*k05_r_r3*k07_r_r3*k09_r_r3*k11_r_r3*k15_r_r3*k17_r_r3*k19_r_r3*m_m1*m_m7 + k01_r_r3*k04_r_r3*k06_r_r3*k09_r_r3*k13_r_r3*k15_r_r3*k17_r_r3*k19_r_r3*m_m1*m_m10 + k01_r_r3*k04_r_r3*k07_r_r3*k09_r_r3*k13_r_r3*k15_r_r3*k17_r_r3*k19_r_r3*m_m1*m_m10 + k01_r_r3*k05_r_r3*k07_r_r3*k09_r_r3*k13_r_r3*k15_r_r3*k17_r_r3*k19_r_r3*m_m1*m_m10 + k02_r_r3*k04_r_r3*k06_r_r3*k08_r_r3*k12_r_r3*k14_r_r3*k16_r_r3*k18_r_r3*m_m8*m_m11 + k02_r_r3*k04_r_r3*k06_r_r3*k08_r_r3*k12_r_r3*k14_r_r3*k16_r_r3*k20_r_r3*m_m8*m_m12 + k02_r_r3*k04_r_r3*k06_r_r3*k08_r_r3*k13_r_r3*k15_r_r3*k17_r_r3*k19_r_r3*m_m8*m_m10 + k03_r_r3*k05_r_r3*k07_r_r3*k09_r_r3*k12_r_r3*k14_r_r3*k16_r_r3*k18_r_r3*m_m7*m_m11 + k02_r_r3*k04_r_r3*k06_r_r3*k08_r_r3*k12_r_r3*k14_r_r3*k17_r_r3*k20_r_r3*m_m8*m_m12 + k02_r_r3*k04_r_r3*k06_r_r3*k08_r_r3*k12_r_r3*k15_r_r3*k17_r_r3*k20_r_r3*m_m8*m_m12 + k02_r_r3*k04_r_r3*k06_r_r3*k10_r_r3*k12_r_r3*k14_r_r3*k16_r_r3*k18_r_r3*m_m11*m_m12 + k02_r_r3*k04_r_r3*k08_r_r3*k10_r_r3*k12_r_r3*k14_r_r3*k16_r_r3*k19_r_r3*m_m8*m_m12 + k03_r_r3*k05_r_r3*k07_r_r3*k09_r_r3*k12_r_r3*k14_r_r3*k16_r_r3*k20_r_r3*m_m7*m_m12 + k03_r_r3*k05_r_r3*k07_r_r3*k09_r_r3*k13_r_r3*k15_r_r3*k17_r_r3*k19_r_r3*m_m7*m_m10 + k03_r_r3*k05_r_r3*k07_r_r3*k10_r_r3*k12_r_r3*k14_r_r3*k16_r_r3*k19_r_r3*m_m7*m_m12 + k02_r_r3*k04_r_r3*k07_r_r3*k10_r_r3*k12_r_r3*k14_r_r3*k16_r_r3*k18_r_r3*m_m11*m_m12 + k02_r_r3*k04_r_r3*k08_r_r3*k10_r_r3*k12_r_r3*k14_r_r3*k17_r_r3*k19_r_r3*m_m8*m_m12 + k02_r_r3*k05_r_r3*k08_r_r3*k10_r_r3*k12_r_r3*k14_r_r3*k16_r_r3*k19_r_r3*m_m8*m_m12 + k03_r_r3*k05_r_r3*k07_r_r3*k09_r_r3*k12_r_r3*k14_r_r3*k17_r_r3*k20_r_r3*m_m7*m_m12 + k03_r_r3*k05_r_r3*k07_r_r3*k10_r_r3*k12_r_r3*k14_r_r3*k17_r_r3*k19_r_r3*m_m7*m_m12 + k02_r_r3*k04_r_r3*k08_r_r3*k10_r_r3*k12_r_r3*k15_r_r3*k17_r_r3*k19_r_r3*m_m8*m_m12 + k02_r_r3*k05_r_r3*k07_r_r3*k10_r_r3*k12_r_r3*k14_r_r3*k16_r_r3*k18_r_r3*m_m11*m_m12 + k02_r_r3*k05_r_r3*k08_r_r3*k10_r_r3*k12_r_r3*k14_r_r3*k17_r_r3*k19_r_r3*m_m8*m_m12 + k02_r_r3*k06_r_r3*k08_r_r3*k10_r_r3*k12_r_r3*k14_r_r3*k16_r_r3*k19_r_r3*m_m8*m_m12 + k03_r_r3*k05_r_r3*k07_r_r3*k09_r_r3*k12_r_r3*k15_r_r3*k17_r_r3*k20_r_r3*m_m7*m_m12 + k03_r_r3*k05_r_r3*k07_r_r3*k10_r_r3*k12_r_r3*k15_r_r3*k17_r_r3*k19_r_r3*m_m7*m_m12 + k02_r_r3*k04_r_r3*k06_r_r3*k09_r_r3*k12_r_r3*k14_r_r3*k18_r_r3*k20_r_r3*m_m11*m_m12 + k02_r_r3*k04_r_r3*k06_r_r3*k09_r_r3*k13_r_r3*k15_r_r3*k17_r_r3*k20_r_r3*m_m10*m_m12 + k02_r_r3*k04_r_r3*k06_r_r3*k10_r_r3*k13_r_r3*k15_r_r3*k17_r_r3*k19_r_r3*m_m10*m_m12 + k02_r_r3*k05_r_r3*k08_r_r3*k10_r_r3*k12_r_r3*k15_r_r3*k17_r_r3*k19_r_r3*m_m8*m_m12 + k02_r_r3*k06_r_r3*k08_r_r3*k10_r_r3*k12_r_r3*k14_r_r3*k17_r_r3*k19_r_r3*m_m8*m_m12 + k02_r_r3*k04_r_r3*k06_r_r3*k09_r_r3*k12_r_r3*k15_r_r3*k18_r_r3*k20_r_r3*m_m11*m_m12 + k02_r_r3*k04_r_r3*k07_r_r3*k09_r_r3*k12_r_r3*k14_r_r3*k18_r_r3*k20_r_r3*m_m11*m_m12 + k02_r_r3*k04_r_r3*k07_r_r3*k09_r_r3*k13_r_r3*k15_r_r3*k17_r_r3*k20_r_r3*m_m10*m_m12 + k02_r_r3*k04_r_r3*k07_r_r3*k10_r_r3*k13_r_r3*k15_r_r3*k17_r_r3*k19_r_r3*m_m10*m_m12 + k02_r_r3*k06_r_r3*k08_r_r3*k10_r_r3*k12_r_r3*k15_r_r3*k17_r_r3*k19_r_r3*m_m8*m_m12 + k04_r_r3*k06_r_r3*k08_r_r3*k10_r_r3*k12_r_r3*k14_r_r3*k16_r_r3*k19_r_r3*m_m8*m_m12 + k02_r_r3*k04_r_r3*k06_r_r3*k09_r_r3*k12_r_r3*k16_r_r3*k18_r_r3*k20_r_r3*m_m11*m_m12 + k02_r_r3*k04_r_r3*k07_r_r3*k09_r_r3*k12_r_r3*k15_r_r3*k18_r_r3*k20_r_r3*m_m11*m_m12 + k02_r_r3*k05_r_r3*k07_r_r3*k09_r_r3*k12_r_r3*k14_r_r3*k18_r_r3*k20_r_r3*m_m11*m_m12 + k02_r_r3*k05_r_r3*k07_r_r3*k09_r_r3*k13_r_r3*k15_r_r3*k17_r_r3*k20_r_r3*m_m10*m_m12 + k02_r_r3*k05_r_r3*k07_r_r3*k10_r_r3*k13_r_r3*k15_r_r3*k17_r_r3*k19_r_r3*m_m10*m_m12 + k04_r_r3*k06_r_r3*k08_r_r3*k10_r_r3*k12_r_r3*k14_r_r3*k17_r_r3*k19_r_r3*m_m8*m_m12 + k02_r_r3*k04_r_r3*k07_r_r3*k09_r_r3*k12_r_r3*k16_r_r3*k18_r_r3*k20_r_r3*m_m11*m_m12 + k02_r_r3*k05_r_r3*k07_r_r3*k09_r_r3*k12_r_r3*k15_r_r3*k18_r_r3*k20_r_r3*m_m11*m_m12 + k04_r_r3*k06_r_r3*k08_r_r3*k10_r_r3*k12_r_r3*k15_r_r3*k17_r_r3*k19_r_r3*m_m8*m_m12 + k02_r_r3*k04_r_r3*k06_r_r3*k09_r_r3*k14_r_r3*k16_r_r3*k18_r_r3*k20_r_r3*m_m11*m_m12 + k02_r_r3*k05_r_r3*k07_r_r3*k09_r_r3*k12_r_r3*k16_r_r3*k18_r_r3*k20_r_r3*m_m11*m_m12 + k02_r_r3*k04_r_r3*k07_r_r3*k09_r_r3*k14_r_r3*k16_r_r3*k18_r_r3*k20_r_r3*m_m11*m_m12 + k02_r_r3*k05_r_r3*k07_r_r3*k09_r_r3*k14_r_r3*k16_r_r3*k18_r_r3*k20_r_r3*m_m11*m_m12 + k01_r_r3*k03_r_r3*k05_r_r3*k08_r_r3*k12_r_r3*k14_r_r3*k16_r_r3*k19_r_r3*m_m1*m_m7*m_m8 + k01_r_r3*k03_r_r3*k05_r_r3*k07_r_r3*k12_r_r3*k14_r_r3*k16_r_r3*k18_r_r3*m_m1*m_m7*m_m11 + k01_r_r3*k03_r_r3*k05_r_r3*k08_r_r3*k12_r_r3*k14_r_r3*k17_r_r3*k19_r_r3*m_m1*m_m7*m_m8 + k01_r_r3*k03_r_r3*k06_r_r3*k08_r_r3*k12_r_r3*k14_r_r3*k16_r_r3*k19_r_r3*m_m1*m_m7*m_m8 + k02_r_r3*k04_r_r3*k06_r_r3*k08_r_r3*k11_r_r3*k13_r_r3*k15_r_r3*k17_r_r3*m_m1*m_m8*m_m10 + k01_r_r3*k03_r_r3*k05_r_r3*k08_r_r3*k12_r_r3*k15_r_r3*k17_r_r3*k19_r_r3*m_m1*m_m7*m_m8 + k01_r_r3*k03_r_r3*k06_r_r3*k08_r_r3*k12_r_r3*k14_r_r3*k17_r_r3*k19_r_r3*m_m1*m_m7*m_m8 + k01_r_r3*k03_r_r3*k05_r_r3*k09_r_r3*k12_r_r3*k14_r_r3*k16_r_r3*k18_r_r3*m_m1*m_m7*m_m11 + k01_r_r3*k03_r_r3*k06_r_r3*k08_r_r3*k12_r_r3*k15_r_r3*k17_r_r3*k19_r_r3*m_m1*m_m7*m_m8 + k02_r_r3*k04_r_r3*k06_r_r3*k08_r_r3*k11_r_r3*k13_r_r3*k15_r_r3*k19_r_r3*m_m1*m_m8*m_m10 + k01_r_r3*k03_r_r3*k05_r_r3*k07_r_r3*k13_r_r3*k15_r_r3*k17_r_r3*k19_r_r3*m_m1*m_m7*m_m10 + k01_r_r3*k03_r_r3*k06_r_r3*k09_r_r3*k12_r_r3*k14_r_r3*k16_r_r3*k18_r_r3*m_m1*m_m7*m_m11 + k02_r_r3*k04_r_r3*k06_r_r3*k08_r_r3*k11_r_r3*k13_r_r3*k16_r_r3*k19_r_r3*m_m1*m_m8*m_m10 + k03_r_r3*k05_r_r3*k07_r_r3*k09_r_r3*k11_r_r3*k13_r_r3*k15_r_r3*k17_r_r3*m_m1*m_m7*m_m10 + k01_r_r3*k03_r_r3*k07_r_r3*k09_r_r3*k12_r_r3*k14_r_r3*k16_r_r3*k18_r_r3*m_m1*m_m7*m_m11 + k01_r_r3*k04_r_r3*k06_r_r3*k08_r_r3*k12_r_r3*k14_r_r3*k16_r_r3*k18_r_r3*m_m1*m_m8*m_m11 + k02_r_r3*k04_r_r3*k06_r_r3*k08_r_r3*k11_r_r3*k13_r_r3*k17_r_r3*k19_r_r3*m_m1*m_m8*m_m10 + k02_r_r3*k04_r_r3*k06_r_r3*k08_r_r3*k11_r_r3*k14_r_r3*k16_r_r3*k18_r_r3*m_m1*m_m8*m_m11 + k01_r_r3*k03_r_r3*k05_r_r3*k09_r_r3*k13_r_r3*k15_r_r3*k17_r_r3*k19_r_r3*m_m1*m_m7*m_m10 + k02_r_r3*k04_r_r3*k06_r_r3*k09_r_r3*k11_r_r3*k13_r_r3*k15_r_r3*k18_r_r3*m_m1*m_m10*m_m11 + k03_r_r3*k05_r_r3*k07_r_r3*k09_r_r3*k11_r_r3*k13_r_r3*k15_r_r3*k19_r_r3*m_m1*m_m7*m_m10 + k01_r_r3*k03_r_r3*k06_r_r3*k09_r_r3*k13_r_r3*k15_r_r3*k17_r_r3*k19_r_r3*m_m1*m_m7*m_m10 + k02_r_r3*k04_r_r3*k06_r_r3*k09_r_r3*k11_r_r3*k13_r_r3*k16_r_r3*k18_r_r3*m_m1*m_m10*m_m11 + k02_r_r3*k04_r_r3*k07_r_r3*k09_r_r3*k11_r_r3*k13_r_r3*k15_r_r3*k18_r_r3*m_m1*m_m10*m_m11 + k03_r_r3*k05_r_r3*k07_r_r3*k09_r_r3*k11_r_r3*k13_r_r3*k16_r_r3*k19_r_r3*m_m1*m_m7*m_m10 + k01_r_r3*k03_r_r3*k07_r_r3*k09_r_r3*k13_r_r3*k15_r_r3*k17_r_r3*k19_r_r3*m_m1*m_m7*m_m10 + k01_r_r3*k04_r_r3*k06_r_r3*k08_r_r3*k13_r_r3*k15_r_r3*k17_r_r3*k19_r_r3*m_m1*m_m8*m_m10 + k02_r_r3*k04_r_r3*k07_r_r3*k09_r_r3*k11_r_r3*k13_r_r3*k16_r_r3*k18_r_r3*m_m1*m_m10*m_m11 + k02_r_r3*k05_r_r3*k07_r_r3*k09_r_r3*k11_r_r3*k13_r_r3*k15_r_r3*k18_r_r3*m_m1*m_m10*m_m11 + k03_r_r3*k05_r_r3*k07_r_r3*k09_r_r3*k11_r_r3*k13_r_r3*k17_r_r3*k19_r_r3*m_m1*m_m7*m_m10 + k03_r_r3*k05_r_r3*k07_r_r3*k09_r_r3*k11_r_r3*k14_r_r3*k16_r_r3*k18_r_r3*m_m1*m_m7*m_m11 + k02_r_r3*k05_r_r3*k07_r_r3*k09_r_r3*k11_r_r3*k13_r_r3*k16_r_r3*k18_r_r3*m_m1*m_m10*m_m11 + k03_r_r3*k05_r_r3*k08_r_r3*k10_r_r3*k12_r_r3*k14_r_r3*k16_r_r3*k19_r_r3*m_m7*m_m8*m_m12 + k02_r_r3*k04_r_r3*k06_r_r3*k08_r_r3*k12_r_r3*k14_r_r3*k18_r_r3*k20_r_r3*m_m8*m_m11*m_m12 + k02_r_r3*k04_r_r3*k06_r_r3*k08_r_r3*k13_r_r3*k15_r_r3*k17_r_r3*k20_r_r3*m_m8*m_m10*m_m12 + k02_r_r3*k04_r_r3*k08_r_r3*k10_r_r3*k12_r_r3*k14_r_r3*k16_r_r3*k18_r_r3*m_m8*m_m11*m_m12 + k03_r_r3*k05_r_r3*k07_r_r3*k10_r_r3*k12_r_r3*k14_r_r3*k16_r_r3*k18_r_r3*m_m7*m_m11*m_m12 + k03_r_r3*k05_r_r3*k08_r_r3*k10_r_r3*k12_r_r3*k14_r_r3*k17_r_r3*k19_r_r3*m_m7*m_m8*m_m12 + k03_r_r3*k06_r_r3*k08_r_r3*k10_r_r3*k12_r_r3*k14_r_r3*k16_r_r3*k19_r_r3*m_m7*m_m8*m_m12 + k02_r_r3*k04_r_r3*k06_r_r3*k08_r_r3*k12_r_r3*k15_r_r3*k18_r_r3*k20_r_r3*m_m8*m_m11*m_m12 + k02_r_r3*k05_r_r3*k08_r_r3*k10_r_r3*k12_r_r3*k14_r_r3*k16_r_r3*k18_r_r3*m_m8*m_m11*m_m12 + k03_r_r3*k05_r_r3*k08_r_r3*k10_r_r3*k12_r_r3*k15_r_r3*k17_r_r3*k19_r_r3*m_m7*m_m8*m_m12 + k03_r_r3*k06_r_r3*k08_r_r3*k10_r_r3*k12_r_r3*k14_r_r3*k17_r_r3*k19_r_r3*m_m7*m_m8*m_m12 + k02_r_r3*k04_r_r3*k06_r_r3*k08_r_r3*k12_r_r3*k16_r_r3*k18_r_r3*k20_r_r3*m_m8*m_m11*m_m12 + k02_r_r3*k06_r_r3*k08_r_r3*k10_r_r3*k12_r_r3*k14_r_r3*k16_r_r3*k18_r_r3*m_m8*m_m11*m_m12 + k03_r_r3*k06_r_r3*k08_r_r3*k10_r_r3*k12_r_r3*k15_r_r3*k17_r_r3*k19_r_r3*m_m7*m_m8*m_m12 + k02_r_r3*k04_r_r3*k08_r_r3*k10_r_r3*k13_r_r3*k15_r_r3*k17_r_r3*k19_r_r3*m_m8*m_m10*m_m12 + k03_r_r3*k05_r_r3*k07_r_r3*k09_r_r3*k12_r_r3*k14_r_r3*k18_r_r3*k20_r_r3*m_m7*m_m11*m_m12 + k03_r_r3*k05_r_r3*k07_r_r3*k09_r_r3*k13_r_r3*k15_r_r3*k17_r_r3*k20_r_r3*m_m7*m_m10*m_m12 + k03_r_r3*k05_r_r3*k07_r_r3*k10_r_r3*k13_r_r3*k15_r_r3*k17_r_r3*k19_r_r3*m_m7*m_m10*m_m12 + k02_r_r3*k04_r_r3*k06_r_r3*k08_r_r3*k14_r_r3*k16_r_r3*k18_r_r3*k20_r_r3*m_m8*m_m11*m_m12 + k02_r_r3*k05_r_r3*k08_r_r3*k10_r_r3*k13_r_r3*k15_r_r3*k17_r_r3*k19_r_r3*m_m8*m_m10*m_m12 + k03_r_r3*k05_r_r3*k07_r_r3*k09_r_r3*k12_r_r3*k15_r_r3*k18_r_r3*k20_r_r3*m_m7*m_m11*m_m12 + k04_r_r3*k06_r_r3*k08_r_r3*k10_r_r3*k12_r_r3*k14_r_r3*k16_r_r3*k18_r_r3*m_m8*m_m11*m_m12 + k02_r_r3*k04_r_r3*k06_r_r3*k09_r_r3*k13_r_r3*k15_r_r3*k18_r_r3*k20_r_r3*m_m10*m_m11*m_m12 + k02_r_r3*k06_r_r3*k08_r_r3*k10_r_r3*k13_r_r3*k15_r_r3*k17_r_r3*k19_r_r3*m_m8*m_m10*m_m12 + k03_r_r3*k05_r_r3*k07_r_r3*k09_r_r3*k12_r_r3*k16_r_r3*k18_r_r3*k20_r_r3*m_m7*m_m11*m_m12 + k02_r_r3*k04_r_r3*k06_r_r3*k09_r_r3*k13_r_r3*k16_r_r3*k18_r_r3*k20_r_r3*m_m10*m_m11*m_m12 + k02_r_r3*k04_r_r3*k07_r_r3*k09_r_r3*k13_r_r3*k15_r_r3*k18_r_r3*k20_r_r3*m_m10*m_m11*m_m12 + k02_r_r3*k04_r_r3*k07_r_r3*k09_r_r3*k13_r_r3*k16_r_r3*k18_r_r3*k20_r_r3*m_m10*m_m11*m_m12 + k02_r_r3*k05_r_r3*k07_r_r3*k09_r_r3*k13_r_r3*k15_r_r3*k18_r_r3*k20_r_r3*m_m10*m_m11*m_m12 + k03_r_r3*k05_r_r3*k07_r_r3*k09_r_r3*k14_r_r3*k16_r_r3*k18_r_r3*k20_r_r3*m_m7*m_m11*m_m12 + k04_r_r3*k06_r_r3*k08_r_r3*k10_r_r3*k13_r_r3*k15_r_r3*k17_r_r3*k19_r_r3*m_m8*m_m10*m_m12 + k02_r_r3*k05_r_r3*k07_r_r3*k09_r_r3*k13_r_r3*k16_r_r3*k18_r_r3*k20_r_r3*m_m10*m_m11*m_m12 + k01_r_r3*k03_r_r3*k05_r_r3*k08_r_r3*k12_r_r3*k14_r_r3*k16_r_r3*k18_r_r3*m_m1*m_m7*m_m8*m_m11 + k01_r_r3*k03_r_r3*k06_r_r3*k08_r_r3*k12_r_r3*k14_r_r3*k16_r_r3*k18_r_r3*m_m1*m_m7*m_m8*m_m11 + k01_r_r3*k03_r_r3*k05_r_r3*k08_r_r3*k13_r_r3*k15_r_r3*k17_r_r3*k19_r_r3*m_m1*m_m7*m_m8*m_m10 + k02_r_r3*k04_r_r3*k06_r_r3*k08_r_r3*k11_r_r3*k13_r_r3*k15_r_r3*k18_r_r3*m_m1*m_m8*m_m10*m_m11 + k01_r_r3*k03_r_r3*k06_r_r3*k08_r_r3*k13_r_r3*k15_r_r3*k17_r_r3*k19_r_r3*m_m1*m_m7*m_m8*m_m10 + k02_r_r3*k04_r_r3*k06_r_r3*k08_r_r3*k11_r_r3*k13_r_r3*k16_r_r3*k18_r_r3*m_m1*m_m8*m_m10*m_m11 + k03_r_r3*k05_r_r3*k07_r_r3*k09_r_r3*k11_r_r3*k13_r_r3*k15_r_r3*k18_r_r3*m_m1*m_m7*m_m10*m_m11 + k03_r_r3*k05_r_r3*k07_r_r3*k09_r_r3*k11_r_r3*k13_r_r3*k16_r_r3*k18_r_r3*m_m1*m_m7*m_m10*m_m11 + k03_r_r3*k05_r_r3*k08_r_r3*k10_r_r3*k12_r_r3*k14_r_r3*k16_r_r3*k18_r_r3*m_m7*m_m8*m_m11*m_m12 + k03_r_r3*k06_r_r3*k08_r_r3*k10_r_r3*k12_r_r3*k14_r_r3*k16_r_r3*k18_r_r3*m_m7*m_m8*m_m11*m_m12 + k02_r_r3*k04_r_r3*k06_r_r3*k08_r_r3*k13_r_r3*k15_r_r3*k18_r_r3*k20_r_r3*m_m8*m_m10*m_m11*m_m12 + k03_r_r3*k05_r_r3*k08_r_r3*k10_r_r3*k13_r_r3*k15_r_r3*k17_r_r3*k19_r_r3*m_m7*m_m8*m_m10*m_m12 + k02_r_r3*k04_r_r3*k06_r_r3*k08_r_r3*k13_r_r3*k16_r_r3*k18_r_r3*k20_r_r3*m_m8*m_m10*m_m11*m_m12 + k03_r_r3*k06_r_r3*k08_r_r3*k10_r_r3*k13_r_r3*k15_r_r3*k17_r_r3*k19_r_r3*m_m7*m_m8*m_m10*m_m12 + k03_r_r3*k05_r_r3*k07_r_r3*k09_r_r3*k13_r_r3*k15_r_r3*k18_r_r3*k20_r_r3*m_m7*m_m10*m_m11*m_m12 + k03_r_r3*k05_r_r3*k07_r_r3*k09_r_r3*k13_r_r3*k16_r_r3*k18_r_r3*k20_r_r3*m_m7*m_m10*m_m11*m_m12))) - (k01_r_r9*m_m7 - k02_r_r9*m_m20) + n_sub_r_r2*(k01_r_r2*k03_r_r2*k05_r_r2*m_m5 - k02_r_r2*k04_r_r2*k06_r_r2*m_m7)*(k08_r_r2*k10_r_r2 + k08_r_r2*k11_r_r2 + k09_r_r2*k11_r_r2)/((L_0_r_r2*(Keff_m_m6_r_r2/(Keff_m_m6_r_r2 + m_m6))^n_sub_r_r2*((k02_r_r2*k04_r_r2 + k02_r_r2*k05_r_r2 + k03_r_r2*k05_r_r2)*(k08_r_r2*k10_r_r2 + k08_r_r2*k11_r_r2 + k09_r_r2*k11_r_r2)/(k02_r_r2*k04_r_r2*k08_r_r2*k10_r_r2 + k02_r_r2*k04_r_r2*k08_r_r2*k11_r_r2 + k02_r_r2*k05_r_r2*k08_r_r2*k10_r_r2 + k02_r_r2*k04_r_r2*k09_r_r2*k11_r_r2 + k02_r_r2*k05_r_r2*k08_r_r2*k11_r_r2 + k03_r_r2*k05_r_r2*k08_r_r2*k10_r_r2 + k02_r_r2*k05_r_r2*k09_r_r2*k11_r_r2 + k03_r_r2*k05_r_r2*k08_r_r2*k11_r_r2 + k03_r_r2*k05_r_r2*k09_r_r2*k11_r_r2 + k01_r_r2*k03_r_r2*k08_r_r2*k10_r_r2*m_m5 + k01_r_r2*k03_r_r2*k08_r_r2*k11_r_r2*m_m5 + k01_r_r2*k04_r_r2*k08_r_r2*k10_r_r2*m_m5 + k02_r_r2*k04_r_r2*k07_r_r2*k09_r_r2*m_m6 + k01_r_r2*k03_r_r2*k09_r_r2*k11_r_r2*m_m5 + k01_r_r2*k04_r_r2*k08_r_r2*k11_r_r2*m_m5 + k01_r_r2*k05_r_r2*k08_r_r2*k10_r_r2*m_m5 + k02_r_r2*k04_r_r2*k07_r_r2*k10_r_r2*m_m6 + k02_r_r2*k05_r_r2*k07_r_r2*k09_r_r2*m_m6 + k01_r_r2*k04_r_r2*k09_r_r2*k11_r_r2*m_m5 + k01_r_r2*k05_r_r2*k08_r_r2*k11_r_r2*m_m5 + k02_r_r2*k04_r_r2*k07_r_r2*k11_r_r2*m_m6 + k02_r_r2*k05_r_r2*k07_r_r2*k10_r_r2*m_m6 + k03_r_r2*k05_r_r2*k07_r_r2*k09_r_r2*m_m6 + k01_r_r2*k05_r_r2*k09_r_r2*k11_r_r2*m_m5 + k02_r_r2*k05_r_r2*k07_r_r2*k11_r_r2*m_m6 + k03_r_r2*k05_r_r2*k07_r_r2*k10_r_r2*m_m6 + k03_r_r2*k05_r_r2*k07_r_r2*k11_r_r2*m_m6 + k02_r_r2*k06_r_r2*k08_r_r2*k10_r_r2*m_m7 + k02_r_r2*k06_r_r2*k08_r_r2*k11_r_r2*m_m7 + k03_r_r2*k06_r_r2*k08_r_r2*k10_r_r2*m_m7 + k02_r_r2*k06_r_r2*k09_r_r2*k11_r_r2*m_m7 + k03_r_r2*k06_r_r2*k08_r_r2*k11_r_r2*m_m7 + k04_r_r2*k06_r_r2*k08_r_r2*k10_r_r2*m_m7 + k02_r_r2*k04_r_r2*k08_r_r2*k12_r_r2*m_m10 + k03_r_r2*k06_r_r2*k09_r_r2*k11_r_r2*m_m7 + k04_r_r2*k06_r_r2*k08_r_r2*k11_r_r2*m_m7 + k02_r_r2*k04_r_r2*k09_r_r2*k12_r_r2*m_m10 + k02_r_r2*k05_r_r2*k08_r_r2*k12_r_r2*m_m10 + k04_r_r2*k06_r_r2*k09_r_r2*k11_r_r2*m_m7 + k02_r_r2*k04_r_r2*k10_r_r2*k12_r_r2*m_m10 + k02_r_r2*k05_r_r2*k09_r_r2*k12_r_r2*m_m10 + k03_r_r2*k05_r_r2*k08_r_r2*k12_r_r2*m_m10 + k02_r_r2*k05_r_r2*k10_r_r2*k12_r_r2*m_m10 + k03_r_r2*k05_r_r2*k09_r_r2*k12_r_r2*m_m10 + k03_r_r2*k05_r_r2*k10_r_r2*k12_r_r2*m_m10))^n_sub_r_r2 + 1)*(k02_r_r2*k04_r_r2*k08_r_r2*k10_r_r2 + k02_r_r2*k04_r_r2*k08_r_r2*k11_r_r2 + k02_r_r2*k05_r_r2*k08_r_r2*k10_r_r2 + k02_r_r2*k04_r_r2*k09_r_r2*k11_r_r2 + k02_r_r2*k05_r_r2*k08_r_r2*k11_r_r2 + k03_r_r2*k05_r_r2*k08_r_r2*k10_r_r2 + k02_r_r2*k05_r_r2*k09_r_r2*k11_r_r2 + k03_r_r2*k05_r_r2*k08_r_r2*k11_r_r2 + k03_r_r2*k05_r_r2*k09_r_r2*k11_r_r2 + k01_r_r2*k03_r_r2*k08_r_r2*k10_r_r2*m_m5 + k01_r_r2*k03_r_r2*k08_r_r2*k11_r_r2*m_m5 + k01_r_r2*k04_r_r2*k08_r_r2*k10_r_r2*m_m5 + k02_r_r2*k04_r_r2*k07_r_r2*k09_r_r2*m_m6 + k01_r_r2*k03_r_r2*k09_r_r2*k11_r_r2*m_m5 + k01_r_r2*k04_r_r2*k08_r_r2*k11_r_r2*m_m5 + k01_r_r2*k05_r_r2*k08_r_r2*k10_r_r2*m_m5 + k02_r_r2*k04_r_r2*k07_r_r2*k10_r_r2*m_m6 + k02_r_r2*k05_r_r2*k07_r_r2*k09_r_r2*m_m6 + k01_r_r2*k04_r_r2*k09_r_r2*k11_r_r2*m_m5 + k01_r_r2*k05_r_r2*k08_r_r2*k11_r_r2*m_m5 + k02_r_r2*k04_r_r2*k07_r_r2*k11_r_r2*m_m6 + k02_r_r2*k05_r_r2*k07_r_r2*k10_r_r2*m_m6 + k03_r_r2*k05_r_r2*k07_r_r2*k09_r_r2*m_m6 + k01_r_r2*k05_r_r2*k09_r_r2*k11_r_r2*m_m5 + k02_r_r2*k05_r_r2*k07_r_r2*k11_r_r2*m_m6 + k03_r_r2*k05_r_r2*k07_r_r2*k10_r_r2*m_m6 + k03_r_r2*k05_r_r2*k07_r_r2*k11_r_r2*m_m6 + k02_r_r2*k06_r_r2*k08_r_r2*k10_r_r2*m_m7 + k02_r_r2*k06_r_r2*k08_r_r2*k11_r_r2*m_m7 + k03_r_r2*k06_r_r2*k08_r_r2*k10_r_r2*m_m7 + k02_r_r2*k06_r_r2*k09_r_r2*k11_r_r2*m_m7 + k03_r_r2*k06_r_r2*k08_r_r2*k11_r_r2*m_m7 + k04_r_r2*k06_r_r2*k08_r_r2*k10_r_r2*m_m7 + k02_r_r2*k04_r_r2*k08_r_r2*k12_r_r2*m_m10 + k03_r_r2*k06_r_r2*k09_r_r2*k11_r_r2*m_m7 + k04_r_r2*k06_r_r2*k08_r_r2*k11_r_r2*m_m7 + k02_r_r2*k04_r_r2*k09_r_r2*k12_r_r2*m_m10 + k02_r_r2*k05_r_r2*k08_r_r2*k12_r_r2*m_m10 + k04_r_r2*k06_r_r2*k09_r_r2*k11_r_r2*m_m7 + k02_r_r2*k04_r_r2*k10_r_r2*k12_r_r2*m_m10 + k02_r_r2*k05_r_r2*k09_r_r2*k12_r_r2*m_m10 + k03_r_r2*k05_r_r2*k08_r_r2*k12_r_r2*m_m10 + k02_r_r2*k05_r_r2*k10_r_r2*k12_r_r2*m_m10 + k03_r_r2*k05_r_r2*k09_r_r2*k12_r_r2*m_m10 + k03_r_r2*k05_r_r2*k10_r_r2*k12_r_r2*m_m10)))*(1/m_m7_ref);
  m_m8' = (-(n_sub_r_r4*(k01_r_r4*k03_r_r4*k05_r_r4*k07_r_r4*k09_r_r4*m_m2*m_m8 - k02_r_r4*k04_r_r4*k06_r_r4*k08_r_r4*k10_r_r4*m_m9*m_m13)/((L_0_r_r4*(1/(m_m5/Keff_m_m5_r_r4 + m_m8/Keff_m_m8_r_r4 + 1))^n_sub_r_r4*((k02_r_r4*k04_r_r4*k06_r_r4*k09_r_r4 + k02_r_r4*k04_r_r4*k07_r_r4*k09_r_r4 + k02_r_r4*k05_r_r4*k07_r_r4*k09_r_r4 + k02_r_r4*k04_r_r4*k06_r_r4*k08_r_r4*m_m9 + k03_r_r4*k05_r_r4*k07_r_r4*k09_r_r4*m_m8)/(k02_r_r4*k04_r_r4*k06_r_r4*k09_r_r4 + k02_r_r4*k04_r_r4*k07_r_r4*k09_r_r4 + k02_r_r4*k05_r_r4*k07_r_r4*k09_r_r4 + k01_r_r4*k04_r_r4*k06_r_r4*k09_r_r4*m_m2 + k01_r_r4*k04_r_r4*k07_r_r4*k09_r_r4*m_m2 + k01_r_r4*k05_r_r4*k07_r_r4*k09_r_r4*m_m2 + k02_r_r4*k04_r_r4*k06_r_r4*k08_r_r4*m_m9 + k03_r_r4*k05_r_r4*k07_r_r4*k09_r_r4*m_m8 + k02_r_r4*k04_r_r4*k06_r_r4*k10_r_r4*m_m13 + k02_r_r4*k04_r_r4*k07_r_r4*k10_r_r4*m_m13 + k02_r_r4*k05_r_r4*k07_r_r4*k10_r_r4*m_m13 + k01_r_r4*k03_r_r4*k05_r_r4*k07_r_r4*m_m2*m_m8 + k01_r_r4*k03_r_r4*k05_r_r4*k09_r_r4*m_m2*m_m8 + k01_r_r4*k03_r_r4*k06_r_r4*k09_r_r4*m_m2*m_m8 + k01_r_r4*k03_r_r4*k07_r_r4*k09_r_r4*m_m2*m_m8 + k01_r_r4*k04_r_r4*k06_r_r4*k08_r_r4*m_m2*m_m9 + k02_r_r4*k04_r_r4*k08_r_r4*k10_r_r4*m_m9*m_m13 + k03_r_r4*k05_r_r4*k07_r_r4*k10_r_r4*m_m8*m_m13 + k02_r_r4*k05_r_r4*k08_r_r4*k10_r_r4*m_m9*m_m13 + k02_r_r4*k06_r_r4*k08_r_r4*k10_r_r4*m_m9*m_m13 + k04_r_r4*k06_r_r4*k08_r_r4*k10_r_r4*m_m9*m_m13 + k01_r_r4*k03_r_r4*k05_r_r4*k08_r_r4*m_m2*m_m8*m_m9 + k01_r_r4*k03_r_r4*k06_r_r4*k08_r_r4*m_m2*m_m8*m_m9 + k03_r_r4*k05_r_r4*k08_r_r4*k10_r_r4*m_m8*m_m9*m_m13 + k03_r_r4*k06_r_r4*k08_r_r4*k10_r_r4*m_m8*m_m9*m_m13))^n_sub_r_r4 + 1)*(k02_r_r4*k04_r_r4*k06_r_r4*k09_r_r4 + k02_r_r4*k04_r_r4*k07_r_r4*k09_r_r4 + k02_r_r4*k05_r_r4*k07_r_r4*k09_r_r4 + k01_r_r4*k04_r_r4*k06_r_r4*k09_r_r4*m_m2 + k01_r_r4*k04_r_r4*k07_r_r4*k09_r_r4*m_m2 + k01_r_r4*k05_r_r4*k07_r_r4*k09_r_r4*m_m2 + k02_r_r4*k04_r_r4*k06_r_r4*k08_r_r4*m_m9 + k03_r_r4*k05_r_r4*k07_r_r4*k09_r_r4*m_m8 + k02_r_r4*k04_r_r4*k06_r_r4*k10_r_r4*m_m13 + k02_r_r4*k04_r_r4*k07_r_r4*k10_r_r4*m_m13 + k02_r_r4*k05_r_r4*k07_r_r4*k10_r_r4*m_m13 + k01_r_r4*k03_r_r4*k05_r_r4*k07_r_r4*m_m2*m_m8 + k01_r_r4*k03_r_r4*k05_r_r4*k09_r_r4*m_m2*m_m8 + k01_r_r4*k03_r_r4*k06_r_r4*k09_r_r4*m_m2*m_m8 + k01_r_r4*k03_r_r4*k07_r_r4*k09_r_r4*m_m2*m_m8 + k01_r_r4*k04_r_r4*k06_r_r4*k08_r_r4*m_m2*m_m9 + k02_r_r4*k04_r_r4*k08_r_r4*k10_r_r4*m_m9*m_m13 + k03_r_r4*k05_r_r4*k07_r_r4*k10_r_r4*m_m8*m_m13 + k02_r_r4*k05_r_r4*k08_r_r4*k10_r_r4*m_m9*m_m13 + k02_r_r4*k06_r_r4*k08_r_r4*k10_r_r4*m_m9*m_m13 + k04_r_r4*k06_r_r4*k08_r_r4*k10_r_r4*m_m9*m_m13 + k01_r_r4*k03_r_r4*k05_r_r4*k08_r_r4*m_m2*m_m8*m_m9 + k01_r_r4*k03_r_r4*k06_r_r4*k08_r_r4*m_m2*m_m8*m_m9 + k03_r_r4*k05_r_r4*k08_r_r4*k10_r_r4*m_m8*m_m9*m_m13 + k03_r_r4*k06_r_r4*k08_r_r4*k10_r_r4*m_m8*m_m9*m_m13))) - k01_r_r11*m_m8 + n_sub_r_r3*(k01_r_r3*k03_r_r3*k05_r_r3*k07_r_r3*k09_r_r3*m_m1*m_m7 - k02_r_r3*k04_r_r3*k06_r_r3*k08_r_r3*k10_r_r3*m_m8*m_m12)*(k12_r_r3*k14_r_r3*k16_r_r3*k19_r_r3 + k12_r_r3*k14_r_r3*k17_r_r3*k19_r_r3 + k12_r_r3*k15_r_r3*k17_r_r3*k19_r_r3 + k12_r_r3*k14_r_r3*k16_r_r3*k18_r_r3*m_m11 + k13_r_r3*k15_r_r3*k17_r_r3*k19_r_r3*m_m10)/((L_0_r_r3*(Keff_m_m5_r_r3/(Keff_m_m5_r_r3 + m_m5))^n_sub_r_r3*((Keff_m_m9_r_r3 + m_m9)/Keff_m_m9_r_r3)^n_sub_r_r3*((k02_r_r3*k04_r_r3*k06_r_r3*k09_r_r3 + k02_r_r3*k04_r_r3*k07_r_r3*k09_r_r3 + k02_r_r3*k05_r_r3*k07_r_r3*k09_r_r3 + k02_r_r3*k04_r_r3*k06_r_r3*k08_r_r3*m_m8 + k03_r_r3*k05_r_r3*k07_r_r3*k09_r_r3*m_m7)*(k12_r_r3*k14_r_r3*k16_r_r3*k19_r_r3 + k12_r_r3*k14_r_r3*k17_r_r3*k19_r_r3 + k12_r_r3*k15_r_r3*k17_r_r3*k19_r_r3 + k12_r_r3*k14_r_r3*k16_r_r3*k18_r_r3*m_m11 + k13_r_r3*k15_r_r3*k17_r_r3*k19_r_r3*m_m10)/(k02_r_r3*k04_r_r3*k06_r_r3*k09_r_r3*k12_r_r3*k14_r_r3*k16_r_r3*k19_r_r3 + k02_r_r3*k04_r_r3*k06_r_r3*k09_r_r3*k12_r_r3*k14_r_r3*k17_r_r3*k19_r_r3 + k02_r_r3*k04_r_r3*k07_r_r3*k09_r_r3*k12_r_r3*k14_r_r3*k16_r_r3*k19_r_r3 + k02_r_r3*k04_r_r3*k06_r_r3*k09_r_r3*k12_r_r3*k15_r_r3*k17_r_r3*k19_r_r3 + k02_r_r3*k04_r_r3*k07_r_r3*k09_r_r3*k12_r_r3*k14_r_r3*k17_r_r3*k19_r_r3 + k02_r_r3*k05_r_r3*k07_r_r3*k09_r_r3*k12_r_r3*k14_r_r3*k16_r_r3*k19_r_r3 + k02_r_r3*k04_r_r3*k07_r_r3*k09_r_r3*k12_r_r3*k15_r_r3*k17_r_r3*k19_r_r3 + k02_r_r3*k05_r_r3*k07_r_r3*k09_r_r3*k12_r_r3*k14_r_r3*k17_r_r3*k19_r_r3 + k02_r_r3*k05_r_r3*k07_r_r3*k09_r_r3*k12_r_r3*k15_r_r3*k17_r_r3*k19_r_r3 + k01_r_r3*k04_r_r3*k06_r_r3*k09_r_r3*k12_r_r3*k14_r_r3*k16_r_r3*k19_r_r3*m_m1 + k02_r_r3*k04_r_r3*k06_r_r3*k09_r_r3*k11_r_r3*k14_r_r3*k16_r_r3*k19_r_r3*m_m1 + k01_r_r3*k04_r_r3*k06_r_r3*k09_r_r3*k12_r_r3*k14_r_r3*k17_r_r3*k19_r_r3*m_m1 + k01_r_r3*k04_r_r3*k07_r_r3*k09_r_r3*k12_r_r3*k14_r_r3*k16_r_r3*k19_r_r3*m_m1 + k02_r_r3*k04_r_r3*k06_r_r3*k09_r_r3*k11_r_r3*k14_r_r3*k17_r_r3*k19_r_r3*m_m1 + k02_r_r3*k04_r_r3*k07_r_r3*k09_r_r3*k11_r_r3*k14_r_r3*k16_r_r3*k19_r_r3*m_m1 + k01_r_r3*k04_r_r3*k06_r_r3*k09_r_r3*k12_r_r3*k15_r_r3*k17_r_r3*k19_r_r3*m_m1 + k01_r_r3*k04_r_r3*k07_r_r3*k09_r_r3*k12_r_r3*k14_r_r3*k17_r_r3*k19_r_r3*m_m1 + k01_r_r3*k05_r_r3*k07_r_r3*k09_r_r3*k12_r_r3*k14_r_r3*k16_r_r3*k19_r_r3*m_m1 + k02_r_r3*k04_r_r3*k06_r_r3*k09_r_r3*k11_r_r3*k15_r_r3*k17_r_r3*k19_r_r3*m_m1 + k02_r_r3*k04_r_r3*k07_r_r3*k09_r_r3*k11_r_r3*k14_r_r3*k17_r_r3*k19_r_r3*m_m1 + k02_r_r3*k05_r_r3*k07_r_r3*k09_r_r3*k11_r_r3*k14_r_r3*k16_r_r3*k19_r_r3*m_m1 + k01_r_r3*k04_r_r3*k07_r_r3*k09_r_r3*k12_r_r3*k15_r_r3*k17_r_r3*k19_r_r3*m_m1 + k01_r_r3*k05_r_r3*k07_r_r3*k09_r_r3*k12_r_r3*k14_r_r3*k17_r_r3*k19_r_r3*m_m1 + k02_r_r3*k04_r_r3*k07_r_r3*k09_r_r3*k11_r_r3*k15_r_r3*k17_r_r3*k19_r_r3*m_m1 + k02_r_r3*k05_r_r3*k07_r_r3*k09_r_r3*k11_r_r3*k14_r_r3*k17_r_r3*k19_r_r3*m_m1 + k01_r_r3*k05_r_r3*k07_r_r3*k09_r_r3*k12_r_r3*k15_r_r3*k17_r_r3*k19_r_r3*m_m1 + k02_r_r3*k05_r_r3*k07_r_r3*k09_r_r3*k11_r_r3*k15_r_r3*k17_r_r3*k19_r_r3*m_m1 + k02_r_r3*k04_r_r3*k06_r_r3*k08_r_r3*k12_r_r3*k14_r_r3*k16_r_r3*k19_r_r3*m_m8 + k02_r_r3*k04_r_r3*k06_r_r3*k08_r_r3*k12_r_r3*k14_r_r3*k17_r_r3*k19_r_r3*m_m8 + k02_r_r3*k04_r_r3*k06_r_r3*k08_r_r3*k12_r_r3*k15_r_r3*k17_r_r3*k19_r_r3*m_m8 + k02_r_r3*k04_r_r3*k06_r_r3*k09_r_r3*k12_r_r3*k14_r_r3*k16_r_r3*k18_r_r3*m_m11 + k03_r_r3*k05_r_r3*k07_r_r3*k09_r_r3*k12_r_r3*k14_r_r3*k16_r_r3*k19_r_r3*m_m7 + k02_r_r3*k04_r_r3*k07_r_r3*k09_r_r3*k12_r_r3*k14_r_r3*k16_r_r3*k18_r_r3*m_m11 + k03_r_r3*k05_r_r3*k07_r_r3*k09_r_r3*k12_r_r3*k14_r_r3*k17_r_r3*k19_r_r3*m_m7 + k02_r_r3*k05_r_r3*k07_r_r3*k09_r_r3*k12_r_r3*k14_r_r3*k16_r_r3*k18_r_r3*m_m11 + k03_r_r3*k05_r_r3*k07_r_r3*k09_r_r3*k12_r_r3*k15_r_r3*k17_r_r3*k19_r_r3*m_m7 + k02_r_r3*k04_r_r3*k06_r_r3*k09_r_r3*k12_r_r3*k14_r_r3*k16_r_r3*k20_r_r3*m_m12 + k02_r_r3*k04_r_r3*k06_r_r3*k09_r_r3*k13_r_r3*k15_r_r3*k17_r_r3*k19_r_r3*m_m10 + k02_r_r3*k04_r_r3*k06_r_r3*k10_r_r3*k12_r_r3*k14_r_r3*k16_r_r3*k19_r_r3*m_m12 + k02_r_r3*k04_r_r3*k06_r_r3*k09_r_r3*k12_r_r3*k14_r_r3*k17_r_r3*k20_r_r3*m_m12 + k02_r_r3*k04_r_r3*k06_r_r3*k10_r_r3*k12_r_r3*k14_r_r3*k17_r_r3*k19_r_r3*m_m12 + k02_r_r3*k04_r_r3*k07_r_r3*k09_r_r3*k12_r_r3*k14_r_r3*k16_r_r3*k20_r_r3*m_m12 + k02_r_r3*k04_r_r3*k07_r_r3*k09_r_r3*k13_r_r3*k15_r_r3*k17_r_r3*k19_r_r3*m_m10 + k02_r_r3*k04_r_r3*k07_r_r3*k10_r_r3*k12_r_r3*k14_r_r3*k16_r_r3*k19_r_r3*m_m12 + k02_r_r3*k04_r_r3*k06_r_r3*k09_r_r3*k12_r_r3*k15_r_r3*k17_r_r3*k20_r_r3*m_m12 + k02_r_r3*k04_r_r3*k06_r_r3*k10_r_r3*k12_r_r3*k15_r_r3*k17_r_r3*k19_r_r3*m_m12 + k02_r_r3*k04_r_r3*k07_r_r3*k09_r_r3*k12_r_r3*k14_r_r3*k17_r_r3*k20_r_r3*m_m12 + k02_r_r3*k04_r_r3*k07_r_r3*k10_r_r3*k12_r_r3*k14_r_r3*k17_r_r3*k19_r_r3*m_m12 + k02_r_r3*k05_r_r3*k07_r_r3*k09_r_r3*k12_r_r3*k14_r_r3*k16_r_r3*k20_r_r3*m_m12 + k02_r_r3*k05_r_r3*k07_r_r3*k09_r_r3*k13_r_r3*k15_r_r3*k17_r_r3*k19_r_r3*m_m10 + k02_r_r3*k05_r_r3*k07_r_r3*k10_r_r3*k12_r_r3*k14_r_r3*k16_r_r3*k19_r_r3*m_m12 + k02_r_r3*k04_r_r3*k07_r_r3*k09_r_r3*k12_r_r3*k15_r_r3*k17_r_r3*k20_r_r3*m_m12 + k02_r_r3*k04_r_r3*k07_r_r3*k10_r_r3*k12_r_r3*k15_r_r3*k17_r_r3*k19_r_r3*m_m12 + k02_r_r3*k05_r_r3*k07_r_r3*k09_r_r3*k12_r_r3*k14_r_r3*k17_r_r3*k20_r_r3*m_m12 + k02_r_r3*k05_r_r3*k07_r_r3*k10_r_r3*k12_r_r3*k14_r_r3*k17_r_r3*k19_r_r3*m_m12 + k02_r_r3*k05_r_r3*k07_r_r3*k09_r_r3*k12_r_r3*k15_r_r3*k17_r_r3*k20_r_r3*m_m12 + k02_r_r3*k05_r_r3*k07_r_r3*k10_r_r3*k12_r_r3*k15_r_r3*k17_r_r3*k19_r_r3*m_m12 + k01_r_r3*k03_r_r3*k05_r_r3*k07_r_r3*k12_r_r3*k14_r_r3*k16_r_r3*k19_r_r3*m_m1*m_m7 + k01_r_r3*k03_r_r3*k05_r_r3*k07_r_r3*k12_r_r3*k14_r_r3*k17_r_r3*k19_r_r3*m_m1*m_m7 + k01_r_r3*k03_r_r3*k05_r_r3*k07_r_r3*k12_r_r3*k15_r_r3*k17_r_r3*k19_r_r3*m_m1*m_m7 + k01_r_r3*k03_r_r3*k05_r_r3*k09_r_r3*k12_r_r3*k14_r_r3*k16_r_r3*k19_r_r3*m_m1*m_m7 + k01_r_r3*k03_r_r3*k05_r_r3*k09_r_r3*k12_r_r3*k14_r_r3*k17_r_r3*k19_r_r3*m_m1*m_m7 + k01_r_r3*k03_r_r3*k06_r_r3*k09_r_r3*k12_r_r3*k14_r_r3*k16_r_r3*k19_r_r3*m_m1*m_m7 + k02_r_r3*k04_r_r3*k06_r_r3*k09_r_r3*k11_r_r3*k13_r_r3*k15_r_r3*k17_r_r3*m_m1*m_m10 + k01_r_r3*k03_r_r3*k05_r_r3*k09_r_r3*k12_r_r3*k15_r_r3*k17_r_r3*k19_r_r3*m_m1*m_m7 + k01_r_r3*k03_r_r3*k06_r_r3*k09_r_r3*k12_r_r3*k14_r_r3*k17_r_r3*k19_r_r3*m_m1*m_m7 + k01_r_r3*k03_r_r3*k07_r_r3*k09_r_r3*k12_r_r3*k14_r_r3*k16_r_r3*k19_r_r3*m_m1*m_m7 + k01_r_r3*k04_r_r3*k06_r_r3*k08_r_r3*k12_r_r3*k14_r_r3*k16_r_r3*k19_r_r3*m_m1*m_m8 + k02_r_r3*k04_r_r3*k06_r_r3*k08_r_r3*k11_r_r3*k14_r_r3*k16_r_r3*k19_r_r3*m_m1*m_m8 + k02_r_r3*k04_r_r3*k07_r_r3*k09_r_r3*k11_r_r3*k13_r_r3*k15_r_r3*k17_r_r3*m_m1*m_m10 + k01_r_r3*k03_r_r3*k06_r_r3*k09_r_r3*k12_r_r3*k15_r_r3*k17_r_r3*k19_r_r3*m_m1*m_m7 + k01_r_r3*k03_r_r3*k07_r_r3*k09_r_r3*k12_r_r3*k14_r_r3*k17_r_r3*k19_r_r3*m_m1*m_m7 + k01_r_r3*k04_r_r3*k06_r_r3*k08_r_r3*k12_r_r3*k14_r_r3*k17_r_r3*k19_r_r3*m_m1*m_m8 + k02_r_r3*k04_r_r3*k06_r_r3*k08_r_r3*k11_r_r3*k14_r_r3*k17_r_r3*k19_r_r3*m_m1*m_m8 + k02_r_r3*k04_r_r3*k06_r_r3*k09_r_r3*k11_r_r3*k13_r_r3*k15_r_r3*k19_r_r3*m_m1*m_m10 + k02_r_r3*k05_r_r3*k07_r_r3*k09_r_r3*k11_r_r3*k13_r_r3*k15_r_r3*k17_r_r3*m_m1*m_m10 + k01_r_r3*k03_r_r3*k07_r_r3*k09_r_r3*k12_r_r3*k15_r_r3*k17_r_r3*k19_r_r3*m_m1*m_m7 + k01_r_r3*k04_r_r3*k06_r_r3*k08_r_r3*k12_r_r3*k15_r_r3*k17_r_r3*k19_r_r3*m_m1*m_m8 + k02_r_r3*k04_r_r3*k06_r_r3*k08_r_r3*k11_r_r3*k15_r_r3*k17_r_r3*k19_r_r3*m_m1*m_m8 + k02_r_r3*k04_r_r3*k06_r_r3*k09_r_r3*k11_r_r3*k13_r_r3*k16_r_r3*k19_r_r3*m_m1*m_m10 + k02_r_r3*k04_r_r3*k07_r_r3*k09_r_r3*k11_r_r3*k13_r_r3*k15_r_r3*k19_r_r3*m_m1*m_m10 + k01_r_r3*k04_r_r3*k06_r_r3*k09_r_r3*k12_r_r3*k14_r_r3*k16_r_r3*k18_r_r3*m_m1*m_m11 + k02_r_r3*k04_r_r3*k06_r_r3*k09_r_r3*k11_r_r3*k13_r_r3*k17_r_r3*k19_r_r3*m_m1*m_m10 + k02_r_r3*k04_r_r3*k06_r_r3*k09_r_r3*k11_r_r3*k14_r_r3*k16_r_r3*k18_r_r3*m_m1*m_m11 + k02_r_r3*k04_r_r3*k07_r_r3*k09_r_r3*k11_r_r3*k13_r_r3*k16_r_r3*k19_r_r3*m_m1*m_m10 + k02_r_r3*k05_r_r3*k07_r_r3*k09_r_r3*k11_r_r3*k13_r_r3*k15_r_r3*k19_r_r3*m_m1*m_m10 + k03_r_r3*k05_r_r3*k07_r_r3*k09_r_r3*k11_r_r3*k14_r_r3*k16_r_r3*k19_r_r3*m_m1*m_m7 + k01_r_r3*k04_r_r3*k07_r_r3*k09_r_r3*k12_r_r3*k14_r_r3*k16_r_r3*k18_r_r3*m_m1*m_m11 + k02_r_r3*k04_r_r3*k07_r_r3*k09_r_r3*k11_r_r3*k13_r_r3*k17_r_r3*k19_r_r3*m_m1*m_m10 + k02_r_r3*k04_r_r3*k07_r_r3*k09_r_r3*k11_r_r3*k14_r_r3*k16_r_r3*k18_r_r3*m_m1*m_m11 + k02_r_r3*k05_r_r3*k07_r_r3*k09_r_r3*k11_r_r3*k13_r_r3*k16_r_r3*k19_r_r3*m_m1*m_m10 + k03_r_r3*k05_r_r3*k07_r_r3*k09_r_r3*k11_r_r3*k14_r_r3*k17_r_r3*k19_r_r3*m_m1*m_m7 + k01_r_r3*k05_r_r3*k07_r_r3*k09_r_r3*k12_r_r3*k14_r_r3*k16_r_r3*k18_r_r3*m_m1*m_m11 + k02_r_r3*k05_r_r3*k07_r_r3*k09_r_r3*k11_r_r3*k13_r_r3*k17_r_r3*k19_r_r3*m_m1*m_m10 + k02_r_r3*k05_r_r3*k07_r_r3*k09_r_r3*k11_r_r3*k14_r_r3*k16_r_r3*k18_r_r3*m_m1*m_m11 + k03_r_r3*k05_r_r3*k07_r_r3*k09_r_r3*k11_r_r3*k15_r_r3*k17_r_r3*k19_r_r3*m_m1*m_m7 + k01_r_r3*k04_r_r3*k06_r_r3*k09_r_r3*k13_r_r3*k15_r_r3*k17_r_r3*k19_r_r3*m_m1*m_m10 + k01_r_r3*k04_r_r3*k07_r_r3*k09_r_r3*k13_r_r3*k15_r_r3*k17_r_r3*k19_r_r3*m_m1*m_m10 + k01_r_r3*k05_r_r3*k07_r_r3*k09_r_r3*k13_r_r3*k15_r_r3*k17_r_r3*k19_r_r3*m_m1*m_m10 + k02_r_r3*k04_r_r3*k06_r_r3*k08_r_r3*k12_r_r3*k14_r_r3*k16_r_r3*k18_r_r3*m_m8*m_m11 + k02_r_r3*k04_r_r3*k06_r_r3*k08_r_r3*k12_r_r3*k14_r_r3*k16_r_r3*k20_r_r3*m_m8*m_m12 + k02_r_r3*k04_r_r3*k06_r_r3*k08_r_r3*k13_r_r3*k15_r_r3*k17_r_r3*k19_r_r3*m_m8*m_m10 + k03_r_r3*k05_r_r3*k07_r_r3*k09_r_r3*k12_r_r3*k14_r_r3*k16_r_r3*k18_r_r3*m_m7*m_m11 + k02_r_r3*k04_r_r3*k06_r_r3*k08_r_r3*k12_r_r3*k14_r_r3*k17_r_r3*k20_r_r3*m_m8*m_m12 + k02_r_r3*k04_r_r3*k06_r_r3*k08_r_r3*k12_r_r3*k15_r_r3*k17_r_r3*k20_r_r3*m_m8*m_m12 + k02_r_r3*k04_r_r3*k06_r_r3*k10_r_r3*k12_r_r3*k14_r_r3*k16_r_r3*k18_r_r3*m_m11*m_m12 + k02_r_r3*k04_r_r3*k08_r_r3*k10_r_r3*k12_r_r3*k14_r_r3*k16_r_r3*k19_r_r3*m_m8*m_m12 + k03_r_r3*k05_r_r3*k07_r_r3*k09_r_r3*k12_r_r3*k14_r_r3*k16_r_r3*k20_r_r3*m_m7*m_m12 + k03_r_r3*k05_r_r3*k07_r_r3*k09_r_r3*k13_r_r3*k15_r_r3*k17_r_r3*k19_r_r3*m_m7*m_m10 + k03_r_r3*k05_r_r3*k07_r_r3*k10_r_r3*k12_r_r3*k14_r_r3*k16_r_r3*k19_r_r3*m_m7*m_m12 + k02_r_r3*k04_r_r3*k07_r_r3*k10_r_r3*k12_r_r3*k14_r_r3*k16_r_r3*k18_r_r3*m_m11*m_m12 + k02_r_r3*k04_r_r3*k08_r_r3*k10_r_r3*k12_r_r3*k14_r_r3*k17_r_r3*k19_r_r3*m_m8*m_m12 + k02_r_r3*k05_r_r3*k08_r_r3*k10_r_r3*k12_r_r3*k14_r_r3*k16_r_r3*k19_r_r3*m_m8*m_m12 + k03_r_r3*k05_r_r3*k07_r_r3*k09_r_r3*k12_r_r3*k14_r_r3*k17_r_r3*k20_r_r3*m_m7*m_m12 + k03_r_r3*k05_r_r3*k07_r_r3*k10_r_r3*k12_r_r3*k14_r_r3*k17_r_r3*k19_r_r3*m_m7*m_m12 + k02_r_r3*k04_r_r3*k08_r_r3*k10_r_r3*k12_r_r3*k15_r_r3*k17_r_r3*k19_r_r3*m_m8*m_m12 + k02_r_r3*k05_r_r3*k07_r_r3*k10_r_r3*k12_r_r3*k14_r_r3*k16_r_r3*k18_r_r3*m_m11*m_m12 + k02_r_r3*k05_r_r3*k08_r_r3*k10_r_r3*k12_r_r3*k14_r_r3*k17_r_r3*k19_r_r3*m_m8*m_m12 + k02_r_r3*k06_r_r3*k08_r_r3*k10_r_r3*k12_r_r3*k14_r_r3*k16_r_r3*k19_r_r3*m_m8*m_m12 + k03_r_r3*k05_r_r3*k07_r_r3*k09_r_r3*k12_r_r3*k15_r_r3*k17_r_r3*k20_r_r3*m_m7*m_m12 + k03_r_r3*k05_r_r3*k07_r_r3*k10_r_r3*k12_r_r3*k15_r_r3*k17_r_r3*k19_r_r3*m_m7*m_m12 + k02_r_r3*k04_r_r3*k06_r_r3*k09_r_r3*k12_r_r3*k14_r_r3*k18_r_r3*k20_r_r3*m_m11*m_m12 + k02_r_r3*k04_r_r3*k06_r_r3*k09_r_r3*k13_r_r3*k15_r_r3*k17_r_r3*k20_r_r3*m_m10*m_m12 + k02_r_r3*k04_r_r3*k06_r_r3*k10_r_r3*k13_r_r3*k15_r_r3*k17_r_r3*k19_r_r3*m_m10*m_m12 + k02_r_r3*k05_r_r3*k08_r_r3*k10_r_r3*k12_r_r3*k15_r_r3*k17_r_r3*k19_r_r3*m_m8*m_m12 + k02_r_r3*k06_r_r3*k08_r_r3*k10_r_r3*k12_r_r3*k14_r_r3*k17_r_r3*k19_r_r3*m_m8*m_m12 + k02_r_r3*k04_r_r3*k06_r_r3*k09_r_r3*k12_r_r3*k15_r_r3*k18_r_r3*k20_r_r3*m_m11*m_m12 + k02_r_r3*k04_r_r3*k07_r_r3*k09_r_r3*k12_r_r3*k14_r_r3*k18_r_r3*k20_r_r3*m_m11*m_m12 + k02_r_r3*k04_r_r3*k07_r_r3*k09_r_r3*k13_r_r3*k15_r_r3*k17_r_r3*k20_r_r3*m_m10*m_m12 + k02_r_r3*k04_r_r3*k07_r_r3*k10_r_r3*k13_r_r3*k15_r_r3*k17_r_r3*k19_r_r3*m_m10*m_m12 + k02_r_r3*k06_r_r3*k08_r_r3*k10_r_r3*k12_r_r3*k15_r_r3*k17_r_r3*k19_r_r3*m_m8*m_m12 + k04_r_r3*k06_r_r3*k08_r_r3*k10_r_r3*k12_r_r3*k14_r_r3*k16_r_r3*k19_r_r3*m_m8*m_m12 + k02_r_r3*k04_r_r3*k06_r_r3*k09_r_r3*k12_r_r3*k16_r_r3*k18_r_r3*k20_r_r3*m_m11*m_m12 + k02_r_r3*k04_r_r3*k07_r_r3*k09_r_r3*k12_r_r3*k15_r_r3*k18_r_r3*k20_r_r3*m_m11*m_m12 + k02_r_r3*k05_r_r3*k07_r_r3*k09_r_r3*k12_r_r3*k14_r_r3*k18_r_r3*k20_r_r3*m_m11*m_m12 + k02_r_r3*k05_r_r3*k07_r_r3*k09_r_r3*k13_r_r3*k15_r_r3*k17_r_r3*k20_r_r3*m_m10*m_m12 + k02_r_r3*k05_r_r3*k07_r_r3*k10_r_r3*k13_r_r3*k15_r_r3*k17_r_r3*k19_r_r3*m_m10*m_m12 + k04_r_r3*k06_r_r3*k08_r_r3*k10_r_r3*k12_r_r3*k14_r_r3*k17_r_r3*k19_r_r3*m_m8*m_m12 + k02_r_r3*k04_r_r3*k07_r_r3*k09_r_r3*k12_r_r3*k16_r_r3*k18_r_r3*k20_r_r3*m_m11*m_m12 + k02_r_r3*k05_r_r3*k07_r_r3*k09_r_r3*k12_r_r3*k15_r_r3*k18_r_r3*k20_r_r3*m_m11*m_m12 + k04_r_r3*k06_r_r3*k08_r_r3*k10_r_r3*k12_r_r3*k15_r_r3*k17_r_r3*k19_r_r3*m_m8*m_m12 + k02_r_r3*k04_r_r3*k06_r_r3*k09_r_r3*k14_r_r3*k16_r_r3*k18_r_r3*k20_r_r3*m_m11*m_m12 + k02_r_r3*k05_r_r3*k07_r_r3*k09_r_r3*k12_r_r3*k16_r_r3*k18_r_r3*k20_r_r3*m_m11*m_m12 + k02_r_r3*k04_r_r3*k07_r_r3*k09_r_r3*k14_r_r3*k16_r_r3*k18_r_r3*k20_r_r3*m_m11*m_m12 + k02_r_r3*k05_r_r3*k07_r_r3*k09_r_r3*k14_r_r3*k16_r_r3*k18_r_r3*k20_r_r3*m_m11*m_m12 + k01_r_r3*k03_r_r3*k05_r_r3*k08_r_r3*k12_r_r3*k14_r_r3*k16_r_r3*k19_r_r3*m_m1*m_m7*m_m8 + k01_r_r3*k03_r_r3*k05_r_r3*k07_r_r3*k12_r_r3*k14_r_r3*k16_r_r3*k18_r_r3*m_m1*m_m7*m_m11 + k01_r_r3*k03_r_r3*k05_r_r3*k08_r_r3*k12_r_r3*k14_r_r3*k17_r_r3*k19_r_r3*m_m1*m_m7*m_m8 + k01_r_r3*k03_r_r3*k06_r_r3*k08_r_r3*k12_r_r3*k14_r_r3*k16_r_r3*k19_r_r3*m_m1*m_m7*m_m8 + k02_r_r3*k04_r_r3*k06_r_r3*k08_r_r3*k11_r_r3*k13_r_r3*k15_r_r3*k17_r_r3*m_m1*m_m8*m_m10 + k01_r_r3*k03_r_r3*k05_r_r3*k08_r_r3*k12_r_r3*k15_r_r3*k17_r_r3*k19_r_r3*m_m1*m_m7*m_m8 + k01_r_r3*k03_r_r3*k06_r_r3*k08_r_r3*k12_r_r3*k14_r_r3*k17_r_r3*k19_r_r3*m_m1*m_m7*m_m8 + k01_r_r3*k03_r_r3*k05_r_r3*k09_r_r3*k12_r_r3*k14_r_r3*k16_r_r3*k18_r_r3*m_m1*m_m7*m_m11 + k01_r_r3*k03_r_r3*k06_r_r3*k08_r_r3*k12_r_r3*k15_r_r3*k17_r_r3*k19_r_r3*m_m1*m_m7*m_m8 + k02_r_r3*k04_r_r3*k06_r_r3*k08_r_r3*k11_r_r3*k13_r_r3*k15_r_r3*k19_r_r3*m_m1*m_m8*m_m10 + k01_r_r3*k03_r_r3*k05_r_r3*k07_r_r3*k13_r_r3*k15_r_r3*k17_r_r3*k19_r_r3*m_m1*m_m7*m_m10 + k01_r_r3*k03_r_r3*k06_r_r3*k09_r_r3*k12_r_r3*k14_r_r3*k16_r_r3*k18_r_r3*m_m1*m_m7*m_m11 + k02_r_r3*k04_r_r3*k06_r_r3*k08_r_r3*k11_r_r3*k13_r_r3*k16_r_r3*k19_r_r3*m_m1*m_m8*m_m10 + k03_r_r3*k05_r_r3*k07_r_r3*k09_r_r3*k11_r_r3*k13_r_r3*k15_r_r3*k17_r_r3*m_m1*m_m7*m_m10 + k01_r_r3*k03_r_r3*k07_r_r3*k09_r_r3*k12_r_r3*k14_r_r3*k16_r_r3*k18_r_r3*m_m1*m_m7*m_m11 + k01_r_r3*k04_r_r3*k06_r_r3*k08_r_r3*k12_r_r3*k14_r_r3*k16_r_r3*k18_r_r3*m_m1*m_m8*m_m11 + k02_r_r3*k04_r_r3*k06_r_r3*k08_r_r3*k11_r_r3*k13_r_r3*k17_r_r3*k19_r_r3*m_m1*m_m8*m_m10 + k02_r_r3*k04_r_r3*k06_r_r3*k08_r_r3*k11_r_r3*k14_r_r3*k16_r_r3*k18_r_r3*m_m1*m_m8*m_m11 + k01_r_r3*k03_r_r3*k05_r_r3*k09_r_r3*k13_r_r3*k15_r_r3*k17_r_r3*k19_r_r3*m_m1*m_m7*m_m10 + k02_r_r3*k04_r_r3*k06_r_r3*k09_r_r3*k11_r_r3*k13_r_r3*k15_r_r3*k18_r_r3*m_m1*m_m10*m_m11 + k03_r_r3*k05_r_r3*k07_r_r3*k09_r_r3*k11_r_r3*k13_r_r3*k15_r_r3*k19_r_r3*m_m1*m_m7*m_m10 + k01_r_r3*k03_r_r3*k06_r_r3*k09_r_r3*k13_r_r3*k15_r_r3*k17_r_r3*k19_r_r3*m_m1*m_m7*m_m10 + k02_r_r3*k04_r_r3*k06_r_r3*k09_r_r3*k11_r_r3*k13_r_r3*k16_r_r3*k18_r_r3*m_m1*m_m10*m_m11 + k02_r_r3*k04_r_r3*k07_r_r3*k09_r_r3*k11_r_r3*k13_r_r3*k15_r_r3*k18_r_r3*m_m1*m_m10*m_m11 + k03_r_r3*k05_r_r3*k07_r_r3*k09_r_r3*k11_r_r3*k13_r_r3*k16_r_r3*k19_r_r3*m_m1*m_m7*m_m10 + k01_r_r3*k03_r_r3*k07_r_r3*k09_r_r3*k13_r_r3*k15_r_r3*k17_r_r3*k19_r_r3*m_m1*m_m7*m_m10 + k01_r_r3*k04_r_r3*k06_r_r3*k08_r_r3*k13_r_r3*k15_r_r3*k17_r_r3*k19_r_r3*m_m1*m_m8*m_m10 + k02_r_r3*k04_r_r3*k07_r_r3*k09_r_r3*k11_r_r3*k13_r_r3*k16_r_r3*k18_r_r3*m_m1*m_m10*m_m11 + k02_r_r3*k05_r_r3*k07_r_r3*k09_r_r3*k11_r_r3*k13_r_r3*k15_r_r3*k18_r_r3*m_m1*m_m10*m_m11 + k03_r_r3*k05_r_r3*k07_r_r3*k09_r_r3*k11_r_r3*k13_r_r3*k17_r_r3*k19_r_r3*m_m1*m_m7*m_m10 + k03_r_r3*k05_r_r3*k07_r_r3*k09_r_r3*k11_r_r3*k14_r_r3*k16_r_r3*k18_r_r3*m_m1*m_m7*m_m11 + k02_r_r3*k05_r_r3*k07_r_r3*k09_r_r3*k11_r_r3*k13_r_r3*k16_r_r3*k18_r_r3*m_m1*m_m10*m_m11 + k03_r_r3*k05_r_r3*k08_r_r3*k10_r_r3*k12_r_r3*k14_r_r3*k16_r_r3*k19_r_r3*m_m7*m_m8*m_m12 + k02_r_r3*k04_r_r3*k06_r_r3*k08_r_r3*k12_r_r3*k14_r_r3*k18_r_r3*k20_r_r3*m_m8*m_m11*m_m12 + k02_r_r3*k04_r_r3*k06_r_r3*k08_r_r3*k13_r_r3*k15_r_r3*k17_r_r3*k20_r_r3*m_m8*m_m10*m_m12 + k02_r_r3*k04_r_r3*k08_r_r3*k10_r_r3*k12_r_r3*k14_r_r3*k16_r_r3*k18_r_r3*m_m8*m_m11*m_m12 + k03_r_r3*k05_r_r3*k07_r_r3*k10_r_r3*k12_r_r3*k14_r_r3*k16_r_r3*k18_r_r3*m_m7*m_m11*m_m12 + k03_r_r3*k05_r_r3*k08_r_r3*k10_r_r3*k12_r_r3*k14_r_r3*k17_r_r3*k19_r_r3*m_m7*m_m8*m_m12 + k03_r_r3*k06_r_r3*k08_r_r3*k10_r_r3*k12_r_r3*k14_r_r3*k16_r_r3*k19_r_r3*m_m7*m_m8*m_m12 + k02_r_r3*k04_r_r3*k06_r_r3*k08_r_r3*k12_r_r3*k15_r_r3*k18_r_r3*k20_r_r3*m_m8*m_m11*m_m12 + k02_r_r3*k05_r_r3*k08_r_r3*k10_r_r3*k12_r_r3*k14_r_r3*k16_r_r3*k18_r_r3*m_m8*m_m11*m_m12 + k03_r_r3*k05_r_r3*k08_r_r3*k10_r_r3*k12_r_r3*k15_r_r3*k17_r_r3*k19_r_r3*m_m7*m_m8*m_m12 + k03_r_r3*k06_r_r3*k08_r_r3*k10_r_r3*k12_r_r3*k14_r_r3*k17_r_r3*k19_r_r3*m_m7*m_m8*m_m12 + k02_r_r3*k04_r_r3*k06_r_r3*k08_r_r3*k12_r_r3*k16_r_r3*k18_r_r3*k20_r_r3*m_m8*m_m11*m_m12 + k02_r_r3*k06_r_r3*k08_r_r3*k10_r_r3*k12_r_r3*k14_r_r3*k16_r_r3*k18_r_r3*m_m8*m_m11*m_m12 + k03_r_r3*k06_r_r3*k08_r_r3*k10_r_r3*k12_r_r3*k15_r_r3*k17_r_r3*k19_r_r3*m_m7*m_m8*m_m12 + k02_r_r3*k04_r_r3*k08_r_r3*k10_r_r3*k13_r_r3*k15_r_r3*k17_r_r3*k19_r_r3*m_m8*m_m10*m_m12 + k03_r_r3*k05_r_r3*k07_r_r3*k09_r_r3*k12_r_r3*k14_r_r3*k18_r_r3*k20_r_r3*m_m7*m_m11*m_m12 + k03_r_r3*k05_r_r3*k07_r_r3*k09_r_r3*k13_r_r3*k15_r_r3*k17_r_r3*k20_r_r3*m_m7*m_m10*m_m12 + k03_r_r3*k05_r_r3*k07_r_r3*k10_r_r3*k13_r_r3*k15_r_r3*k17_r_r3*k19_r_r3*m_m7*m_m10*m_m12 + k02_r_r3*k04_r_r3*k06_r_r3*k08_r_r3*k14_r_r3*k16_r_r3*k18_r_r3*k20_r_r3*m_m8*m_m11*m_m12 + k02_r_r3*k05_r_r3*k08_r_r3*k10_r_r3*k13_r_r3*k15_r_r3*k17_r_r3*k19_r_r3*m_m8*m_m10*m_m12 + k03_r_r3*k05_r_r3*k07_r_r3*k09_r_r3*k12_r_r3*k15_r_r3*k18_r_r3*k20_r_r3*m_m7*m_m11*m_m12 + k04_r_r3*k06_r_r3*k08_r_r3*k10_r_r3*k12_r_r3*k14_r_r3*k16_r_r3*k18_r_r3*m_m8*m_m11*m_m12 + k02_r_r3*k04_r_r3*k06_r_r3*k09_r_r3*k13_r_r3*k15_r_r3*k18_r_r3*k20_r_r3*m_m10*m_m11*m_m12 + k02_r_r3*k06_r_r3*k08_r_r3*k10_r_r3*k13_r_r3*k15_r_r3*k17_r_r3*k19_r_r3*m_m8*m_m10*m_m12 + k03_r_r3*k05_r_r3*k07_r_r3*k09_r_r3*k12_r_r3*k16_r_r3*k18_r_r3*k20_r_r3*m_m7*m_m11*m_m12 + k02_r_r3*k04_r_r3*k06_r_r3*k09_r_r3*k13_r_r3*k16_r_r3*k18_r_r3*k20_r_r3*m_m10*m_m11*m_m12 + k02_r_r3*k04_r_r3*k07_r_r3*k09_r_r3*k13_r_r3*k15_r_r3*k18_r_r3*k20_r_r3*m_m10*m_m11*m_m12 + k02_r_r3*k04_r_r3*k07_r_r3*k09_r_r3*k13_r_r3*k16_r_r3*k18_r_r3*k20_r_r3*m_m10*m_m11*m_m12 + k02_r_r3*k05_r_r3*k07_r_r3*k09_r_r3*k13_r_r3*k15_r_r3*k18_r_r3*k20_r_r3*m_m10*m_m11*m_m12 + k03_r_r3*k05_r_r3*k07_r_r3*k09_r_r3*k14_r_r3*k16_r_r3*k18_r_r3*k20_r_r3*m_m7*m_m11*m_m12 + k04_r_r3*k06_r_r3*k08_r_r3*k10_r_r3*k13_r_r3*k15_r_r3*k17_r_r3*k19_r_r3*m_m8*m_m10*m_m12 + k02_r_r3*k05_r_r3*k07_r_r3*k09_r_r3*k13_r_r3*k16_r_r3*k18_r_r3*k20_r_r3*m_m10*m_m11*m_m12 + k01_r_r3*k03_r_r3*k05_r_r3*k08_r_r3*k12_r_r3*k14_r_r3*k16_r_r3*k18_r_r3*m_m1*m_m7*m_m8*m_m11 + k01_r_r3*k03_r_r3*k06_r_r3*k08_r_r3*k12_r_r3*k14_r_r3*k16_r_r3*k18_r_r3*m_m1*m_m7*m_m8*m_m11 + k01_r_r3*k03_r_r3*k05_r_r3*k08_r_r3*k13_r_r3*k15_r_r3*k17_r_r3*k19_r_r3*m_m1*m_m7*m_m8*m_m10 + k02_r_r3*k04_r_r3*k06_r_r3*k08_r_r3*k11_r_r3*k13_r_r3*k15_r_r3*k18_r_r3*m_m1*m_m8*m_m10*m_m11 + k01_r_r3*k03_r_r3*k06_r_r3*k08_r_r3*k13_r_r3*k15_r_r3*k17_r_r3*k19_r_r3*m_m1*m_m7*m_m8*m_m10 + k02_r_r3*k04_r_r3*k06_r_r3*k08_r_r3*k11_r_r3*k13_r_r3*k16_r_r3*k18_r_r3*m_m1*m_m8*m_m10*m_m11 + k03_r_r3*k05_r_r3*k07_r_r3*k09_r_r3*k11_r_r3*k13_r_r3*k15_r_r3*k18_r_r3*m_m1*m_m7*m_m10*m_m11 + k03_r_r3*k05_r_r3*k07_r_r3*k09_r_r3*k11_r_r3*k13_r_r3*k16_r_r3*k18_r_r3*m_m1*m_m7*m_m10*m_m11 + k03_r_r3*k05_r_r3*k08_r_r3*k10_r_r3*k12_r_r3*k14_r_r3*k16_r_r3*k18_r_r3*m_m7*m_m8*m_m11*m_m12 + k03_r_r3*k06_r_r3*k08_r_r3*k10_r_r3*k12_r_r3*k14_r_r3*k16_r_r3*k18_r_r3*m_m7*m_m8*m_m11*m_m12 + k02_r_r3*k04_r_r3*k06_r_r3*k08_r_r3*k13_r_r3*k15_r_r3*k18_r_r3*k20_r_r3*m_m8*m_m10*m_m11*m_m12 + k03_r_r3*k05_r_r3*k08_r_r3*k10_r_r3*k13_r_r3*k15_r_r3*k17_r_r3*k19_r_r3*m_m7*m_m8*m_m10*m_m12 + k02_r_r3*k04_r_r3*k06_r_r3*k08_r_r3*k13_r_r3*k16_r_r3*k18_r_r3*k20_r_r3*m_m8*m_m10*m_m11*m_m12 + k03_r_r3*k06_r_r3*k08_r_r3*k10_r_r3*k13_r_r3*k15_r_r3*k17_r_r3*k19_r_r3*m_m7*m_m8*m_m10*m_m12 + k03_r_r3*k05_r_r3*k07_r_r3*k09_r_r3*k13_r_r3*k15_r_r3*k18_r_r3*k20_r_r3*m_m7*m_m10*m_m11*m_m12 + k03_r_r3*k05_r_r3*k07_r_r3*k09_r_r3*k13_r_r3*k16_r_r3*k18_r_r3*k20_r_r3*m_m7*m_m10*m_m11*m_m12))^n_sub_r_r3 + 1)*(k02_r_r3*k04_r_r3*k06_r_r3*k09_r_r3*k12_r_r3*k14_r_r3*k16_r_r3*k19_r_r3 + k02_r_r3*k04_r_r3*k06_r_r3*k09_r_r3*k12_r_r3*k14_r_r3*k17_r_r3*k19_r_r3 + k02_r_r3*k04_r_r3*k07_r_r3*k09_r_r3*k12_r_r3*k14_r_r3*k16_r_r3*k19_r_r3 + k02_r_r3*k04_r_r3*k06_r_r3*k09_r_r3*k12_r_r3*k15_r_r3*k17_r_r3*k19_r_r3 + k02_r_r3*k04_r_r3*k07_r_r3*k09_r_r3*k12_r_r3*k14_r_r3*k17_r_r3*k19_r_r3 + k02_r_r3*k05_r_r3*k07_r_r3*k09_r_r3*k12_r_r3*k14_r_r3*k16_r_r3*k19_r_r3 + k02_r_r3*k04_r_r3*k07_r_r3*k09_r_r3*k12_r_r3*k15_r_r3*k17_r_r3*k19_r_r3 + k02_r_r3*k05_r_r3*k07_r_r3*k09_r_r3*k12_r_r3*k14_r_r3*k17_r_r3*k19_r_r3 + k02_r_r3*k05_r_r3*k07_r_r3*k09_r_r3*k12_r_r3*k15_r_r3*k17_r_r3*k19_r_r3 + k01_r_r3*k04_r_r3*k06_r_r3*k09_r_r3*k12_r_r3*k14_r_r3*k16_r_r3*k19_r_r3*m_m1 + k02_r_r3*k04_r_r3*k06_r_r3*k09_r_r3*k11_r_r3*k14_r_r3*k16_r_r3*k19_r_r3*m_m1 + k01_r_r3*k04_r_r3*k06_r_r3*k09_r_r3*k12_r_r3*k14_r_r3*k17_r_r3*k19_r_r3*m_m1 + k01_r_r3*k04_r_r3*k07_r_r3*k09_r_r3*k12_r_r3*k14_r_r3*k16_r_r3*k19_r_r3*m_m1 + k02_r_r3*k04_r_r3*k06_r_r3*k09_r_r3*k11_r_r3*k14_r_r3*k17_r_r3*k19_r_r3*m_m1 + k02_r_r3*k04_r_r3*k07_r_r3*k09_r_r3*k11_r_r3*k14_r_r3*k16_r_r3*k19_r_r3*m_m1 + k01_r_r3*k04_r_r3*k06_r_r3*k09_r_r3*k12_r_r3*k15_r_r3*k17_r_r3*k19_r_r3*m_m1 + k01_r_r3*k04_r_r3*k07_r_r3*k09_r_r3*k12_r_r3*k14_r_r3*k17_r_r3*k19_r_r3*m_m1 + k01_r_r3*k05_r_r3*k07_r_r3*k09_r_r3*k12_r_r3*k14_r_r3*k16_r_r3*k19_r_r3*m_m1 + k02_r_r3*k04_r_r3*k06_r_r3*k09_r_r3*k11_r_r3*k15_r_r3*k17_r_r3*k19_r_r3*m_m1 + k02_r_r3*k04_r_r3*k07_r_r3*k09_r_r3*k11_r_r3*k14_r_r3*k17_r_r3*k19_r_r3*m_m1 + k02_r_r3*k05_r_r3*k07_r_r3*k09_r_r3*k11_r_r3*k14_r_r3*k16_r_r3*k19_r_r3*m_m1 + k01_r_r3*k04_r_r3*k07_r_r3*k09_r_r3*k12_r_r3*k15_r_r3*k17_r_r3*k19_r_r3*m_m1 + k01_r_r3*k05_r_r3*k07_r_r3*k09_r_r3*k12_r_r3*k14_r_r3*k17_r_r3*k19_r_r3*m_m1 + k02_r_r3*k04_r_r3*k07_r_r3*k09_r_r3*k11_r_r3*k15_r_r3*k17_r_r3*k19_r_r3*m_m1 + k02_r_r3*k05_r_r3*k07_r_r3*k09_r_r3*k11_r_r3*k14_r_r3*k17_r_r3*k19_r_r3*m_m1 + k01_r_r3*k05_r_r3*k07_r_r3*k09_r_r3*k12_r_r3*k15_r_r3*k17_r_r3*k19_r_r3*m_m1 + k02_r_r3*k05_r_r3*k07_r_r3*k09_r_r3*k11_r_r3*k15_r_r3*k17_r_r3*k19_r_r3*m_m1 + k02_r_r3*k04_r_r3*k06_r_r3*k08_r_r3*k12_r_r3*k14_r_r3*k16_r_r3*k19_r_r3*m_m8 + k02_r_r3*k04_r_r3*k06_r_r3*k08_r_r3*k12_r_r3*k14_r_r3*k17_r_r3*k19_r_r3*m_m8 + k02_r_r3*k04_r_r3*k06_r_r3*k08_r_r3*k12_r_r3*k15_r_r3*k17_r_r3*k19_r_r3*m_m8 + k02_r_r3*k04_r_r3*k06_r_r3*k09_r_r3*k12_r_r3*k14_r_r3*k16_r_r3*k18_r_r3*m_m11 + k03_r_r3*k05_r_r3*k07_r_r3*k09_r_r3*k12_r_r3*k14_r_r3*k16_r_r3*k19_r_r3*m_m7 + k02_r_r3*k04_r_r3*k07_r_r3*k09_r_r3*k12_r_r3*k14_r_r3*k16_r_r3*k18_r_r3*m_m11 + k03_r_r3*k05_r_r3*k07_r_r3*k09_r_r3*k12_r_r3*k14_r_r3*k17_r_r3*k19_r_r3*m_m7 + k02_r_r3*k05_r_r3*k07_r_r3*k09_r_r3*k12_r_r3*k14_r_r3*k16_r_r3*k18_r_r3*m_m11 + k03_r_r3*k05_r_r3*k07_r_r3*k09_r_r3*k12_r_r3*k15_r_r3*k17_r_r3*k19_r_r3*m_m7 + k02_r_r3*k04_r_r3*k06_r_r3*k09_r_r3*k12_r_r3*k14_r_r3*k16_r_r3*k20_r_r3*m_m12 + k02_r_r3*k04_r_r3*k06_r_r3*k09_r_r3*k13_r_r3*k15_r_r3*k17_r_r3*k19_r_r3*m_m10 + k02_r_r3*k04_r_r3*k06_r_r3*k10_r_r3*k12_r_r3*k14_r_r3*k16_r_r3*k19_r_r3*m_m12 + k02_r_r3*k04_r_r3*k06_r_r3*k09_r_r3*k12_r_r3*k14_r_r3*k17_r_r3*k20_r_r3*m_m12 + k02_r_r3*k04_r_r3*k06_r_r3*k10_r_r3*k12_r_r3*k14_r_r3*k17_r_r3*k19_r_r3*m_m12 + k02_r_r3*k04_r_r3*k07_r_r3*k09_r_r3*k12_r_r3*k14_r_r3*k16_r_r3*k20_r_r3*m_m12 + k02_r_r3*k04_r_r3*k07_r_r3*k09_r_r3*k13_r_r3*k15_r_r3*k17_r_r3*k19_r_r3*m_m10 + k02_r_r3*k04_r_r3*k07_r_r3*k10_r_r3*k12_r_r3*k14_r_r3*k16_r_r3*k19_r_r3*m_m12 + k02_r_r3*k04_r_r3*k06_r_r3*k09_r_r3*k12_r_r3*k15_r_r3*k17_r_r3*k20_r_r3*m_m12 + k02_r_r3*k04_r_r3*k06_r_r3*k10_r_r3*k12_r_r3*k15_r_r3*k17_r_r3*k19_r_r3*m_m12 + k02_r_r3*k04_r_r3*k07_r_r3*k09_r_r3*k12_r_r3*k14_r_r3*k17_r_r3*k20_r_r3*m_m12 + k02_r_r3*k04_r_r3*k07_r_r3*k10_r_r3*k12_r_r3*k14_r_r3*k17_r_r3*k19_r_r3*m_m12 + k02_r_r3*k05_r_r3*k07_r_r3*k09_r_r3*k12_r_r3*k14_r_r3*k16_r_r3*k20_r_r3*m_m12 + k02_r_r3*k05_r_r3*k07_r_r3*k09_r_r3*k13_r_r3*k15_r_r3*k17_r_r3*k19_r_r3*m_m10 + k02_r_r3*k05_r_r3*k07_r_r3*k10_r_r3*k12_r_r3*k14_r_r3*k16_r_r3*k19_r_r3*m_m12 + k02_r_r3*k04_r_r3*k07_r_r3*k09_r_r3*k12_r_r3*k15_r_r3*k17_r_r3*k20_r_r3*m_m12 + k02_r_r3*k04_r_r3*k07_r_r3*k10_r_r3*k12_r_r3*k15_r_r3*k17_r_r3*k19_r_r3*m_m12 + k02_r_r3*k05_r_r3*k07_r_r3*k09_r_r3*k12_r_r3*k14_r_r3*k17_r_r3*k20_r_r3*m_m12 + k02_r_r3*k05_r_r3*k07_r_r3*k10_r_r3*k12_r_r3*k14_r_r3*k17_r_r3*k19_r_r3*m_m12 + k02_r_r3*k05_r_r3*k07_r_r3*k09_r_r3*k12_r_r3*k15_r_r3*k17_r_r3*k20_r_r3*m_m12 + k02_r_r3*k05_r_r3*k07_r_r3*k10_r_r3*k12_r_r3*k15_r_r3*k17_r_r3*k19_r_r3*m_m12 + k01_r_r3*k03_r_r3*k05_r_r3*k07_r_r3*k12_r_r3*k14_r_r3*k16_r_r3*k19_r_r3*m_m1*m_m7 + k01_r_r3*k03_r_r3*k05_r_r3*k07_r_r3*k12_r_r3*k14_r_r3*k17_r_r3*k19_r_r3*m_m1*m_m7 + k01_r_r3*k03_r_r3*k05_r_r3*k07_r_r3*k12_r_r3*k15_r_r3*k17_r_r3*k19_r_r3*m_m1*m_m7 + k01_r_r3*k03_r_r3*k05_r_r3*k09_r_r3*k12_r_r3*k14_r_r3*k16_r_r3*k19_r_r3*m_m1*m_m7 + k01_r_r3*k03_r_r3*k05_r_r3*k09_r_r3*k12_r_r3*k14_r_r3*k17_r_r3*k19_r_r3*m_m1*m_m7 + k01_r_r3*k03_r_r3*k06_r_r3*k09_r_r3*k12_r_r3*k14_r_r3*k16_r_r3*k19_r_r3*m_m1*m_m7 + k02_r_r3*k04_r_r3*k06_r_r3*k09_r_r3*k11_r_r3*k13_r_r3*k15_r_r3*k17_r_r3*m_m1*m_m10 + k01_r_r3*k03_r_r3*k05_r_r3*k09_r_r3*k12_r_r3*k15_r_r3*k17_r_r3*k19_r_r3*m_m1*m_m7 + k01_r_r3*k03_r_r3*k06_r_r3*k09_r_r3*k12_r_r3*k14_r_r3*k17_r_r3*k19_r_r3*m_m1*m_m7 + k01_r_r3*k03_r_r3*k07_r_r3*k09_r_r3*k12_r_r3*k14_r_r3*k16_r_r3*k19_r_r3*m_m1*m_m7 + k01_r_r3*k04_r_r3*k06_r_r3*k08_r_r3*k12_r_r3*k14_r_r3*k16_r_r3*k19_r_r3*m_m1*m_m8 + k02_r_r3*k04_r_r3*k06_r_r3*k08_r_r3*k11_r_r3*k14_r_r3*k16_r_r3*k19_r_r3*m_m1*m_m8 + k02_r_r3*k04_r_r3*k07_r_r3*k09_r_r3*k11_r_r3*k13_r_r3*k15_r_r3*k17_r_r3*m_m1*m_m10 + k01_r_r3*k03_r_r3*k06_r_r3*k09_r_r3*k12_r_r3*k15_r_r3*k17_r_r3*k19_r_r3*m_m1*m_m7 + k01_r_r3*k03_r_r3*k07_r_r3*k09_r_r3*k12_r_r3*k14_r_r3*k17_r_r3*k19_r_r3*m_m1*m_m7 + k01_r_r3*k04_r_r3*k06_r_r3*k08_r_r3*k12_r_r3*k14_r_r3*k17_r_r3*k19_r_r3*m_m1*m_m8 + k02_r_r3*k04_r_r3*k06_r_r3*k08_r_r3*k11_r_r3*k14_r_r3*k17_r_r3*k19_r_r3*m_m1*m_m8 + k02_r_r3*k04_r_r3*k06_r_r3*k09_r_r3*k11_r_r3*k13_r_r3*k15_r_r3*k19_r_r3*m_m1*m_m10 + k02_r_r3*k05_r_r3*k07_r_r3*k09_r_r3*k11_r_r3*k13_r_r3*k15_r_r3*k17_r_r3*m_m1*m_m10 + k01_r_r3*k03_r_r3*k07_r_r3*k09_r_r3*k12_r_r3*k15_r_r3*k17_r_r3*k19_r_r3*m_m1*m_m7 + k01_r_r3*k04_r_r3*k06_r_r3*k08_r_r3*k12_r_r3*k15_r_r3*k17_r_r3*k19_r_r3*m_m1*m_m8 + k02_r_r3*k04_r_r3*k06_r_r3*k08_r_r3*k11_r_r3*k15_r_r3*k17_r_r3*k19_r_r3*m_m1*m_m8 + k02_r_r3*k04_r_r3*k06_r_r3*k09_r_r3*k11_r_r3*k13_r_r3*k16_r_r3*k19_r_r3*m_m1*m_m10 + k02_r_r3*k04_r_r3*k07_r_r3*k09_r_r3*k11_r_r3*k13_r_r3*k15_r_r3*k19_r_r3*m_m1*m_m10 + k01_r_r3*k04_r_r3*k06_r_r3*k09_r_r3*k12_r_r3*k14_r_r3*k16_r_r3*k18_r_r3*m_m1*m_m11 + k02_r_r3*k04_r_r3*k06_r_r3*k09_r_r3*k11_r_r3*k13_r_r3*k17_r_r3*k19_r_r3*m_m1*m_m10 + k02_r_r3*k04_r_r3*k06_r_r3*k09_r_r3*k11_r_r3*k14_r_r3*k16_r_r3*k18_r_r3*m_m1*m_m11 + k02_r_r3*k04_r_r3*k07_r_r3*k09_r_r3*k11_r_r3*k13_r_r3*k16_r_r3*k19_r_r3*m_m1*m_m10 + k02_r_r3*k05_r_r3*k07_r_r3*k09_r_r3*k11_r_r3*k13_r_r3*k15_r_r3*k19_r_r3*m_m1*m_m10 + k03_r_r3*k05_r_r3*k07_r_r3*k09_r_r3*k11_r_r3*k14_r_r3*k16_r_r3*k19_r_r3*m_m1*m_m7 + k01_r_r3*k04_r_r3*k07_r_r3*k09_r_r3*k12_r_r3*k14_r_r3*k16_r_r3*k18_r_r3*m_m1*m_m11 + k02_r_r3*k04_r_r3*k07_r_r3*k09_r_r3*k11_r_r3*k13_r_r3*k17_r_r3*k19_r_r3*m_m1*m_m10 + k02_r_r3*k04_r_r3*k07_r_r3*k09_r_r3*k11_r_r3*k14_r_r3*k16_r_r3*k18_r_r3*m_m1*m_m11 + k02_r_r3*k05_r_r3*k07_r_r3*k09_r_r3*k11_r_r3*k13_r_r3*k16_r_r3*k19_r_r3*m_m1*m_m10 + k03_r_r3*k05_r_r3*k07_r_r3*k09_r_r3*k11_r_r3*k14_r_r3*k17_r_r3*k19_r_r3*m_m1*m_m7 + k01_r_r3*k05_r_r3*k07_r_r3*k09_r_r3*k12_r_r3*k14_r_r3*k16_r_r3*k18_r_r3*m_m1*m_m11 + k02_r_r3*k05_r_r3*k07_r_r3*k09_r_r3*k11_r_r3*k13_r_r3*k17_r_r3*k19_r_r3*m_m1*m_m10 + k02_r_r3*k05_r_r3*k07_r_r3*k09_r_r3*k11_r_r3*k14_r_r3*k16_r_r3*k18_r_r3*m_m1*m_m11 + k03_r_r3*k05_r_r3*k07_r_r3*k09_r_r3*k11_r_r3*k15_r_r3*k17_r_r3*k19_r_r3*m_m1*m_m7 + k01_r_r3*k04_r_r3*k06_r_r3*k09_r_r3*k13_r_r3*k15_r_r3*k17_r_r3*k19_r_r3*m_m1*m_m10 + k01_r_r3*k04_r_r3*k07_r_r3*k09_r_r3*k13_r_r3*k15_r_r3*k17_r_r3*k19_r_r3*m_m1*m_m10 + k01_r_r3*k05_r_r3*k07_r_r3*k09_r_r3*k13_r_r3*k15_r_r3*k17_r_r3*k19_r_r3*m_m1*m_m10 + k02_r_r3*k04_r_r3*k06_r_r3*k08_r_r3*k12_r_r3*k14_r_r3*k16_r_r3*k18_r_r3*m_m8*m_m11 + k02_r_r3*k04_r_r3*k06_r_r3*k08_r_r3*k12_r_r3*k14_r_r3*k16_r_r3*k20_r_r3*m_m8*m_m12 + k02_r_r3*k04_r_r3*k06_r_r3*k08_r_r3*k13_r_r3*k15_r_r3*k17_r_r3*k19_r_r3*m_m8*m_m10 + k03_r_r3*k05_r_r3*k07_r_r3*k09_r_r3*k12_r_r3*k14_r_r3*k16_r_r3*k18_r_r3*m_m7*m_m11 + k02_r_r3*k04_r_r3*k06_r_r3*k08_r_r3*k12_r_r3*k14_r_r3*k17_r_r3*k20_r_r3*m_m8*m_m12 + k02_r_r3*k04_r_r3*k06_r_r3*k08_r_r3*k12_r_r3*k15_r_r3*k17_r_r3*k20_r_r3*m_m8*m_m12 + k02_r_r3*k04_r_r3*k06_r_r3*k10_r_r3*k12_r_r3*k14_r_r3*k16_r_r3*k18_r_r3*m_m11*m_m12 + k02_r_r3*k04_r_r3*k08_r_r3*k10_r_r3*k12_r_r3*k14_r_r3*k16_r_r3*k19_r_r3*m_m8*m_m12 + k03_r_r3*k05_r_r3*k07_r_r3*k09_r_r3*k12_r_r3*k14_r_r3*k16_r_r3*k20_r_r3*m_m7*m_m12 + k03_r_r3*k05_r_r3*k07_r_r3*k09_r_r3*k13_r_r3*k15_r_r3*k17_r_r3*k19_r_r3*m_m7*m_m10 + k03_r_r3*k05_r_r3*k07_r_r3*k10_r_r3*k12_r_r3*k14_r_r3*k16_r_r3*k19_r_r3*m_m7*m_m12 + k02_r_r3*k04_r_r3*k07_r_r3*k10_r_r3*k12_r_r3*k14_r_r3*k16_r_r3*k18_r_r3*m_m11*m_m12 + k02_r_r3*k04_r_r3*k08_r_r3*k10_r_r3*k12_r_r3*k14_r_r3*k17_r_r3*k19_r_r3*m_m8*m_m12 + k02_r_r3*k05_r_r3*k08_r_r3*k10_r_r3*k12_r_r3*k14_r_r3*k16_r_r3*k19_r_r3*m_m8*m_m12 + k03_r_r3*k05_r_r3*k07_r_r3*k09_r_r3*k12_r_r3*k14_r_r3*k17_r_r3*k20_r_r3*m_m7*m_m12 + k03_r_r3*k05_r_r3*k07_r_r3*k10_r_r3*k12_r_r3*k14_r_r3*k17_r_r3*k19_r_r3*m_m7*m_m12 + k02_r_r3*k04_r_r3*k08_r_r3*k10_r_r3*k12_r_r3*k15_r_r3*k17_r_r3*k19_r_r3*m_m8*m_m12 + k02_r_r3*k05_r_r3*k07_r_r3*k10_r_r3*k12_r_r3*k14_r_r3*k16_r_r3*k18_r_r3*m_m11*m_m12 + k02_r_r3*k05_r_r3*k08_r_r3*k10_r_r3*k12_r_r3*k14_r_r3*k17_r_r3*k19_r_r3*m_m8*m_m12 + k02_r_r3*k06_r_r3*k08_r_r3*k10_r_r3*k12_r_r3*k14_r_r3*k16_r_r3*k19_r_r3*m_m8*m_m12 + k03_r_r3*k05_r_r3*k07_r_r3*k09_r_r3*k12_r_r3*k15_r_r3*k17_r_r3*k20_r_r3*m_m7*m_m12 + k03_r_r3*k05_r_r3*k07_r_r3*k10_r_r3*k12_r_r3*k15_r_r3*k17_r_r3*k19_r_r3*m_m7*m_m12 + k02_r_r3*k04_r_r3*k06_r_r3*k09_r_r3*k12_r_r3*k14_r_r3*k18_r_r3*k20_r_r3*m_m11*m_m12 + k02_r_r3*k04_r_r3*k06_r_r3*k09_r_r3*k13_r_r3*k15_r_r3*k17_r_r3*k20_r_r3*m_m10*m_m12 + k02_r_r3*k04_r_r3*k06_r_r3*k10_r_r3*k13_r_r3*k15_r_r3*k17_r_r3*k19_r_r3*m_m10*m_m12 + k02_r_r3*k05_r_r3*k08_r_r3*k10_r_r3*k12_r_r3*k15_r_r3*k17_r_r3*k19_r_r3*m_m8*m_m12 + k02_r_r3*k06_r_r3*k08_r_r3*k10_r_r3*k12_r_r3*k14_r_r3*k17_r_r3*k19_r_r3*m_m8*m_m12 + k02_r_r3*k04_r_r3*k06_r_r3*k09_r_r3*k12_r_r3*k15_r_r3*k18_r_r3*k20_r_r3*m_m11*m_m12 + k02_r_r3*k04_r_r3*k07_r_r3*k09_r_r3*k12_r_r3*k14_r_r3*k18_r_r3*k20_r_r3*m_m11*m_m12 + k02_r_r3*k04_r_r3*k07_r_r3*k09_r_r3*k13_r_r3*k15_r_r3*k17_r_r3*k20_r_r3*m_m10*m_m12 + k02_r_r3*k04_r_r3*k07_r_r3*k10_r_r3*k13_r_r3*k15_r_r3*k17_r_r3*k19_r_r3*m_m10*m_m12 + k02_r_r3*k06_r_r3*k08_r_r3*k10_r_r3*k12_r_r3*k15_r_r3*k17_r_r3*k19_r_r3*m_m8*m_m12 + k04_r_r3*k06_r_r3*k08_r_r3*k10_r_r3*k12_r_r3*k14_r_r3*k16_r_r3*k19_r_r3*m_m8*m_m12 + k02_r_r3*k04_r_r3*k06_r_r3*k09_r_r3*k12_r_r3*k16_r_r3*k18_r_r3*k20_r_r3*m_m11*m_m12 + k02_r_r3*k04_r_r3*k07_r_r3*k09_r_r3*k12_r_r3*k15_r_r3*k18_r_r3*k20_r_r3*m_m11*m_m12 + k02_r_r3*k05_r_r3*k07_r_r3*k09_r_r3*k12_r_r3*k14_r_r3*k18_r_r3*k20_r_r3*m_m11*m_m12 + k02_r_r3*k05_r_r3*k07_r_r3*k09_r_r3*k13_r_r3*k15_r_r3*k17_r_r3*k20_r_r3*m_m10*m_m12 + k02_r_r3*k05_r_r3*k07_r_r3*k10_r_r3*k13_r_r3*k15_r_r3*k17_r_r3*k19_r_r3*m_m10*m_m12 + k04_r_r3*k06_r_r3*k08_r_r3*k10_r_r3*k12_r_r3*k14_r_r3*k17_r_r3*k19_r_r3*m_m8*m_m12 + k02_r_r3*k04_r_r3*k07_r_r3*k09_r_r3*k12_r_r3*k16_r_r3*k18_r_r3*k20_r_r3*m_m11*m_m12 + k02_r_r3*k05_r_r3*k07_r_r3*k09_r_r3*k12_r_r3*k15_r_r3*k18_r_r3*k20_r_r3*m_m11*m_m12 + k04_r_r3*k06_r_r3*k08_r_r3*k10_r_r3*k12_r_r3*k15_r_r3*k17_r_r3*k19_r_r3*m_m8*m_m12 + k02_r_r3*k04_r_r3*k06_r_r3*k09_r_r3*k14_r_r3*k16_r_r3*k18_r_r3*k20_r_r3*m_m11*m_m12 + k02_r_r3*k05_r_r3*k07_r_r3*k09_r_r3*k12_r_r3*k16_r_r3*k18_r_r3*k20_r_r3*m_m11*m_m12 + k02_r_r3*k04_r_r3*k07_r_r3*k09_r_r3*k14_r_r3*k16_r_r3*k18_r_r3*k20_r_r3*m_m11*m_m12 + k02_r_r3*k05_r_r3*k07_r_r3*k09_r_r3*k14_r_r3*k16_r_r3*k18_r_r3*k20_r_r3*m_m11*m_m12 + k01_r_r3*k03_r_r3*k05_r_r3*k08_r_r3*k12_r_r3*k14_r_r3*k16_r_r3*k19_r_r3*m_m1*m_m7*m_m8 + k01_r_r3*k03_r_r3*k05_r_r3*k07_r_r3*k12_r_r3*k14_r_r3*k16_r_r3*k18_r_r3*m_m1*m_m7*m_m11 + k01_r_r3*k03_r_r3*k05_r_r3*k08_r_r3*k12_r_r3*k14_r_r3*k17_r_r3*k19_r_r3*m_m1*m_m7*m_m8 + k01_r_r3*k03_r_r3*k06_r_r3*k08_r_r3*k12_r_r3*k14_r_r3*k16_r_r3*k19_r_r3*m_m1*m_m7*m_m8 + k02_r_r3*k04_r_r3*k06_r_r3*k08_r_r3*k11_r_r3*k13_r_r3*k15_r_r3*k17_r_r3*m_m1*m_m8*m_m10 + k01_r_r3*k03_r_r3*k05_r_r3*k08_r_r3*k12_r_r3*k15_r_r3*k17_r_r3*k19_r_r3*m_m1*m_m7*m_m8 + k01_r_r3*k03_r_r3*k06_r_r3*k08_r_r3*k12_r_r3*k14_r_r3*k17_r_r3*k19_r_r3*m_m1*m_m7*m_m8 + k01_r_r3*k03_r_r3*k05_r_r3*k09_r_r3*k12_r_r3*k14_r_r3*k16_r_r3*k18_r_r3*m_m1*m_m7*m_m11 + k01_r_r3*k03_r_r3*k06_r_r3*k08_r_r3*k12_r_r3*k15_r_r3*k17_r_r3*k19_r_r3*m_m1*m_m7*m_m8 + k02_r_r3*k04_r_r3*k06_r_r3*k08_r_r3*k11_r_r3*k13_r_r3*k15_r_r3*k19_r_r3*m_m1*m_m8*m_m10 + k01_r_r3*k03_r_r3*k05_r_r3*k07_r_r3*k13_r_r3*k15_r_r3*k17_r_r3*k19_r_r3*m_m1*m_m7*m_m10 + k01_r_r3*k03_r_r3*k06_r_r3*k09_r_r3*k12_r_r3*k14_r_r3*k16_r_r3*k18_r_r3*m_m1*m_m7*m_m11 + k02_r_r3*k04_r_r3*k06_r_r3*k08_r_r3*k11_r_r3*k13_r_r3*k16_r_r3*k19_r_r3*m_m1*m_m8*m_m10 + k03_r_r3*k05_r_r3*k07_r_r3*k09_r_r3*k11_r_r3*k13_r_r3*k15_r_r3*k17_r_r3*m_m1*m_m7*m_m10 + k01_r_r3*k03_r_r3*k07_r_r3*k09_r_r3*k12_r_r3*k14_r_r3*k16_r_r3*k18_r_r3*m_m1*m_m7*m_m11 + k01_r_r3*k04_r_r3*k06_r_r3*k08_r_r3*k12_r_r3*k14_r_r3*k16_r_r3*k18_r_r3*m_m1*m_m8*m_m11 + k02_r_r3*k04_r_r3*k06_r_r3*k08_r_r3*k11_r_r3*k13_r_r3*k17_r_r3*k19_r_r3*m_m1*m_m8*m_m10 + k02_r_r3*k04_r_r3*k06_r_r3*k08_r_r3*k11_r_r3*k14_r_r3*k16_r_r3*k18_r_r3*m_m1*m_m8*m_m11 + k01_r_r3*k03_r_r3*k05_r_r3*k09_r_r3*k13_r_r3*k15_r_r3*k17_r_r3*k19_r_r3*m_m1*m_m7*m_m10 + k02_r_r3*k04_r_r3*k06_r_r3*k09_r_r3*k11_r_r3*k13_r_r3*k15_r_r3*k18_r_r3*m_m1*m_m10*m_m11 + k03_r_r3*k05_r_r3*k07_r_r3*k09_r_r3*k11_r_r3*k13_r_r3*k15_r_r3*k19_r_r3*m_m1*m_m7*m_m10 + k01_r_r3*k03_r_r3*k06_r_r3*k09_r_r3*k13_r_r3*k15_r_r3*k17_r_r3*k19_r_r3*m_m1*m_m7*m_m10 + k02_r_r3*k04_r_r3*k06_r_r3*k09_r_r3*k11_r_r3*k13_r_r3*k16_r_r3*k18_r_r3*m_m1*m_m10*m_m11 + k02_r_r3*k04_r_r3*k07_r_r3*k09_r_r3*k11_r_r3*k13_r_r3*k15_r_r3*k18_r_r3*m_m1*m_m10*m_m11 + k03_r_r3*k05_r_r3*k07_r_r3*k09_r_r3*k11_r_r3*k13_r_r3*k16_r_r3*k19_r_r3*m_m1*m_m7*m_m10 + k01_r_r3*k03_r_r3*k07_r_r3*k09_r_r3*k13_r_r3*k15_r_r3*k17_r_r3*k19_r_r3*m_m1*m_m7*m_m10 + k01_r_r3*k04_r_r3*k06_r_r3*k08_r_r3*k13_r_r3*k15_r_r3*k17_r_r3*k19_r_r3*m_m1*m_m8*m_m10 + k02_r_r3*k04_r_r3*k07_r_r3*k09_r_r3*k11_r_r3*k13_r_r3*k16_r_r3*k18_r_r3*m_m1*m_m10*m_m11 + k02_r_r3*k05_r_r3*k07_r_r3*k09_r_r3*k11_r_r3*k13_r_r3*k15_r_r3*k18_r_r3*m_m1*m_m10*m_m11 + k03_r_r3*k05_r_r3*k07_r_r3*k09_r_r3*k11_r_r3*k13_r_r3*k17_r_r3*k19_r_r3*m_m1*m_m7*m_m10 + k03_r_r3*k05_r_r3*k07_r_r3*k09_r_r3*k11_r_r3*k14_r_r3*k16_r_r3*k18_r_r3*m_m1*m_m7*m_m11 + k02_r_r3*k05_r_r3*k07_r_r3*k09_r_r3*k11_r_r3*k13_r_r3*k16_r_r3*k18_r_r3*m_m1*m_m10*m_m11 + k03_r_r3*k05_r_r3*k08_r_r3*k10_r_r3*k12_r_r3*k14_r_r3*k16_r_r3*k19_r_r3*m_m7*m_m8*m_m12 + k02_r_r3*k04_r_r3*k06_r_r3*k08_r_r3*k12_r_r3*k14_r_r3*k18_r_r3*k20_r_r3*m_m8*m_m11*m_m12 + k02_r_r3*k04_r_r3*k06_r_r3*k08_r_r3*k13_r_r3*k15_r_r3*k17_r_r3*k20_r_r3*m_m8*m_m10*m_m12 + k02_r_r3*k04_r_r3*k08_r_r3*k10_r_r3*k12_r_r3*k14_r_r3*k16_r_r3*k18_r_r3*m_m8*m_m11*m_m12 + k03_r_r3*k05_r_r3*k07_r_r3*k10_r_r3*k12_r_r3*k14_r_r3*k16_r_r3*k18_r_r3*m_m7*m_m11*m_m12 + k03_r_r3*k05_r_r3*k08_r_r3*k10_r_r3*k12_r_r3*k14_r_r3*k17_r_r3*k19_r_r3*m_m7*m_m8*m_m12 + k03_r_r3*k06_r_r3*k08_r_r3*k10_r_r3*k12_r_r3*k14_r_r3*k16_r_r3*k19_r_r3*m_m7*m_m8*m_m12 + k02_r_r3*k04_r_r3*k06_r_r3*k08_r_r3*k12_r_r3*k15_r_r3*k18_r_r3*k20_r_r3*m_m8*m_m11*m_m12 + k02_r_r3*k05_r_r3*k08_r_r3*k10_r_r3*k12_r_r3*k14_r_r3*k16_r_r3*k18_r_r3*m_m8*m_m11*m_m12 + k03_r_r3*k05_r_r3*k08_r_r3*k10_r_r3*k12_r_r3*k15_r_r3*k17_r_r3*k19_r_r3*m_m7*m_m8*m_m12 + k03_r_r3*k06_r_r3*k08_r_r3*k10_r_r3*k12_r_r3*k14_r_r3*k17_r_r3*k19_r_r3*m_m7*m_m8*m_m12 + k02_r_r3*k04_r_r3*k06_r_r3*k08_r_r3*k12_r_r3*k16_r_r3*k18_r_r3*k20_r_r3*m_m8*m_m11*m_m12 + k02_r_r3*k06_r_r3*k08_r_r3*k10_r_r3*k12_r_r3*k14_r_r3*k16_r_r3*k18_r_r3*m_m8*m_m11*m_m12 + k03_r_r3*k06_r_r3*k08_r_r3*k10_r_r3*k12_r_r3*k15_r_r3*k17_r_r3*k19_r_r3*m_m7*m_m8*m_m12 + k02_r_r3*k04_r_r3*k08_r_r3*k10_r_r3*k13_r_r3*k15_r_r3*k17_r_r3*k19_r_r3*m_m8*m_m10*m_m12 + k03_r_r3*k05_r_r3*k07_r_r3*k09_r_r3*k12_r_r3*k14_r_r3*k18_r_r3*k20_r_r3*m_m7*m_m11*m_m12 + k03_r_r3*k05_r_r3*k07_r_r3*k09_r_r3*k13_r_r3*k15_r_r3*k17_r_r3*k20_r_r3*m_m7*m_m10*m_m12 + k03_r_r3*k05_r_r3*k07_r_r3*k10_r_r3*k13_r_r3*k15_r_r3*k17_r_r3*k19_r_r3*m_m7*m_m10*m_m12 + k02_r_r3*k04_r_r3*k06_r_r3*k08_r_r3*k14_r_r3*k16_r_r3*k18_r_r3*k20_r_r3*m_m8*m_m11*m_m12 + k02_r_r3*k05_r_r3*k08_r_r3*k10_r_r3*k13_r_r3*k15_r_r3*k17_r_r3*k19_r_r3*m_m8*m_m10*m_m12 + k03_r_r3*k05_r_r3*k07_r_r3*k09_r_r3*k12_r_r3*k15_r_r3*k18_r_r3*k20_r_r3*m_m7*m_m11*m_m12 + k04_r_r3*k06_r_r3*k08_r_r3*k10_r_r3*k12_r_r3*k14_r_r3*k16_r_r3*k18_r_r3*m_m8*m_m11*m_m12 + k02_r_r3*k04_r_r3*k06_r_r3*k09_r_r3*k13_r_r3*k15_r_r3*k18_r_r3*k20_r_r3*m_m10*m_m11*m_m12 + k02_r_r3*k06_r_r3*k08_r_r3*k10_r_r3*k13_r_r3*k15_r_r3*k17_r_r3*k19_r_r3*m_m8*m_m10*m_m12 + k03_r_r3*k05_r_r3*k07_r_r3*k09_r_r3*k12_r_r3*k16_r_r3*k18_r_r3*k20_r_r3*m_m7*m_m11*m_m12 + k02_r_r3*k04_r_r3*k06_r_r3*k09_r_r3*k13_r_r3*k16_r_r3*k18_r_r3*k20_r_r3*m_m10*m_m11*m_m12 + k02_r_r3*k04_r_r3*k07_r_r3*k09_r_r3*k13_r_r3*k15_r_r3*k18_r_r3*k20_r_r3*m_m10*m_m11*m_m12 + k02_r_r3*k04_r_r3*k07_r_r3*k09_r_r3*k13_r_r3*k16_r_r3*k18_r_r3*k20_r_r3*m_m10*m_m11*m_m12 + k02_r_r3*k05_r_r3*k07_r_r3*k09_r_r3*k13_r_r3*k15_r_r3*k18_r_r3*k20_r_r3*m_m10*m_m11*m_m12 + k03_r_r3*k05_r_r3*k07_r_r3*k09_r_r3*k14_r_r3*k16_r_r3*k18_r_r3*k20_r_r3*m_m7*m_m11*m_m12 + k04_r_r3*k06_r_r3*k08_r_r3*k10_r_r3*k13_r_r3*k15_r_r3*k17_r_r3*k19_r_r3*m_m8*m_m10*m_m12 + k02_r_r3*k05_r_r3*k07_r_r3*k09_r_r3*k13_r_r3*k16_r_r3*k18_r_r3*k20_r_r3*m_m10*m_m11*m_m12 + k01_r_r3*k03_r_r3*k05_r_r3*k08_r_r3*k12_r_r3*k14_r_r3*k16_r_r3*k18_r_r3*m_m1*m_m7*m_m8*m_m11 + k01_r_r3*k03_r_r3*k06_r_r3*k08_r_r3*k12_r_r3*k14_r_r3*k16_r_r3*k18_r_r3*m_m1*m_m7*m_m8*m_m11 + k01_r_r3*k03_r_r3*k05_r_r3*k08_r_r3*k13_r_r3*k15_r_r3*k17_r_r3*k19_r_r3*m_m1*m_m7*m_m8*m_m10 + k02_r_r3*k04_r_r3*k06_r_r3*k08_r_r3*k11_r_r3*k13_r_r3*k15_r_r3*k18_r_r3*m_m1*m_m8*m_m10*m_m11 + k01_r_r3*k03_r_r3*k06_r_r3*k08_r_r3*k13_r_r3*k15_r_r3*k17_r_r3*k19_r_r3*m_m1*m_m7*m_m8*m_m10 + k02_r_r3*k04_r_r3*k06_r_r3*k08_r_r3*k11_r_r3*k13_r_r3*k16_r_r3*k18_r_r3*m_m1*m_m8*m_m10*m_m11 + k03_r_r3*k05_r_r3*k07_r_r3*k09_r_r3*k11_r_r3*k13_r_r3*k15_r_r3*k18_r_r3*m_m1*m_m7*m_m10*m_m11 + k03_r_r3*k05_r_r3*k07_r_r3*k09_r_r3*k11_r_r3*k13_r_r3*k16_r_r3*k18_r_r3*m_m1*m_m7*m_m10*m_m11 + k03_r_r3*k05_r_r3*k08_r_r3*k10_r_r3*k12_r_r3*k14_r_r3*k16_r_r3*k18_r_r3*m_m7*m_m8*m_m11*m_m12 + k03_r_r3*k06_r_r3*k08_r_r3*k10_r_r3*k12_r_r3*k14_r_r3*k16_r_r3*k18_r_r3*m_m7*m_m8*m_m11*m_m12 + k02_r_r3*k04_r_r3*k06_r_r3*k08_r_r3*k13_r_r3*k15_r_r3*k18_r_r3*k20_r_r3*m_m8*m_m10*m_m11*m_m12 + k03_r_r3*k05_r_r3*k08_r_r3*k10_r_r3*k13_r_r3*k15_r_r3*k17_r_r3*k19_r_r3*m_m7*m_m8*m_m10*m_m12 + k02_r_r3*k04_r_r3*k06_r_r3*k08_r_r3*k13_r_r3*k16_r_r3*k18_r_r3*k20_r_r3*m_m8*m_m10*m_m11*m_m12 + k03_r_r3*k06_r_r3*k08_r_r3*k10_r_r3*k13_r_r3*k15_r_r3*k17_r_r3*k19_r_r3*m_m7*m_m8*m_m10*m_m12 + k03_r_r3*k05_r_r3*k07_r_r3*k09_r_r3*k13_r_r3*k15_r_r3*k18_r_r3*k20_r_r3*m_m7*m_m10*m_m11*m_m12 + k03_r_r3*k05_r_r3*k07_r_r3*k09_r_r3*k13_r_r3*k16_r_r3*k18_r_r3*k20_r_r3*m_m7*m_m10*m_m11*m_m12)))*(1/m_m8_ref);
  m_m9' = (-(k01_r_r12*m_m9 - k02_r_r12*m_m19) + n_sub_r_r4*(k01_r_r4*k03_r_r4*k05_r_r4*k07_r_r4*k09_r_r4*m_m2*m_m8 - k02_r_r4*k04_r_r4*k06_r_r4*k08_r_r4*k10_r_r4*m_m9*m_m13)/((L_0_r_r4*(1/(m_m5/Keff_m_m5_r_r4 + m_m8/Keff_m_m8_r_r4 + 1))^n_sub_r_r4*((k02_r_r4*k04_r_r4*k06_r_r4*k09_r_r4 + k02_r_r4*k04_r_r4*k07_r_r4*k09_r_r4 + k02_r_r4*k05_r_r4*k07_r_r4*k09_r_r4 + k02_r_r4*k04_r_r4*k06_r_r4*k08_r_r4*m_m9 + k03_r_r4*k05_r_r4*k07_r_r4*k09_r_r4*m_m8)/(k02_r_r4*k04_r_r4*k06_r_r4*k09_r_r4 + k02_r_r4*k04_r_r4*k07_r_r4*k09_r_r4 + k02_r_r4*k05_r_r4*k07_r_r4*k09_r_r4 + k01_r_r4*k04_r_r4*k06_r_r4*k09_r_r4*m_m2 + k01_r_r4*k04_r_r4*k07_r_r4*k09_r_r4*m_m2 + k01_r_r4*k05_r_r4*k07_r_r4*k09_r_r4*m_m2 + k02_r_r4*k04_r_r4*k06_r_r4*k08_r_r4*m_m9 + k03_r_r4*k05_r_r4*k07_r_r4*k09_r_r4*m_m8 + k02_r_r4*k04_r_r4*k06_r_r4*k10_r_r4*m_m13 + k02_r_r4*k04_r_r4*k07_r_r4*k10_r_r4*m_m13 + k02_r_r4*k05_r_r4*k07_r_r4*k10_r_r4*m_m13 + k01_r_r4*k03_r_r4*k05_r_r4*k07_r_r4*m_m2*m_m8 + k01_r_r4*k03_r_r4*k05_r_r4*k09_r_r4*m_m2*m_m8 + k01_r_r4*k03_r_r4*k06_r_r4*k09_r_r4*m_m2*m_m8 + k01_r_r4*k03_r_r4*k07_r_r4*k09_r_r4*m_m2*m_m8 + k01_r_r4*k04_r_r4*k06_r_r4*k08_r_r4*m_m2*m_m9 + k02_r_r4*k04_r_r4*k08_r_r4*k10_r_r4*m_m9*m_m13 + k03_r_r4*k05_r_r4*k07_r_r4*k10_r_r4*m_m8*m_m13 + k02_r_r4*k05_r_r4*k08_r_r4*k10_r_r4*m_m9*m_m13 + k02_r_r4*k06_r_r4*k08_r_r4*k10_r_r4*m_m9*m_m13 + k04_r_r4*k06_r_r4*k08_r_r4*k10_r_r4*m_m9*m_m13 + k01_r_r4*k03_r_r4*k05_r_r4*k08_r_r4*m_m2*m_m8*m_m9 + k01_r_r4*k03_r_r4*k06_r_r4*k08_r_r4*m_m2*m_m8*m_m9 + k03_r_r4*k05_r_r4*k08_r_r4*k10_r_r4*m_m8*m_m9*m_m13 + k03_r_r4*k06_r_r4*k08_r_r4*k10_r_r4*m_m8*m_m9*m_m13))^n_sub_r_r4 + 1)*(k02_r_r4*k04_r_r4*k06_r_r4*k09_r_r4 + k02_r_r4*k04_r_r4*k07_r_r4*k09_r_r4 + k02_r_r4*k05_r_r4*k07_r_r4*k09_r_r4 + k01_r_r4*k04_r_r4*k06_r_r4*k09_r_r4*m_m2 + k01_r_r4*k04_r_r4*k07_r_r4*k09_r_r4*m_m2 + k01_r_r4*k05_r_r4*k07_r_r4*k09_r_r4*m_m2 + k02_r_r4*k04_r_r4*k06_r_r4*k08_r_r4*m_m9 + k03_r_r4*k05_r_r4*k07_r_r4*k09_r_r4*m_m8 + k02_r_r4*k04_r_r4*k06_r_r4*k10_r_r4*m_m13 + k02_r_r4*k04_r_r4*k07_r_r4*k10_r_r4*m_m13 + k02_r_r4*k05_r_r4*k07_r_r4*k10_r_r4*m_m13 + k01_r_r4*k03_r_r4*k05_r_r4*k07_r_r4*m_m2*m_m8 + k01_r_r4*k03_r_r4*k05_r_r4*k09_r_r4*m_m2*m_m8 + k01_r_r4*k03_r_r4*k06_r_r4*k09_r_r4*m_m2*m_m8 + k01_r_r4*k03_r_r4*k07_r_r4*k09_r_r4*m_m2*m_m8 + k01_r_r4*k04_r_r4*k06_r_r4*k08_r_r4*m_m2*m_m9 + k02_r_r4*k04_r_r4*k08_r_r4*k10_r_r4*m_m9*m_m13 + k03_r_r4*k05_r_r4*k07_r_r4*k10_r_r4*m_m8*m_m13 + k02_r_r4*k05_r_r4*k08_r_r4*k10_r_r4*m_m9*m_m13 + k02_r_r4*k06_r_r4*k08_r_r4*k10_r_r4*m_m9*m_m13 + k04_r_r4*k06_r_r4*k08_r_r4*k10_r_r4*m_m9*m_m13 + k01_r_r4*k03_r_r4*k05_r_r4*k08_r_r4*m_m2*m_m8*m_m9 + k01_r_r4*k03_r_r4*k06_r_r4*k08_r_r4*m_m2*m_m8*m_m9 + k03_r_r4*k05_r_r4*k08_r_r4*k10_r_r4*m_m8*m_m9*m_m13 + k03_r_r4*k06_r_r4*k08_r_r4*k10_r_r4*m_m8*m_m9*m_m13)))*(1/m_m9_ref);
  m_m10' = (-(n_sub_r_r6*(k11_r_r6*k13_r_r6*k15_r_r6*k17_r_r6*k19_r_r6*m_m1*m_m10 - k12_r_r6*k14_r_r6*k16_r_r6*k18_r_r6*k20_r_r6*m_m11*m_m12)*(k02_r_r6*k04_r_r6*k06_r_r6*k09_r_r6 + k02_r_r6*k04_r_r6*k07_r_r6*k09_r_r6 + k02_r_r6*k05_r_r6*k07_r_r6*k09_r_r6 + k02_r_r6*k04_r_r6*k06_r_r6*k08_r_r6*m_m8 + k03_r_r6*k05_r_r6*k07_r_r6*k09_r_r6*m_m7)/((L_0_r_r6*(m_m9/Keff_m_m9_r_r6 + 1)^n_sub_r_r6*((k02_r_r6*k04_r_r6*k06_r_r6*k09_r_r6 + k02_r_r6*k04_r_r6*k07_r_r6*k09_r_r6 + k02_r_r6*k05_r_r6*k07_r_r6*k09_r_r6 + k02_r_r6*k04_r_r6*k06_r_r6*k08_r_r6*m_m8 + k03_r_r6*k05_r_r6*k07_r_r6*k09_r_r6*m_m7)*(k12_r_r6*k14_r_r6*k16_r_r6*k19_r_r6 + k12_r_r6*k14_r_r6*k17_r_r6*k19_r_r6 + k12_r_r6*k15_r_r6*k17_r_r6*k19_r_r6 + k12_r_r6*k14_r_r6*k16_r_r6*k18_r_r6*m_m11 + k13_r_r6*k15_r_r6*k17_r_r6*k19_r_r6*m_m10)/(k02_r_r6*k04_r_r6*k06_r_r6*k09_r_r6*k12_r_r6*k14_r_r6*k16_r_r6*k19_r_r6 + k02_r_r6*k04_r_r6*k06_r_r6*k09_r_r6*k12_r_r6*k14_r_r6*k17_r_r6*k19_r_r6 + k02_r_r6*k04_r_r6*k07_r_r6*k09_r_r6*k12_r_r6*k14_r_r6*k16_r_r6*k19_r_r6 + k02_r_r6*k04_r_r6*k06_r_r6*k09_r_r6*k12_r_r6*k15_r_r6*k17_r_r6*k19_r_r6 + k02_r_r6*k04_r_r6*k07_r_r6*k09_r_r6*k12_r_r6*k14_r_r6*k17_r_r6*k19_r_r6 + k02_r_r6*k05_r_r6*k07_r_r6*k09_r_r6*k12_r_r6*k14_r_r6*k16_r_r6*k19_r_r6 + k02_r_r6*k04_r_r6*k07_r_r6*k09_r_r6*k12_r_r6*k15_r_r6*k17_r_r6*k19_r_r6 + k02_r_r6*k05_r_r6*k07_r_r6*k09_r_r6*k12_r_r6*k14_r_r6*k17_r_r6*k19_r_r6 + k02_r_r6*k05_r_r6*k07_r_r6*k09_r_r6*k12_r_r6*k15_r_r6*k17_r_r6*k19_r_r6 + k01_r_r6*k04_r_r6*k06_r_r6*k09_r_r6*k12_r_r6*k14_r_r6*k16_r_r6*k19_r_r6*m_m1 + k02_r_r6*k04_r_r6*k06_r_r6*k09_r_r6*k11_r_r6*k14_r_r6*k16_r_r6*k19_r_r6*m_m1 + k01_r_r6*k04_r_r6*k06_r_r6*k09_r_r6*k12_r_r6*k14_r_r6*k17_r_r6*k19_r_r6*m_m1 + k01_r_r6*k04_r_r6*k07_r_r6*k09_r_r6*k12_r_r6*k14_r_r6*k16_r_r6*k19_r_r6*m_m1 + k02_r_r6*k04_r_r6*k06_r_r6*k09_r_r6*k11_r_r6*k14_r_r6*k17_r_r6*k19_r_r6*m_m1 + k02_r_r6*k04_r_r6*k07_r_r6*k09_r_r6*k11_r_r6*k14_r_r6*k16_r_r6*k19_r_r6*m_m1 + k01_r_r6*k04_r_r6*k06_r_r6*k09_r_r6*k12_r_r6*k15_r_r6*k17_r_r6*k19_r_r6*m_m1 + k01_r_r6*k04_r_r6*k07_r_r6*k09_r_r6*k12_r_r6*k14_r_r6*k17_r_r6*k19_r_r6*m_m1 + k01_r_r6*k05_r_r6*k07_r_r6*k09_r_r6*k12_r_r6*k14_r_r6*k16_r_r6*k19_r_r6*m_m1 + k02_r_r6*k04_r_r6*k06_r_r6*k09_r_r6*k11_r_r6*k15_r_r6*k17_r_r6*k19_r_r6*m_m1 + k02_r_r6*k04_r_r6*k07_r_r6*k09_r_r6*k11_r_r6*k14_r_r6*k17_r_r6*k19_r_r6*m_m1 + k02_r_r6*k05_r_r6*k07_r_r6*k09_r_r6*k11_r_r6*k14_r_r6*k16_r_r6*k19_r_r6*m_m1 + k01_r_r6*k04_r_r6*k07_r_r6*k09_r_r6*k12_r_r6*k15_r_r6*k17_r_r6*k19_r_r6*m_m1 + k01_r_r6*k05_r_r6*k07_r_r6*k09_r_r6*k12_r_r6*k14_r_r6*k17_r_r6*k19_r_r6*m_m1 + k02_r_r6*k04_r_r6*k07_r_r6*k09_r_r6*k11_r_r6*k15_r_r6*k17_r_r6*k19_r_r6*m_m1 + k02_r_r6*k05_r_r6*k07_r_r6*k09_r_r6*k11_r_r6*k14_r_r6*k17_r_r6*k19_r_r6*m_m1 + k01_r_r6*k05_r_r6*k07_r_r6*k09_r_r6*k12_r_r6*k15_r_r6*k17_r_r6*k19_r_r6*m_m1 + k02_r_r6*k05_r_r6*k07_r_r6*k09_r_r6*k11_r_r6*k15_r_r6*k17_r_r6*k19_r_r6*m_m1 + k02_r_r6*k04_r_r6*k06_r_r6*k08_r_r6*k12_r_r6*k14_r_r6*k16_r_r6*k19_r_r6*m_m8 + k02_r_r6*k04_r_r6*k06_r_r6*k08_r_r6*k12_r_r6*k14_r_r6*k17_r_r6*k19_r_r6*m_m8 + k02_r_r6*k04_r_r6*k06_r_r6*k08_r_r6*k12_r_r6*k15_r_r6*k17_r_r6*k19_r_r6*m_m8 + k02_r_r6*k04_r_r6*k06_r_r6*k09_r_r6*k12_r_r6*k14_r_r6*k16_r_r6*k18_r_r6*m_m11 + k03_r_r6*k05_r_r6*k07_r_r6*k09_r_r6*k12_r_r6*k14_r_r6*k16_r_r6*k19_r_r6*m_m7 + k02_r_r6*k04_r_r6*k07_r_r6*k09_r_r6*k12_r_r6*k14_r_r6*k16_r_r6*k18_r_r6*m_m11 + k03_r_r6*k05_r_r6*k07_r_r6*k09_r_r6*k12_r_r6*k14_r_r6*k17_r_r6*k19_r_r6*m_m7 + k02_r_r6*k05_r_r6*k07_r_r6*k09_r_r6*k12_r_r6*k14_r_r6*k16_r_r6*k18_r_r6*m_m11 + k03_r_r6*k05_r_r6*k07_r_r6*k09_r_r6*k12_r_r6*k15_r_r6*k17_r_r6*k19_r_r6*m_m7 + k02_r_r6*k04_r_r6*k06_r_r6*k09_r_r6*k12_r_r6*k14_r_r6*k16_r_r6*k20_r_r6*m_m12 + k02_r_r6*k04_r_r6*k06_r_r6*k09_r_r6*k13_r_r6*k15_r_r6*k17_r_r6*k19_r_r6*m_m10 + k02_r_r6*k04_r_r6*k06_r_r6*k10_r_r6*k12_r_r6*k14_r_r6*k16_r_r6*k19_r_r6*m_m12 + k02_r_r6*k04_r_r6*k06_r_r6*k09_r_r6*k12_r_r6*k14_r_r6*k17_r_r6*k20_r_r6*m_m12 + k02_r_r6*k04_r_r6*k06_r_r6*k10_r_r6*k12_r_r6*k14_r_r6*k17_r_r6*k19_r_r6*m_m12 + k02_r_r6*k04_r_r6*k07_r_r6*k09_r_r6*k12_r_r6*k14_r_r6*k16_r_r6*k20_r_r6*m_m12 + k02_r_r6*k04_r_r6*k07_r_r6*k09_r_r6*k13_r_r6*k15_r_r6*k17_r_r6*k19_r_r6*m_m10 + k02_r_r6*k04_r_r6*k07_r_r6*k10_r_r6*k12_r_r6*k14_r_r6*k16_r_r6*k19_r_r6*m_m12 + k02_r_r6*k04_r_r6*k06_r_r6*k09_r_r6*k12_r_r6*k15_r_r6*k17_r_r6*k20_r_r6*m_m12 + k02_r_r6*k04_r_r6*k06_r_r6*k10_r_r6*k12_r_r6*k15_r_r6*k17_r_r6*k19_r_r6*m_m12 + k02_r_r6*k04_r_r6*k07_r_r6*k09_r_r6*k12_r_r6*k14_r_r6*k17_r_r6*k20_r_r6*m_m12 + k02_r_r6*k04_r_r6*k07_r_r6*k10_r_r6*k12_r_r6*k14_r_r6*k17_r_r6*k19_r_r6*m_m12 + k02_r_r6*k05_r_r6*k07_r_r6*k09_r_r6*k12_r_r6*k14_r_r6*k16_r_r6*k20_r_r6*m_m12 + k02_r_r6*k05_r_r6*k07_r_r6*k09_r_r6*k13_r_r6*k15_r_r6*k17_r_r6*k19_r_r6*m_m10 + k02_r_r6*k05_r_r6*k07_r_r6*k10_r_r6*k12_r_r6*k14_r_r6*k16_r_r6*k19_r_r6*m_m12 + k02_r_r6*k04_r_r6*k07_r_r6*k09_r_r6*k12_r_r6*k15_r_r6*k17_r_r6*k20_r_r6*m_m12 + k02_r_r6*k04_r_r6*k07_r_r6*k10_r_r6*k12_r_r6*k15_r_r6*k17_r_r6*k19_r_r6*m_m12 + k02_r_r6*k05_r_r6*k07_r_r6*k09_r_r6*k12_r_r6*k14_r_r6*k17_r_r6*k20_r_r6*m_m12 + k02_r_r6*k05_r_r6*k07_r_r6*k10_r_r6*k12_r_r6*k14_r_r6*k17_r_r6*k19_r_r6*m_m12 + k02_r_r6*k05_r_r6*k07_r_r6*k09_r_r6*k12_r_r6*k15_r_r6*k17_r_r6*k20_r_r6*m_m12 + k02_r_r6*k05_r_r6*k07_r_r6*k10_r_r6*k12_r_r6*k15_r_r6*k17_r_r6*k19_r_r6*m_m12 + k01_r_r6*k03_r_r6*k05_r_r6*k07_r_r6*k12_r_r6*k14_r_r6*k16_r_r6*k19_r_r6*m_m1*m_m7 + k01_r_r6*k03_r_r6*k05_r_r6*k07_r_r6*k12_r_r6*k14_r_r6*k17_r_r6*k19_r_r6*m_m1*m_m7 + k01_r_r6*k03_r_r6*k05_r_r6*k07_r_r6*k12_r_r6*k15_r_r6*k17_r_r6*k19_r_r6*m_m1*m_m7 + k01_r_r6*k03_r_r6*k05_r_r6*k09_r_r6*k12_r_r6*k14_r_r6*k16_r_r6*k19_r_r6*m_m1*m_m7 + k01_r_r6*k03_r_r6*k05_r_r6*k09_r_r6*k12_r_r6*k14_r_r6*k17_r_r6*k19_r_r6*m_m1*m_m7 + k01_r_r6*k03_r_r6*k06_r_r6*k09_r_r6*k12_r_r6*k14_r_r6*k16_r_r6*k19_r_r6*m_m1*m_m7 + k02_r_r6*k04_r_r6*k06_r_r6*k09_r_r6*k11_r_r6*k13_r_r6*k15_r_r6*k17_r_r6*m_m1*m_m10 + k01_r_r6*k03_r_r6*k05_r_r6*k09_r_r6*k12_r_r6*k15_r_r6*k17_r_r6*k19_r_r6*m_m1*m_m7 + k01_r_r6*k03_r_r6*k06_r_r6*k09_r_r6*k12_r_r6*k14_r_r6*k17_r_r6*k19_r_r6*m_m1*m_m7 + k01_r_r6*k03_r_r6*k07_r_r6*k09_r_r6*k12_r_r6*k14_r_r6*k16_r_r6*k19_r_r6*m_m1*m_m7 + k01_r_r6*k04_r_r6*k06_r_r6*k08_r_r6*k12_r_r6*k14_r_r6*k16_r_r6*k19_r_r6*m_m1*m_m8 + k02_r_r6*k04_r_r6*k06_r_r6*k08_r_r6*k11_r_r6*k14_r_r6*k16_r_r6*k19_r_r6*m_m1*m_m8 + k02_r_r6*k04_r_r6*k07_r_r6*k09_r_r6*k11_r_r6*k13_r_r6*k15_r_r6*k17_r_r6*m_m1*m_m10 + k01_r_r6*k03_r_r6*k06_r_r6*k09_r_r6*k12_r_r6*k15_r_r6*k17_r_r6*k19_r_r6*m_m1*m_m7 + k01_r_r6*k03_r_r6*k07_r_r6*k09_r_r6*k12_r_r6*k14_r_r6*k17_r_r6*k19_r_r6*m_m1*m_m7 + k01_r_r6*k04_r_r6*k06_r_r6*k08_r_r6*k12_r_r6*k14_r_r6*k17_r_r6*k19_r_r6*m_m1*m_m8 + k02_r_r6*k04_r_r6*k06_r_r6*k08_r_r6*k11_r_r6*k14_r_r6*k17_r_r6*k19_r_r6*m_m1*m_m8 + k02_r_r6*k04_r_r6*k06_r_r6*k09_r_r6*k11_r_r6*k13_r_r6*k15_r_r6*k19_r_r6*m_m1*m_m10 + k02_r_r6*k05_r_r6*k07_r_r6*k09_r_r6*k11_r_r6*k13_r_r6*k15_r_r6*k17_r_r6*m_m1*m_m10 + k01_r_r6*k03_r_r6*k07_r_r6*k09_r_r6*k12_r_r6*k15_r_r6*k17_r_r6*k19_r_r6*m_m1*m_m7 + k01_r_r6*k04_r_r6*k06_r_r6*k08_r_r6*k12_r_r6*k15_r_r6*k17_r_r6*k19_r_r6*m_m1*m_m8 + k02_r_r6*k04_r_r6*k06_r_r6*k08_r_r6*k11_r_r6*k15_r_r6*k17_r_r6*k19_r_r6*m_m1*m_m8 + k02_r_r6*k04_r_r6*k06_r_r6*k09_r_r6*k11_r_r6*k13_r_r6*k16_r_r6*k19_r_r6*m_m1*m_m10 + k02_r_r6*k04_r_r6*k07_r_r6*k09_r_r6*k11_r_r6*k13_r_r6*k15_r_r6*k19_r_r6*m_m1*m_m10 + k01_r_r6*k04_r_r6*k06_r_r6*k09_r_r6*k12_r_r6*k14_r_r6*k16_r_r6*k18_r_r6*m_m1*m_m11 + k02_r_r6*k04_r_r6*k06_r_r6*k09_r_r6*k11_r_r6*k13_r_r6*k17_r_r6*k19_r_r6*m_m1*m_m10 + k02_r_r6*k04_r_r6*k06_r_r6*k09_r_r6*k11_r_r6*k14_r_r6*k16_r_r6*k18_r_r6*m_m1*m_m11 + k02_r_r6*k04_r_r6*k07_r_r6*k09_r_r6*k11_r_r6*k13_r_r6*k16_r_r6*k19_r_r6*m_m1*m_m10 + k02_r_r6*k05_r_r6*k07_r_r6*k09_r_r6*k11_r_r6*k13_r_r6*k15_r_r6*k19_r_r6*m_m1*m_m10 + k03_r_r6*k05_r_r6*k07_r_r6*k09_r_r6*k11_r_r6*k14_r_r6*k16_r_r6*k19_r_r6*m_m1*m_m7 + k01_r_r6*k04_r_r6*k07_r_r6*k09_r_r6*k12_r_r6*k14_r_r6*k16_r_r6*k18_r_r6*m_m1*m_m11 + k02_r_r6*k04_r_r6*k07_r_r6*k09_r_r6*k11_r_r6*k13_r_r6*k17_r_r6*k19_r_r6*m_m1*m_m10 + k02_r_r6*k04_r_r6*k07_r_r6*k09_r_r6*k11_r_r6*k14_r_r6*k16_r_r6*k18_r_r6*m_m1*m_m11 + k02_r_r6*k05_r_r6*k07_r_r6*k09_r_r6*k11_r_r6*k13_r_r6*k16_r_r6*k19_r_r6*m_m1*m_m10 + k03_r_r6*k05_r_r6*k07_r_r6*k09_r_r6*k11_r_r6*k14_r_r6*k17_r_r6*k19_r_r6*m_m1*m_m7 + k01_r_r6*k05_r_r6*k07_r_r6*k09_r_r6*k12_r_r6*k14_r_r6*k16_r_r6*k18_r_r6*m_m1*m_m11 + k02_r_r6*k05_r_r6*k07_r_r6*k09_r_r6*k11_r_r6*k13_r_r6*k17_r_r6*k19_r_r6*m_m1*m_m10 + k02_r_r6*k05_r_r6*k07_r_r6*k09_r_r6*k11_r_r6*k14_r_r6*k16_r_r6*k18_r_r6*m_m1*m_m11 + k03_r_r6*k05_r_r6*k07_r_r6*k09_r_r6*k11_r_r6*k15_r_r6*k17_r_r6*k19_r_r6*m_m1*m_m7 + k01_r_r6*k04_r_r6*k06_r_r6*k09_r_r6*k13_r_r6*k15_r_r6*k17_r_r6*k19_r_r6*m_m1*m_m10 + k01_r_r6*k04_r_r6*k07_r_r6*k09_r_r6*k13_r_r6*k15_r_r6*k17_r_r6*k19_r_r6*m_m1*m_m10 + k01_r_r6*k05_r_r6*k07_r_r6*k09_r_r6*k13_r_r6*k15_r_r6*k17_r_r6*k19_r_r6*m_m1*m_m10 + k02_r_r6*k04_r_r6*k06_r_r6*k08_r_r6*k12_r_r6*k14_r_r6*k16_r_r6*k18_r_r6*m_m8*m_m11 + k02_r_r6*k04_r_r6*k06_r_r6*k08_r_r6*k12_r_r6*k14_r_r6*k16_r_r6*k20_r_r6*m_m8*m_m12 + k02_r_r6*k04_r_r6*k06_r_r6*k08_r_r6*k13_r_r6*k15_r_r6*k17_r_r6*k19_r_r6*m_m8*m_m10 + k03_r_r6*k05_r_r6*k07_r_r6*k09_r_r6*k12_r_r6*k14_r_r6*k16_r_r6*k18_r_r6*m_m7*m_m11 + k02_r_r6*k04_r_r6*k06_r_r6*k08_r_r6*k12_r_r6*k14_r_r6*k17_r_r6*k20_r_r6*m_m8*m_m12 + k02_r_r6*k04_r_r6*k06_r_r6*k08_r_r6*k12_r_r6*k15_r_r6*k17_r_r6*k20_r_r6*m_m8*m_m12 + k02_r_r6*k04_r_r6*k06_r_r6*k10_r_r6*k12_r_r6*k14_r_r6*k16_r_r6*k18_r_r6*m_m11*m_m12 + k02_r_r6*k04_r_r6*k08_r_r6*k10_r_r6*k12_r_r6*k14_r_r6*k16_r_r6*k19_r_r6*m_m8*m_m12 + k03_r_r6*k05_r_r6*k07_r_r6*k09_r_r6*k12_r_r6*k14_r_r6*k16_r_r6*k20_r_r6*m_m7*m_m12 + k03_r_r6*k05_r_r6*k07_r_r6*k09_r_r6*k13_r_r6*k15_r_r6*k17_r_r6*k19_r_r6*m_m7*m_m10 + k03_r_r6*k05_r_r6*k07_r_r6*k10_r_r6*k12_r_r6*k14_r_r6*k16_r_r6*k19_r_r6*m_m7*m_m12 + k02_r_r6*k04_r_r6*k07_r_r6*k10_r_r6*k12_r_r6*k14_r_r6*k16_r_r6*k18_r_r6*m_m11*m_m12 + k02_r_r6*k04_r_r6*k08_r_r6*k10_r_r6*k12_r_r6*k14_r_r6*k17_r_r6*k19_r_r6*m_m8*m_m12 + k02_r_r6*k05_r_r6*k08_r_r6*k10_r_r6*k12_r_r6*k14_r_r6*k16_r_r6*k19_r_r6*m_m8*m_m12 + k03_r_r6*k05_r_r6*k07_r_r6*k09_r_r6*k12_r_r6*k14_r_r6*k17_r_r6*k20_r_r6*m_m7*m_m12 + k03_r_r6*k05_r_r6*k07_r_r6*k10_r_r6*k12_r_r6*k14_r_r6*k17_r_r6*k19_r_r6*m_m7*m_m12 + k02_r_r6*k04_r_r6*k08_r_r6*k10_r_r6*k12_r_r6*k15_r_r6*k17_r_r6*k19_r_r6*m_m8*m_m12 + k02_r_r6*k05_r_r6*k07_r_r6*k10_r_r6*k12_r_r6*k14_r_r6*k16_r_r6*k18_r_r6*m_m11*m_m12 + k02_r_r6*k05_r_r6*k08_r_r6*k10_r_r6*k12_r_r6*k14_r_r6*k17_r_r6*k19_r_r6*m_m8*m_m12 + k02_r_r6*k06_r_r6*k08_r_r6*k10_r_r6*k12_r_r6*k14_r_r6*k16_r_r6*k19_r_r6*m_m8*m_m12 + k03_r_r6*k05_r_r6*k07_r_r6*k09_r_r6*k12_r_r6*k15_r_r6*k17_r_r6*k20_r_r6*m_m7*m_m12 + k03_r_r6*k05_r_r6*k07_r_r6*k10_r_r6*k12_r_r6*k15_r_r6*k17_r_r6*k19_r_r6*m_m7*m_m12 + k02_r_r6*k04_r_r6*k06_r_r6*k09_r_r6*k12_r_r6*k14_r_r6*k18_r_r6*k20_r_r6*m_m11*m_m12 + k02_r_r6*k04_r_r6*k06_r_r6*k09_r_r6*k13_r_r6*k15_r_r6*k17_r_r6*k20_r_r6*m_m10*m_m12 + k02_r_r6*k04_r_r6*k06_r_r6*k10_r_r6*k13_r_r6*k15_r_r6*k17_r_r6*k19_r_r6*m_m10*m_m12 + k02_r_r6*k05_r_r6*k08_r_r6*k10_r_r6*k12_r_r6*k15_r_r6*k17_r_r6*k19_r_r6*m_m8*m_m12 + k02_r_r6*k06_r_r6*k08_r_r6*k10_r_r6*k12_r_r6*k14_r_r6*k17_r_r6*k19_r_r6*m_m8*m_m12 + k02_r_r6*k04_r_r6*k06_r_r6*k09_r_r6*k12_r_r6*k15_r_r6*k18_r_r6*k20_r_r6*m_m11*m_m12 + k02_r_r6*k04_r_r6*k07_r_r6*k09_r_r6*k12_r_r6*k14_r_r6*k18_r_r6*k20_r_r6*m_m11*m_m12 + k02_r_r6*k04_r_r6*k07_r_r6*k09_r_r6*k13_r_r6*k15_r_r6*k17_r_r6*k20_r_r6*m_m10*m_m12 + k02_r_r6*k04_r_r6*k07_r_r6*k10_r_r6*k13_r_r6*k15_r_r6*k17_r_r6*k19_r_r6*m_m10*m_m12 + k02_r_r6*k06_r_r6*k08_r_r6*k10_r_r6*k12_r_r6*k15_r_r6*k17_r_r6*k19_r_r6*m_m8*m_m12 + k04_r_r6*k06_r_r6*k08_r_r6*k10_r_r6*k12_r_r6*k14_r_r6*k16_r_r6*k19_r_r6*m_m8*m_m12 + k02_r_r6*k04_r_r6*k06_r_r6*k09_r_r6*k12_r_r6*k16_r_r6*k18_r_r6*k20_r_r6*m_m11*m_m12 + k02_r_r6*k04_r_r6*k07_r_r6*k09_r_r6*k12_r_r6*k15_r_r6*k18_r_r6*k20_r_r6*m_m11*m_m12 + k02_r_r6*k05_r_r6*k07_r_r6*k09_r_r6*k12_r_r6*k14_r_r6*k18_r_r6*k20_r_r6*m_m11*m_m12 + k02_r_r6*k05_r_r6*k07_r_r6*k09_r_r6*k13_r_r6*k15_r_r6*k17_r_r6*k20_r_r6*m_m10*m_m12 + k02_r_r6*k05_r_r6*k07_r_r6*k10_r_r6*k13_r_r6*k15_r_r6*k17_r_r6*k19_r_r6*m_m10*m_m12 + k04_r_r6*k06_r_r6*k08_r_r6*k10_r_r6*k12_r_r6*k14_r_r6*k17_r_r6*k19_r_r6*m_m8*m_m12 + k02_r_r6*k04_r_r6*k07_r_r6*k09_r_r6*k12_r_r6*k16_r_r6*k18_r_r6*k20_r_r6*m_m11*m_m12 + k02_r_r6*k05_r_r6*k07_r_r6*k09_r_r6*k12_r_r6*k15_r_r6*k18_r_r6*k20_r_r6*m_m11*m_m12 + k04_r_r6*k06_r_r6*k08_r_r6*k10_r_r6*k12_r_r6*k15_r_r6*k17_r_r6*k19_r_r6*m_m8*m_m12 + k02_r_r6*k04_r_r6*k06_r_r6*k09_r_r6*k14_r_r6*k16_r_r6*k18_r_r6*k20_r_r6*m_m11*m_m12 + k02_r_r6*k05_r_r6*k07_r_r6*k09_r_r6*k12_r_r6*k16_r_r6*k18_r_r6*k20_r_r6*m_m11*m_m12 + k02_r_r6*k04_r_r6*k07_r_r6*k09_r_r6*k14_r_r6*k16_r_r6*k18_r_r6*k20_r_r6*m_m11*m_m12 + k02_r_r6*k05_r_r6*k07_r_r6*k09_r_r6*k14_r_r6*k16_r_r6*k18_r_r6*k20_r_r6*m_m11*m_m12 + k01_r_r6*k03_r_r6*k05_r_r6*k08_r_r6*k12_r_r6*k14_r_r6*k16_r_r6*k19_r_r6*m_m1*m_m7*m_m8 + k01_r_r6*k03_r_r6*k05_r_r6*k07_r_r6*k12_r_r6*k14_r_r6*k16_r_r6*k18_r_r6*m_m1*m_m7*m_m11 + k01_r_r6*k03_r_r6*k05_r_r6*k08_r_r6*k12_r_r6*k14_r_r6*k17_r_r6*k19_r_r6*m_m1*m_m7*m_m8 + k01_r_r6*k03_r_r6*k06_r_r6*k08_r_r6*k12_r_r6*k14_r_r6*k16_r_r6*k19_r_r6*m_m1*m_m7*m_m8 + k02_r_r6*k04_r_r6*k06_r_r6*k08_r_r6*k11_r_r6*k13_r_r6*k15_r_r6*k17_r_r6*m_m1*m_m8*m_m10 + k01_r_r6*k03_r_r6*k05_r_r6*k08_r_r6*k12_r_r6*k15_r_r6*k17_r_r6*k19_r_r6*m_m1*m_m7*m_m8 + k01_r_r6*k03_r_r6*k06_r_r6*k08_r_r6*k12_r_r6*k14_r_r6*k17_r_r6*k19_r_r6*m_m1*m_m7*m_m8 + k01_r_r6*k03_r_r6*k05_r_r6*k09_r_r6*k12_r_r6*k14_r_r6*k16_r_r6*k18_r_r6*m_m1*m_m7*m_m11 + k01_r_r6*k03_r_r6*k06_r_r6*k08_r_r6*k12_r_r6*k15_r_r6*k17_r_r6*k19_r_r6*m_m1*m_m7*m_m8 + k02_r_r6*k04_r_r6*k06_r_r6*k08_r_r6*k11_r_r6*k13_r_r6*k15_r_r6*k19_r_r6*m_m1*m_m8*m_m10 + k01_r_r6*k03_r_r6*k05_r_r6*k07_r_r6*k13_r_r6*k15_r_r6*k17_r_r6*k19_r_r6*m_m1*m_m7*m_m10 + k01_r_r6*k03_r_r6*k06_r_r6*k09_r_r6*k12_r_r6*k14_r_r6*k16_r_r6*k18_r_r6*m_m1*m_m7*m_m11 + k02_r_r6*k04_r_r6*k06_r_r6*k08_r_r6*k11_r_r6*k13_r_r6*k16_r_r6*k19_r_r6*m_m1*m_m8*m_m10 + k03_r_r6*k05_r_r6*k07_r_r6*k09_r_r6*k11_r_r6*k13_r_r6*k15_r_r6*k17_r_r6*m_m1*m_m7*m_m10 + k01_r_r6*k03_r_r6*k07_r_r6*k09_r_r6*k12_r_r6*k14_r_r6*k16_r_r6*k18_r_r6*m_m1*m_m7*m_m11 + k01_r_r6*k04_r_r6*k06_r_r6*k08_r_r6*k12_r_r6*k14_r_r6*k16_r_r6*k18_r_r6*m_m1*m_m8*m_m11 + k02_r_r6*k04_r_r6*k06_r_r6*k08_r_r6*k11_r_r6*k13_r_r6*k17_r_r6*k19_r_r6*m_m1*m_m8*m_m10 + k02_r_r6*k04_r_r6*k06_r_r6*k08_r_r6*k11_r_r6*k14_r_r6*k16_r_r6*k18_r_r6*m_m1*m_m8*m_m11 + k01_r_r6*k03_r_r6*k05_r_r6*k09_r_r6*k13_r_r6*k15_r_r6*k17_r_r6*k19_r_r6*m_m1*m_m7*m_m10 + k02_r_r6*k04_r_r6*k06_r_r6*k09_r_r6*k11_r_r6*k13_r_r6*k15_r_r6*k18_r_r6*m_m1*m_m10*m_m11 + k03_r_r6*k05_r_r6*k07_r_r6*k09_r_r6*k11_r_r6*k13_r_r6*k15_r_r6*k19_r_r6*m_m1*m_m7*m_m10 + k01_r_r6*k03_r_r6*k06_r_r6*k09_r_r6*k13_r_r6*k15_r_r6*k17_r_r6*k19_r_r6*m_m1*m_m7*m_m10 + k02_r_r6*k04_r_r6*k06_r_r6*k09_r_r6*k11_r_r6*k13_r_r6*k16_r_r6*k18_r_r6*m_m1*m_m10*m_m11 + k02_r_r6*k04_r_r6*k07_r_r6*k09_r_r6*k11_r_r6*k13_r_r6*k15_r_r6*k18_r_r6*m_m1*m_m10*m_m11 + k03_r_r6*k05_r_r6*k07_r_r6*k09_r_r6*k11_r_r6*k13_r_r6*k16_r_r6*k19_r_r6*m_m1*m_m7*m_m10 + k01_r_r6*k03_r_r6*k07_r_r6*k09_r_r6*k13_r_r6*k15_r_r6*k17_r_r6*k19_r_r6*m_m1*m_m7*m_m10 + k01_r_r6*k04_r_r6*k06_r_r6*k08_r_r6*k13_r_r6*k15_r_r6*k17_r_r6*k19_r_r6*m_m1*m_m8*m_m10 + k02_r_r6*k04_r_r6*k07_r_r6*k09_r_r6*k11_r_r6*k13_r_r6*k16_r_r6*k18_r_r6*m_m1*m_m10*m_m11 + k02_r_r6*k05_r_r6*k07_r_r6*k09_r_r6*k11_r_r6*k13_r_r6*k15_r_r6*k18_r_r6*m_m1*m_m10*m_m11 + k03_r_r6*k05_r_r6*k07_r_r6*k09_r_r6*k11_r_r6*k13_r_r6*k17_r_r6*k19_r_r6*m_m1*m_m7*m_m10 + k03_r_r6*k05_r_r6*k07_r_r6*k09_r_r6*k11_r_r6*k14_r_r6*k16_r_r6*k18_r_r6*m_m1*m_m7*m_m11 + k02_r_r6*k05_r_r6*k07_r_r6*k09_r_r6*k11_r_r6*k13_r_r6*k16_r_r6*k18_r_r6*m_m1*m_m10*m_m11 + k03_r_r6*k05_r_r6*k08_r_r6*k10_r_r6*k12_r_r6*k14_r_r6*k16_r_r6*k19_r_r6*m_m7*m_m8*m_m12 + k02_r_r6*k04_r_r6*k06_r_r6*k08_r_r6*k12_r_r6*k14_r_r6*k18_r_r6*k20_r_r6*m_m8*m_m11*m_m12 + k02_r_r6*k04_r_r6*k06_r_r6*k08_r_r6*k13_r_r6*k15_r_r6*k17_r_r6*k20_r_r6*m_m8*m_m10*m_m12 + k02_r_r6*k04_r_r6*k08_r_r6*k10_r_r6*k12_r_r6*k14_r_r6*k16_r_r6*k18_r_r6*m_m8*m_m11*m_m12 + k03_r_r6*k05_r_r6*k07_r_r6*k10_r_r6*k12_r_r6*k14_r_r6*k16_r_r6*k18_r_r6*m_m7*m_m11*m_m12 + k03_r_r6*k05_r_r6*k08_r_r6*k10_r_r6*k12_r_r6*k14_r_r6*k17_r_r6*k19_r_r6*m_m7*m_m8*m_m12 + k03_r_r6*k06_r_r6*k08_r_r6*k10_r_r6*k12_r_r6*k14_r_r6*k16_r_r6*k19_r_r6*m_m7*m_m8*m_m12 + k02_r_r6*k04_r_r6*k06_r_r6*k08_r_r6*k12_r_r6*k15_r_r6*k18_r_r6*k20_r_r6*m_m8*m_m11*m_m12 + k02_r_r6*k05_r_r6*k08_r_r6*k10_r_r6*k12_r_r6*k14_r_r6*k16_r_r6*k18_r_r6*m_m8*m_m11*m_m12 + k03_r_r6*k05_r_r6*k08_r_r6*k10_r_r6*k12_r_r6*k15_r_r6*k17_r_r6*k19_r_r6*m_m7*m_m8*m_m12 + k03_r_r6*k06_r_r6*k08_r_r6*k10_r_r6*k12_r_r6*k14_r_r6*k17_r_r6*k19_r_r6*m_m7*m_m8*m_m12 + k02_r_r6*k04_r_r6*k06_r_r6*k08_r_r6*k12_r_r6*k16_r_r6*k18_r_r6*k20_r_r6*m_m8*m_m11*m_m12 + k02_r_r6*k06_r_r6*k08_r_r6*k10_r_r6*k12_r_r6*k14_r_r6*k16_r_r6*k18_r_r6*m_m8*m_m11*m_m12 + k03_r_r6*k06_r_r6*k08_r_r6*k10_r_r6*k12_r_r6*k15_r_r6*k17_r_r6*k19_r_r6*m_m7*m_m8*m_m12 + k02_r_r6*k04_r_r6*k08_r_r6*k10_r_r6*k13_r_r6*k15_r_r6*k17_r_r6*k19_r_r6*m_m8*m_m10*m_m12 + k03_r_r6*k05_r_r6*k07_r_r6*k09_r_r6*k12_r_r6*k14_r_r6*k18_r_r6*k20_r_r6*m_m7*m_m11*m_m12 + k03_r_r6*k05_r_r6*k07_r_r6*k09_r_r6*k13_r_r6*k15_r_r6*k17_r_r6*k20_r_r6*m_m7*m_m10*m_m12 + k03_r_r6*k05_r_r6*k07_r_r6*k10_r_r6*k13_r_r6*k15_r_r6*k17_r_r6*k19_r_r6*m_m7*m_m10*m_m12 + k02_r_r6*k04_r_r6*k06_r_r6*k08_r_r6*k14_r_r6*k16_r_r6*k18_r_r6*k20_r_r6*m_m8*m_m11*m_m12 + k02_r_r6*k05_r_r6*k08_r_r6*k10_r_r6*k13_r_r6*k15_r_r6*k17_r_r6*k19_r_r6*m_m8*m_m10*m_m12 + k03_r_r6*k05_r_r6*k07_r_r6*k09_r_r6*k12_r_r6*k15_r_r6*k18_r_r6*k20_r_r6*m_m7*m_m11*m_m12 + k04_r_r6*k06_r_r6*k08_r_r6*k10_r_r6*k12_r_r6*k14_r_r6*k16_r_r6*k18_r_r6*m_m8*m_m11*m_m12 + k02_r_r6*k04_r_r6*k06_r_r6*k09_r_r6*k13_r_r6*k15_r_r6*k18_r_r6*k20_r_r6*m_m10*m_m11*m_m12 + k02_r_r6*k06_r_r6*k08_r_r6*k10_r_r6*k13_r_r6*k15_r_r6*k17_r_r6*k19_r_r6*m_m8*m_m10*m_m12 + k03_r_r6*k05_r_r6*k07_r_r6*k09_r_r6*k12_r_r6*k16_r_r6*k18_r_r6*k20_r_r6*m_m7*m_m11*m_m12 + k02_r_r6*k04_r_r6*k06_r_r6*k09_r_r6*k13_r_r6*k16_r_r6*k18_r_r6*k20_r_r6*m_m10*m_m11*m_m12 + k02_r_r6*k04_r_r6*k07_r_r6*k09_r_r6*k13_r_r6*k15_r_r6*k18_r_r6*k20_r_r6*m_m10*m_m11*m_m12 + k02_r_r6*k04_r_r6*k07_r_r6*k09_r_r6*k13_r_r6*k16_r_r6*k18_r_r6*k20_r_r6*m_m10*m_m11*m_m12 + k02_r_r6*k05_r_r6*k07_r_r6*k09_r_r6*k13_r_r6*k15_r_r6*k18_r_r6*k20_r_r6*m_m10*m_m11*m_m12 + k03_r_r6*k05_r_r6*k07_r_r6*k09_r_r6*k14_r_r6*k16_r_r6*k18_r_r6*k20_r_r6*m_m7*m_m11*m_m12 + k04_r_r6*k06_r_r6*k08_r_r6*k10_r_r6*k13_r_r6*k15_r_r6*k17_r_r6*k19_r_r6*m_m8*m_m10*m_m12 + k02_r_r6*k05_r_r6*k07_r_r6*k09_r_r6*k13_r_r6*k16_r_r6*k18_r_r6*k20_r_r6*m_m10*m_m11*m_m12 + k01_r_r6*k03_r_r6*k05_r_r6*k08_r_r6*k12_r_r6*k14_r_r6*k16_r_r6*k18_r_r6*m_m1*m_m7*m_m8*m_m11 + k01_r_r6*k03_r_r6*k06_r_r6*k08_r_r6*k12_r_r6*k14_r_r6*k16_r_r6*k18_r_r6*m_m1*m_m7*m_m8*m_m11 + k01_r_r6*k03_r_r6*k05_r_r6*k08_r_r6*k13_r_r6*k15_r_r6*k17_r_r6*k19_r_r6*m_m1*m_m7*m_m8*m_m10 + k02_r_r6*k04_r_r6*k06_r_r6*k08_r_r6*k11_r_r6*k13_r_r6*k15_r_r6*k18_r_r6*m_m1*m_m8*m_m10*m_m11 + k01_r_r6*k03_r_r6*k06_r_r6*k08_r_r6*k13_r_r6*k15_r_r6*k17_r_r6*k19_r_r6*m_m1*m_m7*m_m8*m_m10 + k02_r_r6*k04_r_r6*k06_r_r6*k08_r_r6*k11_r_r6*k13_r_r6*k16_r_r6*k18_r_r6*m_m1*m_m8*m_m10*m_m11 + k03_r_r6*k05_r_r6*k07_r_r6*k09_r_r6*k11_r_r6*k13_r_r6*k15_r_r6*k18_r_r6*m_m1*m_m7*m_m10*m_m11 + k03_r_r6*k05_r_r6*k07_r_r6*k09_r_r6*k11_r_r6*k13_r_r6*k16_r_r6*k18_r_r6*m_m1*m_m7*m_m10*m_m11 + k03_r_r6*k05_r_r6*k08_r_r6*k10_r_r6*k12_r_r6*k14_r_r6*k16_r_r6*k18_r_r6*m_m7*m_m8*m_m11*m_m12 + k03_r_r6*k06_r_r6*k08_r_r6*k10_r_r6*k12_r_r6*k14_r_r6*k16_r_r6*k18_r_r6*m_m7*m_m8*m_m11*m_m12 + k02_r_r6*k04_r_r6*k06_r_r6*k08_r_r6*k13_r_r6*k15_r_r6*k18_r_r6*k20_r_r6*m_m8*m_m10*m_m11*m_m12 + k03_r_r6*k05_r_r6*k08_r_r6*k10_r_r6*k13_r_r6*k15_r_r6*k17_r_r6*k19_r_r6*m_m7*m_m8*m_m10*m_m12 + k02_r_r6*k04_r_r6*k06_r_r6*k08_r_r6*k13_r_r6*k16_r_r6*k18_r_r6*k20_r_r6*m_m8*m_m10*m_m11*m_m12 + k03_r_r6*k06_r_r6*k08_r_r6*k10_r_r6*k13_r_r6*k15_r_r6*k17_r_r6*k19_r_r6*m_m7*m_m8*m_m10*m_m12 + k03_r_r6*k05_r_r6*k07_r_r6*k09_r_r6*k13_r_r6*k15_r_r6*k18_r_r6*k20_r_r6*m_m7*m_m10*m_m11*m_m12 + k03_r_r6*k05_r_r6*k07_r_r6*k09_r_r6*k13_r_r6*k16_r_r6*k18_r_r6*k20_r_r6*m_m7*m_m10*m_m11*m_m12))^n_sub_r_r6 + 1)*(k02_r_r6*k04_r_r6*k06_r_r6*k09_r_r6*k12_r_r6*k14_r_r6*k16_r_r6*k19_r_r6 + k02_r_r6*k04_r_r6*k06_r_r6*k09_r_r6*k12_r_r6*k14_r_r6*k17_r_r6*k19_r_r6 + k02_r_r6*k04_r_r6*k07_r_r6*k09_r_r6*k12_r_r6*k14_r_r6*k16_r_r6*k19_r_r6 + k02_r_r6*k04_r_r6*k06_r_r6*k09_r_r6*k12_r_r6*k15_r_r6*k17_r_r6*k19_r_r6 + k02_r_r6*k04_r_r6*k07_r_r6*k09_r_r6*k12_r_r6*k14_r_r6*k17_r_r6*k19_r_r6 + k02_r_r6*k05_r_r6*k07_r_r6*k09_r_r6*k12_r_r6*k14_r_r6*k16_r_r6*k19_r_r6 + k02_r_r6*k04_r_r6*k07_r_r6*k09_r_r6*k12_r_r6*k15_r_r6*k17_r_r6*k19_r_r6 + k02_r_r6*k05_r_r6*k07_r_r6*k09_r_r6*k12_r_r6*k14_r_r6*k17_r_r6*k19_r_r6 + k02_r_r6*k05_r_r6*k07_r_r6*k09_r_r6*k12_r_r6*k15_r_r6*k17_r_r6*k19_r_r6 + k01_r_r6*k04_r_r6*k06_r_r6*k09_r_r6*k12_r_r6*k14_r_r6*k16_r_r6*k19_r_r6*m_m1 + k02_r_r6*k04_r_r6*k06_r_r6*k09_r_r6*k11_r_r6*k14_r_r6*k16_r_r6*k19_r_r6*m_m1 + k01_r_r6*k04_r_r6*k06_r_r6*k09_r_r6*k12_r_r6*k14_r_r6*k17_r_r6*k19_r_r6*m_m1 + k01_r_r6*k04_r_r6*k07_r_r6*k09_r_r6*k12_r_r6*k14_r_r6*k16_r_r6*k19_r_r6*m_m1 + k02_r_r6*k04_r_r6*k06_r_r6*k09_r_r6*k11_r_r6*k14_r_r6*k17_r_r6*k19_r_r6*m_m1 + k02_r_r6*k04_r_r6*k07_r_r6*k09_r_r6*k11_r_r6*k14_r_r6*k16_r_r6*k19_r_r6*m_m1 + k01_r_r6*k04_r_r6*k06_r_r6*k09_r_r6*k12_r_r6*k15_r_r6*k17_r_r6*k19_r_r6*m_m1 + k01_r_r6*k04_r_r6*k07_r_r6*k09_r_r6*k12_r_r6*k14_r_r6*k17_r_r6*k19_r_r6*m_m1 + k01_r_r6*k05_r_r6*k07_r_r6*k09_r_r6*k12_r_r6*k14_r_r6*k16_r_r6*k19_r_r6*m_m1 + k02_r_r6*k04_r_r6*k06_r_r6*k09_r_r6*k11_r_r6*k15_r_r6*k17_r_r6*k19_r_r6*m_m1 + k02_r_r6*k04_r_r6*k07_r_r6*k09_r_r6*k11_r_r6*k14_r_r6*k17_r_r6*k19_r_r6*m_m1 + k02_r_r6*k05_r_r6*k07_r_r6*k09_r_r6*k11_r_r6*k14_r_r6*k16_r_r6*k19_r_r6*m_m1 + k01_r_r6*k04_r_r6*k07_r_r6*k09_r_r6*k12_r_r6*k15_r_r6*k17_r_r6*k19_r_r6*m_m1 + k01_r_r6*k05_r_r6*k07_r_r6*k09_r_r6*k12_r_r6*k14_r_r6*k17_r_r6*k19_r_r6*m_m1 + k02_r_r6*k04_r_r6*k07_r_r6*k09_r_r6*k11_r_r6*k15_r_r6*k17_r_r6*k19_r_r6*m_m1 + k02_r_r6*k05_r_r6*k07_r_r6*k09_r_r6*k11_r_r6*k14_r_r6*k17_r_r6*k19_r_r6*m_m1 + k01_r_r6*k05_r_r6*k07_r_r6*k09_r_r6*k12_r_r6*k15_r_r6*k17_r_r6*k19_r_r6*m_m1 + k02_r_r6*k05_r_r6*k07_r_r6*k09_r_r6*k11_r_r6*k15_r_r6*k17_r_r6*k19_r_r6*m_m1 + k02_r_r6*k04_r_r6*k06_r_r6*k08_r_r6*k12_r_r6*k14_r_r6*k16_r_r6*k19_r_r6*m_m8 + k02_r_r6*k04_r_r6*k06_r_r6*k08_r_r6*k12_r_r6*k14_r_r6*k17_r_r6*k19_r_r6*m_m8 + k02_r_r6*k04_r_r6*k06_r_r6*k08_r_r6*k12_r_r6*k15_r_r6*k17_r_r6*k19_r_r6*m_m8 + k02_r_r6*k04_r_r6*k06_r_r6*k09_r_r6*k12_r_r6*k14_r_r6*k16_r_r6*k18_r_r6*m_m11 + k03_r_r6*k05_r_r6*k07_r_r6*k09_r_r6*k12_r_r6*k14_r_r6*k16_r_r6*k19_r_r6*m_m7 + k02_r_r6*k04_r_r6*k07_r_r6*k09_r_r6*k12_r_r6*k14_r_r6*k16_r_r6*k18_r_r6*m_m11 + k03_r_r6*k05_r_r6*k07_r_r6*k09_r_r6*k12_r_r6*k14_r_r6*k17_r_r6*k19_r_r6*m_m7 + k02_r_r6*k05_r_r6*k07_r_r6*k09_r_r6*k12_r_r6*k14_r_r6*k16_r_r6*k18_r_r6*m_m11 + k03_r_r6*k05_r_r6*k07_r_r6*k09_r_r6*k12_r_r6*k15_r_r6*k17_r_r6*k19_r_r6*m_m7 + k02_r_r6*k04_r_r6*k06_r_r6*k09_r_r6*k12_r_r6*k14_r_r6*k16_r_r6*k20_r_r6*m_m12 + k02_r_r6*k04_r_r6*k06_r_r6*k09_r_r6*k13_r_r6*k15_r_r6*k17_r_r6*k19_r_r6*m_m10 + k02_r_r6*k04_r_r6*k06_r_r6*k10_r_r6*k12_r_r6*k14_r_r6*k16_r_r6*k19_r_r6*m_m12 + k02_r_r6*k04_r_r6*k06_r_r6*k09_r_r6*k12_r_r6*k14_r_r6*k17_r_r6*k20_r_r6*m_m12 + k02_r_r6*k04_r_r6*k06_r_r6*k10_r_r6*k12_r_r6*k14_r_r6*k17_r_r6*k19_r_r6*m_m12 + k02_r_r6*k04_r_r6*k07_r_r6*k09_r_r6*k12_r_r6*k14_r_r6*k16_r_r6*k20_r_r6*m_m12 + k02_r_r6*k04_r_r6*k07_r_r6*k09_r_r6*k13_r_r6*k15_r_r6*k17_r_r6*k19_r_r6*m_m10 + k02_r_r6*k04_r_r6*k07_r_r6*k10_r_r6*k12_r_r6*k14_r_r6*k16_r_r6*k19_r_r6*m_m12 + k02_r_r6*k04_r_r6*k06_r_r6*k09_r_r6*k12_r_r6*k15_r_r6*k17_r_r6*k20_r_r6*m_m12 + k02_r_r6*k04_r_r6*k06_r_r6*k10_r_r6*k12_r_r6*k15_r_r6*k17_r_r6*k19_r_r6*m_m12 + k02_r_r6*k04_r_r6*k07_r_r6*k09_r_r6*k12_r_r6*k14_r_r6*k17_r_r6*k20_r_r6*m_m12 + k02_r_r6*k04_r_r6*k07_r_r6*k10_r_r6*k12_r_r6*k14_r_r6*k17_r_r6*k19_r_r6*m_m12 + k02_r_r6*k05_r_r6*k07_r_r6*k09_r_r6*k12_r_r6*k14_r_r6*k16_r_r6*k20_r_r6*m_m12 + k02_r_r6*k05_r_r6*k07_r_r6*k09_r_r6*k13_r_r6*k15_r_r6*k17_r_r6*k19_r_r6*m_m10 + k02_r_r6*k05_r_r6*k07_r_r6*k10_r_r6*k12_r_r6*k14_r_r6*k16_r_r6*k19_r_r6*m_m12 + k02_r_r6*k04_r_r6*k07_r_r6*k09_r_r6*k12_r_r6*k15_r_r6*k17_r_r6*k20_r_r6*m_m12 + k02_r_r6*k04_r_r6*k07_r_r6*k10_r_r6*k12_r_r6*k15_r_r6*k17_r_r6*k19_r_r6*m_m12 + k02_r_r6*k05_r_r6*k07_r_r6*k09_r_r6*k12_r_r6*k14_r_r6*k17_r_r6*k20_r_r6*m_m12 + k02_r_r6*k05_r_r6*k07_r_r6*k10_r_r6*k12_r_r6*k14_r_r6*k17_r_r6*k19_r_r6*m_m12 + k02_r_r6*k05_r_r6*k07_r_r6*k09_r_r6*k12_r_r6*k15_r_r6*k17_r_r6*k20_r_r6*m_m12 + k02_r_r6*k05_r_r6*k07_r_r6*k10_r_r6*k12_r_r6*k15_r_r6*k17_r_r6*k19_r_r6*m_m12 + k01_r_r6*k03_r_r6*k05_r_r6*k07_r_r6*k12_r_r6*k14_r_r6*k16_r_r6*k19_r_r6*m_m1*m_m7 + k01_r_r6*k03_r_r6*k05_r_r6*k07_r_r6*k12_r_r6*k14_r_r6*k17_r_r6*k19_r_r6*m_m1*m_m7 + k01_r_r6*k03_r_r6*k05_r_r6*k07_r_r6*k12_r_r6*k15_r_r6*k17_r_r6*k19_r_r6*m_m1*m_m7 + k01_r_r6*k03_r_r6*k05_r_r6*k09_r_r6*k12_r_r6*k14_r_r6*k16_r_r6*k19_r_r6*m_m1*m_m7 + k01_r_r6*k03_r_r6*k05_r_r6*k09_r_r6*k12_r_r6*k14_r_r6*k17_r_r6*k19_r_r6*m_m1*m_m7 + k01_r_r6*k03_r_r6*k06_r_r6*k09_r_r6*k12_r_r6*k14_r_r6*k16_r_r6*k19_r_r6*m_m1*m_m7 + k02_r_r6*k04_r_r6*k06_r_r6*k09_r_r6*k11_r_r6*k13_r_r6*k15_r_r6*k17_r_r6*m_m1*m_m10 + k01_r_r6*k03_r_r6*k05_r_r6*k09_r_r6*k12_r_r6*k15_r_r6*k17_r_r6*k19_r_r6*m_m1*m_m7 + k01_r_r6*k03_r_r6*k06_r_r6*k09_r_r6*k12_r_r6*k14_r_r6*k17_r_r6*k19_r_r6*m_m1*m_m7 + k01_r_r6*k03_r_r6*k07_r_r6*k09_r_r6*k12_r_r6*k14_r_r6*k16_r_r6*k19_r_r6*m_m1*m_m7 + k01_r_r6*k04_r_r6*k06_r_r6*k08_r_r6*k12_r_r6*k14_r_r6*k16_r_r6*k19_r_r6*m_m1*m_m8 + k02_r_r6*k04_r_r6*k06_r_r6*k08_r_r6*k11_r_r6*k14_r_r6*k16_r_r6*k19_r_r6*m_m1*m_m8 + k02_r_r6*k04_r_r6*k07_r_r6*k09_r_r6*k11_r_r6*k13_r_r6*k15_r_r6*k17_r_r6*m_m1*m_m10 + k01_r_r6*k03_r_r6*k06_r_r6*k09_r_r6*k12_r_r6*k15_r_r6*k17_r_r6*k19_r_r6*m_m1*m_m7 + k01_r_r6*k03_r_r6*k07_r_r6*k09_r_r6*k12_r_r6*k14_r_r6*k17_r_r6*k19_r_r6*m_m1*m_m7 + k01_r_r6*k04_r_r6*k06_r_r6*k08_r_r6*k12_r_r6*k14_r_r6*k17_r_r6*k19_r_r6*m_m1*m_m8 + k02_r_r6*k04_r_r6*k06_r_r6*k08_r_r6*k11_r_r6*k14_r_r6*k17_r_r6*k19_r_r6*m_m1*m_m8 + k02_r_r6*k04_r_r6*k06_r_r6*k09_r_r6*k11_r_r6*k13_r_r6*k15_r_r6*k19_r_r6*m_m1*m_m10 + k02_r_r6*k05_r_r6*k07_r_r6*k09_r_r6*k11_r_r6*k13_r_r6*k15_r_r6*k17_r_r6*m_m1*m_m10 + k01_r_r6*k03_r_r6*k07_r_r6*k09_r_r6*k12_r_r6*k15_r_r6*k17_r_r6*k19_r_r6*m_m1*m_m7 + k01_r_r6*k04_r_r6*k06_r_r6*k08_r_r6*k12_r_r6*k15_r_r6*k17_r_r6*k19_r_r6*m_m1*m_m8 + k02_r_r6*k04_r_r6*k06_r_r6*k08_r_r6*k11_r_r6*k15_r_r6*k17_r_r6*k19_r_r6*m_m1*m_m8 + k02_r_r6*k04_r_r6*k06_r_r6*k09_r_r6*k11_r_r6*k13_r_r6*k16_r_r6*k19_r_r6*m_m1*m_m10 + k02_r_r6*k04_r_r6*k07_r_r6*k09_r_r6*k11_r_r6*k13_r_r6*k15_r_r6*k19_r_r6*m_m1*m_m10 + k01_r_r6*k04_r_r6*k06_r_r6*k09_r_r6*k12_r_r6*k14_r_r6*k16_r_r6*k18_r_r6*m_m1*m_m11 + k02_r_r6*k04_r_r6*k06_r_r6*k09_r_r6*k11_r_r6*k13_r_r6*k17_r_r6*k19_r_r6*m_m1*m_m10 + k02_r_r6*k04_r_r6*k06_r_r6*k09_r_r6*k11_r_r6*k14_r_r6*k16_r_r6*k18_r_r6*m_m1*m_m11 + k02_r_r6*k04_r_r6*k07_r_r6*k09_r_r6*k11_r_r6*k13_r_r6*k16_r_r6*k19_r_r6*m_m1*m_m10 + k02_r_r6*k05_r_r6*k07_r_r6*k09_r_r6*k11_r_r6*k13_r_r6*k15_r_r6*k19_r_r6*m_m1*m_m10 + k03_r_r6*k05_r_r6*k07_r_r6*k09_r_r6*k11_r_r6*k14_r_r6*k16_r_r6*k19_r_r6*m_m1*m_m7 + k01_r_r6*k04_r_r6*k07_r_r6*k09_r_r6*k12_r_r6*k14_r_r6*k16_r_r6*k18_r_r6*m_m1*m_m11 + k02_r_r6*k04_r_r6*k07_r_r6*k09_r_r6*k11_r_r6*k13_r_r6*k17_r_r6*k19_r_r6*m_m1*m_m10 + k02_r_r6*k04_r_r6*k07_r_r6*k09_r_r6*k11_r_r6*k14_r_r6*k16_r_r6*k18_r_r6*m_m1*m_m11 + k02_r_r6*k05_r_r6*k07_r_r6*k09_r_r6*k11_r_r6*k13_r_r6*k16_r_r6*k19_r_r6*m_m1*m_m10 + k03_r_r6*k05_r_r6*k07_r_r6*k09_r_r6*k11_r_r6*k14_r_r6*k17_r_r6*k19_r_r6*m_m1*m_m7 + k01_r_r6*k05_r_r6*k07_r_r6*k09_r_r6*k12_r_r6*k14_r_r6*k16_r_r6*k18_r_r6*m_m1*m_m11 + k02_r_r6*k05_r_r6*k07_r_r6*k09_r_r6*k11_r_r6*k13_r_r6*k17_r_r6*k19_r_r6*m_m1*m_m10 + k02_r_r6*k05_r_r6*k07_r_r6*k09_r_r6*k11_r_r6*k14_r_r6*k16_r_r6*k18_r_r6*m_m1*m_m11 + k03_r_r6*k05_r_r6*k07_r_r6*k09_r_r6*k11_r_r6*k15_r_r6*k17_r_r6*k19_r_r6*m_m1*m_m7 + k01_r_r6*k04_r_r6*k06_r_r6*k09_r_r6*k13_r_r6*k15_r_r6*k17_r_r6*k19_r_r6*m_m1*m_m10 + k01_r_r6*k04_r_r6*k07_r_r6*k09_r_r6*k13_r_r6*k15_r_r6*k17_r_r6*k19_r_r6*m_m1*m_m10 + k01_r_r6*k05_r_r6*k07_r_r6*k09_r_r6*k13_r_r6*k15_r_r6*k17_r_r6*k19_r_r6*m_m1*m_m10 + k02_r_r6*k04_r_r6*k06_r_r6*k08_r_r6*k12_r_r6*k14_r_r6*k16_r_r6*k18_r_r6*m_m8*m_m11 + k02_r_r6*k04_r_r6*k06_r_r6*k08_r_r6*k12_r_r6*k14_r_r6*k16_r_r6*k20_r_r6*m_m8*m_m12 + k02_r_r6*k04_r_r6*k06_r_r6*k08_r_r6*k13_r_r6*k15_r_r6*k17_r_r6*k19_r_r6*m_m8*m_m10 + k03_r_r6*k05_r_r6*k07_r_r6*k09_r_r6*k12_r_r6*k14_r_r6*k16_r_r6*k18_r_r6*m_m7*m_m11 + k02_r_r6*k04_r_r6*k06_r_r6*k08_r_r6*k12_r_r6*k14_r_r6*k17_r_r6*k20_r_r6*m_m8*m_m12 + k02_r_r6*k04_r_r6*k06_r_r6*k08_r_r6*k12_r_r6*k15_r_r6*k17_r_r6*k20_r_r6*m_m8*m_m12 + k02_r_r6*k04_r_r6*k06_r_r6*k10_r_r6*k12_r_r6*k14_r_r6*k16_r_r6*k18_r_r6*m_m11*m_m12 + k02_r_r6*k04_r_r6*k08_r_r6*k10_r_r6*k12_r_r6*k14_r_r6*k16_r_r6*k19_r_r6*m_m8*m_m12 + k03_r_r6*k05_r_r6*k07_r_r6*k09_r_r6*k12_r_r6*k14_r_r6*k16_r_r6*k20_r_r6*m_m7*m_m12 + k03_r_r6*k05_r_r6*k07_r_r6*k09_r_r6*k13_r_r6*k15_r_r6*k17_r_r6*k19_r_r6*m_m7*m_m10 + k03_r_r6*k05_r_r6*k07_r_r6*k10_r_r6*k12_r_r6*k14_r_r6*k16_r_r6*k19_r_r6*m_m7*m_m12 + k02_r_r6*k04_r_r6*k07_r_r6*k10_r_r6*k12_r_r6*k14_r_r6*k16_r_r6*k18_r_r6*m_m11*m_m12 + k02_r_r6*k04_r_r6*k08_r_r6*k10_r_r6*k12_r_r6*k14_r_r6*k17_r_r6*k19_r_r6*m_m8*m_m12 + k02_r_r6*k05_r_r6*k08_r_r6*k10_r_r6*k12_r_r6*k14_r_r6*k16_r_r6*k19_r_r6*m_m8*m_m12 + k03_r_r6*k05_r_r6*k07_r_r6*k09_r_r6*k12_r_r6*k14_r_r6*k17_r_r6*k20_r_r6*m_m7*m_m12 + k03_r_r6*k05_r_r6*k07_r_r6*k10_r_r6*k12_r_r6*k14_r_r6*k17_r_r6*k19_r_r6*m_m7*m_m12 + k02_r_r6*k04_r_r6*k08_r_r6*k10_r_r6*k12_r_r6*k15_r_r6*k17_r_r6*k19_r_r6*m_m8*m_m12 + k02_r_r6*k05_r_r6*k07_r_r6*k10_r_r6*k12_r_r6*k14_r_r6*k16_r_r6*k18_r_r6*m_m11*m_m12 + k02_r_r6*k05_r_r6*k08_r_r6*k10_r_r6*k12_r_r6*k14_r_r6*k17_r_r6*k19_r_r6*m_m8*m_m12 + k02_r_r6*k06_r_r6*k08_r_r6*k10_r_r6*k12_r_r6*k14_r_r6*k16_r_r6*k19_r_r6*m_m8*m_m12 + k03_r_r6*k05_r_r6*k07_r_r6*k09_r_r6*k12_r_r6*k15_r_r6*k17_r_r6*k20_r_r6*m_m7*m_m12 + k03_r_r6*k05_r_r6*k07_r_r6*k10_r_r6*k12_r_r6*k15_r_r6*k17_r_r6*k19_r_r6*m_m7*m_m12 + k02_r_r6*k04_r_r6*k06_r_r6*k09_r_r6*k12_r_r6*k14_r_r6*k18_r_r6*k20_r_r6*m_m11*m_m12 + k02_r_r6*k04_r_r6*k06_r_r6*k09_r_r6*k13_r_r6*k15_r_r6*k17_r_r6*k20_r_r6*m_m10*m_m12 + k02_r_r6*k04_r_r6*k06_r_r6*k10_r_r6*k13_r_r6*k15_r_r6*k17_r_r6*k19_r_r6*m_m10*m_m12 + k02_r_r6*k05_r_r6*k08_r_r6*k10_r_r6*k12_r_r6*k15_r_r6*k17_r_r6*k19_r_r6*m_m8*m_m12 + k02_r_r6*k06_r_r6*k08_r_r6*k10_r_r6*k12_r_r6*k14_r_r6*k17_r_r6*k19_r_r6*m_m8*m_m12 + k02_r_r6*k04_r_r6*k06_r_r6*k09_r_r6*k12_r_r6*k15_r_r6*k18_r_r6*k20_r_r6*m_m11*m_m12 + k02_r_r6*k04_r_r6*k07_r_r6*k09_r_r6*k12_r_r6*k14_r_r6*k18_r_r6*k20_r_r6*m_m11*m_m12 + k02_r_r6*k04_r_r6*k07_r_r6*k09_r_r6*k13_r_r6*k15_r_r6*k17_r_r6*k20_r_r6*m_m10*m_m12 + k02_r_r6*k04_r_r6*k07_r_r6*k10_r_r6*k13_r_r6*k15_r_r6*k17_r_r6*k19_r_r6*m_m10*m_m12 + k02_r_r6*k06_r_r6*k08_r_r6*k10_r_r6*k12_r_r6*k15_r_r6*k17_r_r6*k19_r_r6*m_m8*m_m12 + k04_r_r6*k06_r_r6*k08_r_r6*k10_r_r6*k12_r_r6*k14_r_r6*k16_r_r6*k19_r_r6*m_m8*m_m12 + k02_r_r6*k04_r_r6*k06_r_r6*k09_r_r6*k12_r_r6*k16_r_r6*k18_r_r6*k20_r_r6*m_m11*m_m12 + k02_r_r6*k04_r_r6*k07_r_r6*k09_r_r6*k12_r_r6*k15_r_r6*k18_r_r6*k20_r_r6*m_m11*m_m12 + k02_r_r6*k05_r_r6*k07_r_r6*k09_r_r6*k12_r_r6*k14_r_r6*k18_r_r6*k20_r_r6*m_m11*m_m12 + k02_r_r6*k05_r_r6*k07_r_r6*k09_r_r6*k13_r_r6*k15_r_r6*k17_r_r6*k20_r_r6*m_m10*m_m12 + k02_r_r6*k05_r_r6*k07_r_r6*k10_r_r6*k13_r_r6*k15_r_r6*k17_r_r6*k19_r_r6*m_m10*m_m12 + k04_r_r6*k06_r_r6*k08_r_r6*k10_r_r6*k12_r_r6*k14_r_r6*k17_r_r6*k19_r_r6*m_m8*m_m12 + k02_r_r6*k04_r_r6*k07_r_r6*k09_r_r6*k12_r_r6*k16_r_r6*k18_r_r6*k20_r_r6*m_m11*m_m12 + k02_r_r6*k05_r_r6*k07_r_r6*k09_r_r6*k12_r_r6*k15_r_r6*k18_r_r6*k20_r_r6*m_m11*m_m12 + k04_r_r6*k06_r_r6*k08_r_r6*k10_r_r6*k12_r_r6*k15_r_r6*k17_r_r6*k19_r_r6*m_m8*m_m12 + k02_r_r6*k04_r_r6*k06_r_r6*k09_r_r6*k14_r_r6*k16_r_r6*k18_r_r6*k20_r_r6*m_m11*m_m12 + k02_r_r6*k05_r_r6*k07_r_r6*k09_r_r6*k12_r_r6*k16_r_r6*k18_r_r6*k20_r_r6*m_m11*m_m12 + k02_r_r6*k04_r_r6*k07_r_r6*k09_r_r6*k14_r_r6*k16_r_r6*k18_r_r6*k20_r_r6*m_m11*m_m12 + k02_r_r6*k05_r_r6*k07_r_r6*k09_r_r6*k14_r_r6*k16_r_r6*k18_r_r6*k20_r_r6*m_m11*m_m12 + k01_r_r6*k03_r_r6*k05_r_r6*k08_r_r6*k12_r_r6*k14_r_r6*k16_r_r6*k19_r_r6*m_m1*m_m7*m_m8 + k01_r_r6*k03_r_r6*k05_r_r6*k07_r_r6*k12_r_r6*k14_r_r6*k16_r_r6*k18_r_r6*m_m1*m_m7*m_m11 + k01_r_r6*k03_r_r6*k05_r_r6*k08_r_r6*k12_r_r6*k14_r_r6*k17_r_r6*k19_r_r6*m_m1*m_m7*m_m8 + k01_r_r6*k03_r_r6*k06_r_r6*k08_r_r6*k12_r_r6*k14_r_r6*k16_r_r6*k19_r_r6*m_m1*m_m7*m_m8 + k02_r_r6*k04_r_r6*k06_r_r6*k08_r_r6*k11_r_r6*k13_r_r6*k15_r_r6*k17_r_r6*m_m1*m_m8*m_m10 + k01_r_r6*k03_r_r6*k05_r_r6*k08_r_r6*k12_r_r6*k15_r_r6*k17_r_r6*k19_r_r6*m_m1*m_m7*m_m8 + k01_r_r6*k03_r_r6*k06_r_r6*k08_r_r6*k12_r_r6*k14_r_r6*k17_r_r6*k19_r_r6*m_m1*m_m7*m_m8 + k01_r_r6*k03_r_r6*k05_r_r6*k09_r_r6*k12_r_r6*k14_r_r6*k16_r_r6*k18_r_r6*m_m1*m_m7*m_m11 + k01_r_r6*k03_r_r6*k06_r_r6*k08_r_r6*k12_r_r6*k15_r_r6*k17_r_r6*k19_r_r6*m_m1*m_m7*m_m8 + k02_r_r6*k04_r_r6*k06_r_r6*k08_r_r6*k11_r_r6*k13_r_r6*k15_r_r6*k19_r_r6*m_m1*m_m8*m_m10 + k01_r_r6*k03_r_r6*k05_r_r6*k07_r_r6*k13_r_r6*k15_r_r6*k17_r_r6*k19_r_r6*m_m1*m_m7*m_m10 + k01_r_r6*k03_r_r6*k06_r_r6*k09_r_r6*k12_r_r6*k14_r_r6*k16_r_r6*k18_r_r6*m_m1*m_m7*m_m11 + k02_r_r6*k04_r_r6*k06_r_r6*k08_r_r6*k11_r_r6*k13_r_r6*k16_r_r6*k19_r_r6*m_m1*m_m8*m_m10 + k03_r_r6*k05_r_r6*k07_r_r6*k09_r_r6*k11_r_r6*k13_r_r6*k15_r_r6*k17_r_r6*m_m1*m_m7*m_m10 + k01_r_r6*k03_r_r6*k07_r_r6*k09_r_r6*k12_r_r6*k14_r_r6*k16_r_r6*k18_r_r6*m_m1*m_m7*m_m11 + k01_r_r6*k04_r_r6*k06_r_r6*k08_r_r6*k12_r_r6*k14_r_r6*k16_r_r6*k18_r_r6*m_m1*m_m8*m_m11 + k02_r_r6*k04_r_r6*k06_r_r6*k08_r_r6*k11_r_r6*k13_r_r6*k17_r_r6*k19_r_r6*m_m1*m_m8*m_m10 + k02_r_r6*k04_r_r6*k06_r_r6*k08_r_r6*k11_r_r6*k14_r_r6*k16_r_r6*k18_r_r6*m_m1*m_m8*m_m11 + k01_r_r6*k03_r_r6*k05_r_r6*k09_r_r6*k13_r_r6*k15_r_r6*k17_r_r6*k19_r_r6*m_m1*m_m7*m_m10 + k02_r_r6*k04_r_r6*k06_r_r6*k09_r_r6*k11_r_r6*k13_r_r6*k15_r_r6*k18_r_r6*m_m1*m_m10*m_m11 + k03_r_r6*k05_r_r6*k07_r_r6*k09_r_r6*k11_r_r6*k13_r_r6*k15_r_r6*k19_r_r6*m_m1*m_m7*m_m10 + k01_r_r6*k03_r_r6*k06_r_r6*k09_r_r6*k13_r_r6*k15_r_r6*k17_r_r6*k19_r_r6*m_m1*m_m7*m_m10 + k02_r_r6*k04_r_r6*k06_r_r6*k09_r_r6*k11_r_r6*k13_r_r6*k16_r_r6*k18_r_r6*m_m1*m_m10*m_m11 + k02_r_r6*k04_r_r6*k07_r_r6*k09_r_r6*k11_r_r6*k13_r_r6*k15_r_r6*k18_r_r6*m_m1*m_m10*m_m11 + k03_r_r6*k05_r_r6*k07_r_r6*k09_r_r6*k11_r_r6*k13_r_r6*k16_r_r6*k19_r_r6*m_m1*m_m7*m_m10 + k01_r_r6*k03_r_r6*k07_r_r6*k09_r_r6*k13_r_r6*k15_r_r6*k17_r_r6*k19_r_r6*m_m1*m_m7*m_m10 + k01_r_r6*k04_r_r6*k06_r_r6*k08_r_r6*k13_r_r6*k15_r_r6*k17_r_r6*k19_r_r6*m_m1*m_m8*m_m10 + k02_r_r6*k04_r_r6*k07_r_r6*k09_r_r6*k11_r_r6*k13_r_r6*k16_r_r6*k18_r_r6*m_m1*m_m10*m_m11 + k02_r_r6*k05_r_r6*k07_r_r6*k09_r_r6*k11_r_r6*k13_r_r6*k15_r_r6*k18_r_r6*m_m1*m_m10*m_m11 + k03_r_r6*k05_r_r6*k07_r_r6*k09_r_r6*k11_r_r6*k13_r_r6*k17_r_r6*k19_r_r6*m_m1*m_m7*m_m10 + k03_r_r6*k05_r_r6*k07_r_r6*k09_r_r6*k11_r_r6*k14_r_r6*k16_r_r6*k18_r_r6*m_m1*m_m7*m_m11 + k02_r_r6*k05_r_r6*k07_r_r6*k09_r_r6*k11_r_r6*k13_r_r6*k16_r_r6*k18_r_r6*m_m1*m_m10*m_m11 + k03_r_r6*k05_r_r6*k08_r_r6*k10_r_r6*k12_r_r6*k14_r_r6*k16_r_r6*k19_r_r6*m_m7*m_m8*m_m12 + k02_r_r6*k04_r_r6*k06_r_r6*k08_r_r6*k12_r_r6*k14_r_r6*k18_r_r6*k20_r_r6*m_m8*m_m11*m_m12 + k02_r_r6*k04_r_r6*k06_r_r6*k08_r_r6*k13_r_r6*k15_r_r6*k17_r_r6*k20_r_r6*m_m8*m_m10*m_m12 + k02_r_r6*k04_r_r6*k08_r_r6*k10_r_r6*k12_r_r6*k14_r_r6*k16_r_r6*k18_r_r6*m_m8*m_m11*m_m12 + k03_r_r6*k05_r_r6*k07_r_r6*k10_r_r6*k12_r_r6*k14_r_r6*k16_r_r6*k18_r_r6*m_m7*m_m11*m_m12 + k03_r_r6*k05_r_r6*k08_r_r6*k10_r_r6*k12_r_r6*k14_r_r6*k17_r_r6*k19_r_r6*m_m7*m_m8*m_m12 + k03_r_r6*k06_r_r6*k08_r_r6*k10_r_r6*k12_r_r6*k14_r_r6*k16_r_r6*k19_r_r6*m_m7*m_m8*m_m12 + k02_r_r6*k04_r_r6*k06_r_r6*k08_r_r6*k12_r_r6*k15_r_r6*k18_r_r6*k20_r_r6*m_m8*m_m11*m_m12 + k02_r_r6*k05_r_r6*k08_r_r6*k10_r_r6*k12_r_r6*k14_r_r6*k16_r_r6*k18_r_r6*m_m8*m_m11*m_m12 + k03_r_r6*k05_r_r6*k08_r_r6*k10_r_r6*k12_r_r6*k15_r_r6*k17_r_r6*k19_r_r6*m_m7*m_m8*m_m12 + k03_r_r6*k06_r_r6*k08_r_r6*k10_r_r6*k12_r_r6*k14_r_r6*k17_r_r6*k19_r_r6*m_m7*m_m8*m_m12 + k02_r_r6*k04_r_r6*k06_r_r6*k08_r_r6*k12_r_r6*k16_r_r6*k18_r_r6*k20_r_r6*m_m8*m_m11*m_m12 + k02_r_r6*k06_r_r6*k08_r_r6*k10_r_r6*k12_r_r6*k14_r_r6*k16_r_r6*k18_r_r6*m_m8*m_m11*m_m12 + k03_r_r6*k06_r_r6*k08_r_r6*k10_r_r6*k12_r_r6*k15_r_r6*k17_r_r6*k19_r_r6*m_m7*m_m8*m_m12 + k02_r_r6*k04_r_r6*k08_r_r6*k10_r_r6*k13_r_r6*k15_r_r6*k17_r_r6*k19_r_r6*m_m8*m_m10*m_m12 + k03_r_r6*k05_r_r6*k07_r_r6*k09_r_r6*k12_r_r6*k14_r_r6*k18_r_r6*k20_r_r6*m_m7*m_m11*m_m12 + k03_r_r6*k05_r_r6*k07_r_r6*k09_r_r6*k13_r_r6*k15_r_r6*k17_r_r6*k20_r_r6*m_m7*m_m10*m_m12 + k03_r_r6*k05_r_r6*k07_r_r6*k10_r_r6*k13_r_r6*k15_r_r6*k17_r_r6*k19_r_r6*m_m7*m_m10*m_m12 + k02_r_r6*k04_r_r6*k06_r_r6*k08_r_r6*k14_r_r6*k16_r_r6*k18_r_r6*k20_r_r6*m_m8*m_m11*m_m12 + k02_r_r6*k05_r_r6*k08_r_r6*k10_r_r6*k13_r_r6*k15_r_r6*k17_r_r6*k19_r_r6*m_m8*m_m10*m_m12 + k03_r_r6*k05_r_r6*k07_r_r6*k09_r_r6*k12_r_r6*k15_r_r6*k18_r_r6*k20_r_r6*m_m7*m_m11*m_m12 + k04_r_r6*k06_r_r6*k08_r_r6*k10_r_r6*k12_r_r6*k14_r_r6*k16_r_r6*k18_r_r6*m_m8*m_m11*m_m12 + k02_r_r6*k04_r_r6*k06_r_r6*k09_r_r6*k13_r_r6*k15_r_r6*k18_r_r6*k20_r_r6*m_m10*m_m11*m_m12 + k02_r_r6*k06_r_r6*k08_r_r6*k10_r_r6*k13_r_r6*k15_r_r6*k17_r_r6*k19_r_r6*m_m8*m_m10*m_m12 + k03_r_r6*k05_r_r6*k07_r_r6*k09_r_r6*k12_r_r6*k16_r_r6*k18_r_r6*k20_r_r6*m_m7*m_m11*m_m12 + k02_r_r6*k04_r_r6*k06_r_r6*k09_r_r6*k13_r_r6*k16_r_r6*k18_r_r6*k20_r_r6*m_m10*m_m11*m_m12 + k02_r_r6*k04_r_r6*k07_r_r6*k09_r_r6*k13_r_r6*k15_r_r6*k18_r_r6*k20_r_r6*m_m10*m_m11*m_m12 + k02_r_r6*k04_r_r6*k07_r_r6*k09_r_r6*k13_r_r6*k16_r_r6*k18_r_r6*k20_r_r6*m_m10*m_m11*m_m12 + k02_r_r6*k05_r_r6*k07_r_r6*k09_r_r6*k13_r_r6*k15_r_r6*k18_r_r6*k20_r_r6*m_m10*m_m11*m_m12 + k03_r_r6*k05_r_r6*k07_r_r6*k09_r_r6*k14_r_r6*k16_r_r6*k18_r_r6*k20_r_r6*m_m7*m_m11*m_m12 + k04_r_r6*k06_r_r6*k08_r_r6*k10_r_r6*k13_r_r6*k15_r_r6*k17_r_r6*k19_r_r6*m_m8*m_m10*m_m12 + k02_r_r6*k05_r_r6*k07_r_r6*k09_r_r6*k13_r_r6*k16_r_r6*k18_r_r6*k20_r_r6*m_m10*m_m11*m_m12 + k01_r_r6*k03_r_r6*k05_r_r6*k08_r_r6*k12_r_r6*k14_r_r6*k16_r_r6*k18_r_r6*m_m1*m_m7*m_m8*m_m11 + k01_r_r6*k03_r_r6*k06_r_r6*k08_r_r6*k12_r_r6*k14_r_r6*k16_r_r6*k18_r_r6*m_m1*m_m7*m_m8*m_m11 + k01_r_r6*k03_r_r6*k05_r_r6*k08_r_r6*k13_r_r6*k15_r_r6*k17_r_r6*k19_r_r6*m_m1*m_m7*m_m8*m_m10 + k02_r_r6*k04_r_r6*k06_r_r6*k08_r_r6*k11_r_r6*k13_r_r6*k15_r_r6*k18_r_r6*m_m1*m_m8*m_m10*m_m11 + k01_r_r6*k03_r_r6*k06_r_r6*k08_r_r6*k13_r_r6*k15_r_r6*k17_r_r6*k19_r_r6*m_m1*m_m7*m_m8*m_m10 + k02_r_r6*k04_r_r6*k06_r_r6*k08_r_r6*k11_r_r6*k13_r_r6*k16_r_r6*k18_r_r6*m_m1*m_m8*m_m10*m_m11 + k03_r_r6*k05_r_r6*k07_r_r6*k09_r_r6*k11_r_r6*k13_r_r6*k15_r_r6*k18_r_r6*m_m1*m_m7*m_m10*m_m11 + k03_r_r6*k05_r_r6*k07_r_r6*k09_r_r6*k11_r_r6*k13_r_r6*k16_r_r6*k18_r_r6*m_m1*m_m7*m_m10*m_m11 + k03_r_r6*k05_r_r6*k08_r_r6*k10_r_r6*k12_r_r6*k14_r_r6*k16_r_r6*k18_r_r6*m_m7*m_m8*m_m11*m_m12 + k03_r_r6*k06_r_r6*k08_r_r6*k10_r_r6*k12_r_r6*k14_r_r6*k16_r_r6*k18_r_r6*m_m7*m_m8*m_m11*m_m12 + k02_r_r6*k04_r_r6*k06_r_r6*k08_r_r6*k13_r_r6*k15_r_r6*k18_r_r6*k20_r_r6*m_m8*m_m10*m_m11*m_m12 + k03_r_r6*k05_r_r6*k08_r_r6*k10_r_r6*k13_r_r6*k15_r_r6*k17_r_r6*k19_r_r6*m_m7*m_m8*m_m10*m_m12 + k02_r_r6*k04_r_r6*k06_r_r6*k08_r_r6*k13_r_r6*k16_r_r6*k18_r_r6*k20_r_r6*m_m8*m_m10*m_m11*m_m12 + k03_r_r6*k06_r_r6*k08_r_r6*k10_r_r6*k13_r_r6*k15_r_r6*k17_r_r6*k19_r_r6*m_m7*m_m8*m_m10*m_m12 + k03_r_r6*k05_r_r6*k07_r_r6*k09_r_r6*k13_r_r6*k15_r_r6*k18_r_r6*k20_r_r6*m_m7*m_m10*m_m11*m_m12 + k03_r_r6*k05_r_r6*k07_r_r6*k09_r_r6*k13_r_r6*k16_r_r6*k18_r_r6*k20_r_r6*m_m7*m_m10*m_m11*m_m12))) + n_sub_r_r5*(k07_r_r5*k09_r_r5*k11_r_r5*m_m6 - k08_r_r5*k10_r_r5*k12_r_r5*m_m10)*(k02_r_r5*k04_r_r5 + k02_r_r5*k05_r_r5 + k03_r_r5*k05_r_r5)/((L_0_r_r5*(m_m5/Keff_m_m5_r_r5 + m_m7/Keff_m_m7_r_r5 + 1)^n_sub_r_r5*((k02_r_r5*k04_r_r5 + k02_r_r5*k05_r_r5 + k03_r_r5*k05_r_r5)*(k08_r_r5*k10_r_r5 + k08_r_r5*k11_r_r5 + k09_r_r5*k11_r_r5)/(k02_r_r5*k04_r_r5*k08_r_r5*k10_r_r5 + k02_r_r5*k04_r_r5*k08_r_r5*k11_r_r5 + k02_r_r5*k05_r_r5*k08_r_r5*k10_r_r5 + k02_r_r5*k04_r_r5*k09_r_r5*k11_r_r5 + k02_r_r5*k05_r_r5*k08_r_r5*k11_r_r5 + k03_r_r5*k05_r_r5*k08_r_r5*k10_r_r5 + k02_r_r5*k05_r_r5*k09_r_r5*k11_r_r5 + k03_r_r5*k05_r_r5*k08_r_r5*k11_r_r5 + k03_r_r5*k05_r_r5*k09_r_r5*k11_r_r5 + k01_r_r5*k03_r_r5*k08_r_r5*k10_r_r5*m_m5 + k01_r_r5*k03_r_r5*k08_r_r5*k11_r_r5*m_m5 + k01_r_r5*k04_r_r5*k08_r_r5*k10_r_r5*m_m5 + k02_r_r5*k04_r_r5*k07_r_r5*k09_r_r5*m_m6 + k01_r_r5*k03_r_r5*k09_r_r5*k11_r_r5*m_m5 + k01_r_r5*k04_r_r5*k08_r_r5*k11_r_r5*m_m5 + k01_r_r5*k05_r_r5*k08_r_r5*k10_r_r5*m_m5 + k02_r_r5*k04_r_r5*k07_r_r5*k10_r_r5*m_m6 + k02_r_r5*k05_r_r5*k07_r_r5*k09_r_r5*m_m6 + k01_r_r5*k04_r_r5*k09_r_r5*k11_r_r5*m_m5 + k01_r_r5*k05_r_r5*k08_r_r5*k11_r_r5*m_m5 + k02_r_r5*k04_r_r5*k07_r_r5*k11_r_r5*m_m6 + k02_r_r5*k05_r_r5*k07_r_r5*k10_r_r5*m_m6 + k03_r_r5*k05_r_r5*k07_r_r5*k09_r_r5*m_m6 + k01_r_r5*k05_r_r5*k09_r_r5*k11_r_r5*m_m5 + k02_r_r5*k05_r_r5*k07_r_r5*k11_r_r5*m_m6 + k03_r_r5*k05_r_r5*k07_r_r5*k10_r_r5*m_m6 + k03_r_r5*k05_r_r5*k07_r_r5*k11_r_r5*m_m6 + k02_r_r5*k06_r_r5*k08_r_r5*k10_r_r5*m_m7 + k02_r_r5*k06_r_r5*k08_r_r5*k11_r_r5*m_m7 + k03_r_r5*k06_r_r5*k08_r_r5*k10_r_r5*m_m7 + k02_r_r5*k06_r_r5*k09_r_r5*k11_r_r5*m_m7 + k03_r_r5*k06_r_r5*k08_r_r5*k11_r_r5*m_m7 + k04_r_r5*k06_r_r5*k08_r_r5*k10_r_r5*m_m7 + k02_r_r5*k04_r_r5*k08_r_r5*k12_r_r5*m_m10 + k03_r_r5*k06_r_r5*k09_r_r5*k11_r_r5*m_m7 + k04_r_r5*k06_r_r5*k08_r_r5*k11_r_r5*m_m7 + k02_r_r5*k04_r_r5*k09_r_r5*k12_r_r5*m_m10 + k02_r_r5*k05_r_r5*k08_r_r5*k12_r_r5*m_m10 + k04_r_r5*k06_r_r5*k09_r_r5*k11_r_r5*m_m7 + k02_r_r5*k04_r_r5*k10_r_r5*k12_r_r5*m_m10 + k02_r_r5*k05_r_r5*k09_r_r5*k12_r_r5*m_m10 + k03_r_r5*k05_r_r5*k08_r_r5*k12_r_r5*m_m10 + k02_r_r5*k05_r_r5*k10_r_r5*k12_r_r5*m_m10 + k03_r_r5*k05_r_r5*k09_r_r5*k12_r_r5*m_m10 + k03_r_r5*k05_r_r5*k10_r_r5*k12_r_r5*m_m10))^n_sub_r_r5 + 1)*(k02_r_r5*k04_r_r5*k08_r_r5*k10_r_r5 + k02_r_r5*k04_r_r5*k08_r_r5*k11_r_r5 + k02_r_r5*k05_r_r5*k08_r_r5*k10_r_r5 + k02_r_r5*k04_r_r5*k09_r_r5*k11_r_r5 + k02_r_r5*k05_r_r5*k08_r_r5*k11_r_r5 + k03_r_r5*k05_r_r5*k08_r_r5*k10_r_r5 + k02_r_r5*k05_r_r5*k09_r_r5*k11_r_r5 + k03_r_r5*k05_r_r5*k08_r_r5*k11_r_r5 + k03_r_r5*k05_r_r5*k09_r_r5*k11_r_r5 + k01_r_r5*k03_r_r5*k08_r_r5*k10_r_r5*m_m5 + k01_r_r5*k03_r_r5*k08_r_r5*k11_r_r5*m_m5 + k01_r_r5*k04_r_r5*k08_r_r5*k10_r_r5*m_m5 + k02_r_r5*k04_r_r5*k07_r_r5*k09_r_r5*m_m6 + k01_r_r5*k03_r_r5*k09_r_r5*k11_r_r5*m_m5 + k01_r_r5*k04_r_r5*k08_r_r5*k11_r_r5*m_m5 + k01_r_r5*k05_r_r5*k08_r_r5*k10_r_r5*m_m5 + k02_r_r5*k04_r_r5*k07_r_r5*k10_r_r5*m_m6 + k02_r_r5*k05_r_r5*k07_r_r5*k09_r_r5*m_m6 + k01_r_r5*k04_r_r5*k09_r_r5*k11_r_r5*m_m5 + k01_r_r5*k05_r_r5*k08_r_r5*k11_r_r5*m_m5 + k02_r_r5*k04_r_r5*k07_r_r5*k11_r_r5*m_m6 + k02_r_r5*k05_r_r5*k07_r_r5*k10_r_r5*m_m6 + k03_r_r5*k05_r_r5*k07_r_r5*k09_r_r5*m_m6 + k01_r_r5*k05_r_r5*k09_r_r5*k11_r_r5*m_m5 + k02_r_r5*k05_r_r5*k07_r_r5*k11_r_r5*m_m6 + k03_r_r5*k05_r_r5*k07_r_r5*k10_r_r5*m_m6 + k03_r_r5*k05_r_r5*k07_r_r5*k11_r_r5*m_m6 + k02_r_r5*k06_r_r5*k08_r_r5*k10_r_r5*m_m7 + k02_r_r5*k06_r_r5*k08_r_r5*k11_r_r5*m_m7 + k03_r_r5*k06_r_r5*k08_r_r5*k10_r_r5*m_m7 + k02_r_r5*k06_r_r5*k09_r_r5*k11_r_r5*m_m7 + k03_r_r5*k06_r_r5*k08_r_r5*k11_r_r5*m_m7 + k04_r_r5*k06_r_r5*k08_r_r5*k10_r_r5*m_m7 + k02_r_r5*k04_r_r5*k08_r_r5*k12_r_r5*m_m10 + k03_r_r5*k06_r_r5*k09_r_r5*k11_r_r5*m_m7 + k04_r_r5*k06_r_r5*k08_r_r5*k11_r_r5*m_m7 + k02_r_r5*k04_r_r5*k09_r_r5*k12_r_r5*m_m10 + k02_r_r5*k05_r_r5*k08_r_r5*k12_r_r5*m_m10 + k04_r_r5*k06_r_r5*k09_r_r5*k11_r_r5*m_m7 + k02_r_r5*k04_r_r5*k10_r_r5*k12_r_r5*m_m10 + k02_r_r5*k05_r_r5*k09_r_r5*k12_r_r5*m_m10 + k03_r_r5*k05_r_r5*k08_r_r5*k12_r_r5*m_m10 + k02_r_r5*k05_r_r5*k10_r_r5*k12_r_r5*m_m10 + k03_r_r5*k05_r_r5*k09_r_r5*k12_r_r5*m_m10 + k03_r_r5*k05_r_r5*k10_r_r5*k12_r_r5*m_m10)))*(1/m_m10_ref);
  m_m11' = (0.0024268 + n_sub_r_r6*(k11_r_r6*k13_r_r6*k15_r_r6*k17_r_r6*k19_r_r6*m_m1*m_m10 - k12_r_r6*k14_r_r6*k16_r_r6*k18_r_r6*k20_r_r6*m_m11*m_m12)*(k02_r_r6*k04_r_r6*k06_r_r6*k09_r_r6 + k02_r_r6*k04_r_r6*k07_r_r6*k09_r_r6 + k02_r_r6*k05_r_r6*k07_r_r6*k09_r_r6 + k02_r_r6*k04_r_r6*k06_r_r6*k08_r_r6*m_m8 + k03_r_r6*k05_r_r6*k07_r_r6*k09_r_r6*m_m7)/((L_0_r_r6*(m_m9/Keff_m_m9_r_r6 + 1)^n_sub_r_r6*((k02_r_r6*k04_r_r6*k06_r_r6*k09_r_r6 + k02_r_r6*k04_r_r6*k07_r_r6*k09_r_r6 + k02_r_r6*k05_r_r6*k07_r_r6*k09_r_r6 + k02_r_r6*k04_r_r6*k06_r_r6*k08_r_r6*m_m8 + k03_r_r6*k05_r_r6*k07_r_r6*k09_r_r6*m_m7)*(k12_r_r6*k14_r_r6*k16_r_r6*k19_r_r6 + k12_r_r6*k14_r_r6*k17_r_r6*k19_r_r6 + k12_r_r6*k15_r_r6*k17_r_r6*k19_r_r6 + k12_r_r6*k14_r_r6*k16_r_r6*k18_r_r6*m_m11 + k13_r_r6*k15_r_r6*k17_r_r6*k19_r_r6*m_m10)/(k02_r_r6*k04_r_r6*k06_r_r6*k09_r_r6*k12_r_r6*k14_r_r6*k16_r_r6*k19_r_r6 + k02_r_r6*k04_r_r6*k06_r_r6*k09_r_r6*k12_r_r6*k14_r_r6*k17_r_r6*k19_r_r6 + k02_r_r6*k04_r_r6*k07_r_r6*k09_r_r6*k12_r_r6*k14_r_r6*k16_r_r6*k19_r_r6 + k02_r_r6*k04_r_r6*k06_r_r6*k09_r_r6*k12_r_r6*k15_r_r6*k17_r_r6*k19_r_r6 + k02_r_r6*k04_r_r6*k07_r_r6*k09_r_r6*k12_r_r6*k14_r_r6*k17_r_r6*k19_r_r6 + k02_r_r6*k05_r_r6*k07_r_r6*k09_r_r6*k12_r_r6*k14_r_r6*k16_r_r6*k19_r_r6 + k02_r_r6*k04_r_r6*k07_r_r6*k09_r_r6*k12_r_r6*k15_r_r6*k17_r_r6*k19_r_r6 + k02_r_r6*k05_r_r6*k07_r_r6*k09_r_r6*k12_r_r6*k14_r_r6*k17_r_r6*k19_r_r6 + k02_r_r6*k05_r_r6*k07_r_r6*k09_r_r6*k12_r_r6*k15_r_r6*k17_r_r6*k19_r_r6 + k01_r_r6*k04_r_r6*k06_r_r6*k09_r_r6*k12_r_r6*k14_r_r6*k16_r_r6*k19_r_r6*m_m1 + k02_r_r6*k04_r_r6*k06_r_r6*k09_r_r6*k11_r_r6*k14_r_r6*k16_r_r6*k19_r_r6*m_m1 + k01_r_r6*k04_r_r6*k06_r_r6*k09_r_r6*k12_r_r6*k14_r_r6*k17_r_r6*k19_r_r6*m_m1 + k01_r_r6*k04_r_r6*k07_r_r6*k09_r_r6*k12_r_r6*k14_r_r6*k16_r_r6*k19_r_r6*m_m1 + k02_r_r6*k04_r_r6*k06_r_r6*k09_r_r6*k11_r_r6*k14_r_r6*k17_r_r6*k19_r_r6*m_m1 + k02_r_r6*k04_r_r6*k07_r_r6*k09_r_r6*k11_r_r6*k14_r_r6*k16_r_r6*k19_r_r6*m_m1 + k01_r_r6*k04_r_r6*k06_r_r6*k09_r_r6*k12_r_r6*k15_r_r6*k17_r_r6*k19_r_r6*m_m1 + k01_r_r6*k04_r_r6*k07_r_r6*k09_r_r6*k12_r_r6*k14_r_r6*k17_r_r6*k19_r_r6*m_m1 + k01_r_r6*k05_r_r6*k07_r_r6*k09_r_r6*k12_r_r6*k14_r_r6*k16_r_r6*k19_r_r6*m_m1 + k02_r_r6*k04_r_r6*k06_r_r6*k09_r_r6*k11_r_r6*k15_r_r6*k17_r_r6*k19_r_r6*m_m1 + k02_r_r6*k04_r_r6*k07_r_r6*k09_r_r6*k11_r_r6*k14_r_r6*k17_r_r6*k19_r_r6*m_m1 + k02_r_r6*k05_r_r6*k07_r_r6*k09_r_r6*k11_r_r6*k14_r_r6*k16_r_r6*k19_r_r6*m_m1 + k01_r_r6*k04_r_r6*k07_r_r6*k09_r_r6*k12_r_r6*k15_r_r6*k17_r_r6*k19_r_r6*m_m1 + k01_r_r6*k05_r_r6*k07_r_r6*k09_r_r6*k12_r_r6*k14_r_r6*k17_r_r6*k19_r_r6*m_m1 + k02_r_r6*k04_r_r6*k07_r_r6*k09_r_r6*k11_r_r6*k15_r_r6*k17_r_r6*k19_r_r6*m_m1 + k02_r_r6*k05_r_r6*k07_r_r6*k09_r_r6*k11_r_r6*k14_r_r6*k17_r_r6*k19_r_r6*m_m1 + k01_r_r6*k05_r_r6*k07_r_r6*k09_r_r6*k12_r_r6*k15_r_r6*k17_r_r6*k19_r_r6*m_m1 + k02_r_r6*k05_r_r6*k07_r_r6*k09_r_r6*k11_r_r6*k15_r_r6*k17_r_r6*k19_r_r6*m_m1 + k02_r_r6*k04_r_r6*k06_r_r6*k08_r_r6*k12_r_r6*k14_r_r6*k16_r_r6*k19_r_r6*m_m8 + k02_r_r6*k04_r_r6*k06_r_r6*k08_r_r6*k12_r_r6*k14_r_r6*k17_r_r6*k19_r_r6*m_m8 + k02_r_r6*k04_r_r6*k06_r_r6*k08_r_r6*k12_r_r6*k15_r_r6*k17_r_r6*k19_r_r6*m_m8 + k02_r_r6*k04_r_r6*k06_r_r6*k09_r_r6*k12_r_r6*k14_r_r6*k16_r_r6*k18_r_r6*m_m11 + k03_r_r6*k05_r_r6*k07_r_r6*k09_r_r6*k12_r_r6*k14_r_r6*k16_r_r6*k19_r_r6*m_m7 + k02_r_r6*k04_r_r6*k07_r_r6*k09_r_r6*k12_r_r6*k14_r_r6*k16_r_r6*k18_r_r6*m_m11 + k03_r_r6*k05_r_r6*k07_r_r6*k09_r_r6*k12_r_r6*k14_r_r6*k17_r_r6*k19_r_r6*m_m7 + k02_r_r6*k05_r_r6*k07_r_r6*k09_r_r6*k12_r_r6*k14_r_r6*k16_r_r6*k18_r_r6*m_m11 + k03_r_r6*k05_r_r6*k07_r_r6*k09_r_r6*k12_r_r6*k15_r_r6*k17_r_r6*k19_r_r6*m_m7 + k02_r_r6*k04_r_r6*k06_r_r6*k09_r_r6*k12_r_r6*k14_r_r6*k16_r_r6*k20_r_r6*m_m12 + k02_r_r6*k04_r_r6*k06_r_r6*k09_r_r6*k13_r_r6*k15_r_r6*k17_r_r6*k19_r_r6*m_m10 + k02_r_r6*k04_r_r6*k06_r_r6*k10_r_r6*k12_r_r6*k14_r_r6*k16_r_r6*k19_r_r6*m_m12 + k02_r_r6*k04_r_r6*k06_r_r6*k09_r_r6*k12_r_r6*k14_r_r6*k17_r_r6*k20_r_r6*m_m12 + k02_r_r6*k04_r_r6*k06_r_r6*k10_r_r6*k12_r_r6*k14_r_r6*k17_r_r6*k19_r_r6*m_m12 + k02_r_r6*k04_r_r6*k07_r_r6*k09_r_r6*k12_r_r6*k14_r_r6*k16_r_r6*k20_r_r6*m_m12 + k02_r_r6*k04_r_r6*k07_r_r6*k09_r_r6*k13_r_r6*k15_r_r6*k17_r_r6*k19_r_r6*m_m10 + k02_r_r6*k04_r_r6*k07_r_r6*k10_r_r6*k12_r_r6*k14_r_r6*k16_r_r6*k19_r_r6*m_m12 + k02_r_r6*k04_r_r6*k06_r_r6*k09_r_r6*k12_r_r6*k15_r_r6*k17_r_r6*k20_r_r6*m_m12 + k02_r_r6*k04_r_r6*k06_r_r6*k10_r_r6*k12_r_r6*k15_r_r6*k17_r_r6*k19_r_r6*m_m12 + k02_r_r6*k04_r_r6*k07_r_r6*k09_r_r6*k12_r_r6*k14_r_r6*k17_r_r6*k20_r_r6*m_m12 + k02_r_r6*k04_r_r6*k07_r_r6*k10_r_r6*k12_r_r6*k14_r_r6*k17_r_r6*k19_r_r6*m_m12 + k02_r_r6*k05_r_r6*k07_r_r6*k09_r_r6*k12_r_r6*k14_r_r6*k16_r_r6*k20_r_r6*m_m12 + k02_r_r6*k05_r_r6*k07_r_r6*k09_r_r6*k13_r_r6*k15_r_r6*k17_r_r6*k19_r_r6*m_m10 + k02_r_r6*k05_r_r6*k07_r_r6*k10_r_r6*k12_r_r6*k14_r_r6*k16_r_r6*k19_r_r6*m_m12 + k02_r_r6*k04_r_r6*k07_r_r6*k09_r_r6*k12_r_r6*k15_r_r6*k17_r_r6*k20_r_r6*m_m12 + k02_r_r6*k04_r_r6*k07_r_r6*k10_r_r6*k12_r_r6*k15_r_r6*k17_r_r6*k19_r_r6*m_m12 + k02_r_r6*k05_r_r6*k07_r_r6*k09_r_r6*k12_r_r6*k14_r_r6*k17_r_r6*k20_r_r6*m_m12 + k02_r_r6*k05_r_r6*k07_r_r6*k10_r_r6*k12_r_r6*k14_r_r6*k17_r_r6*k19_r_r6*m_m12 + k02_r_r6*k05_r_r6*k07_r_r6*k09_r_r6*k12_r_r6*k15_r_r6*k17_r_r6*k20_r_r6*m_m12 + k02_r_r6*k05_r_r6*k07_r_r6*k10_r_r6*k12_r_r6*k15_r_r6*k17_r_r6*k19_r_r6*m_m12 + k01_r_r6*k03_r_r6*k05_r_r6*k07_r_r6*k12_r_r6*k14_r_r6*k16_r_r6*k19_r_r6*m_m1*m_m7 + k01_r_r6*k03_r_r6*k05_r_r6*k07_r_r6*k12_r_r6*k14_r_r6*k17_r_r6*k19_r_r6*m_m1*m_m7 + k01_r_r6*k03_r_r6*k05_r_r6*k07_r_r6*k12_r_r6*k15_r_r6*k17_r_r6*k19_r_r6*m_m1*m_m7 + k01_r_r6*k03_r_r6*k05_r_r6*k09_r_r6*k12_r_r6*k14_r_r6*k16_r_r6*k19_r_r6*m_m1*m_m7 + k01_r_r6*k03_r_r6*k05_r_r6*k09_r_r6*k12_r_r6*k14_r_r6*k17_r_r6*k19_r_r6*m_m1*m_m7 + k01_r_r6*k03_r_r6*k06_r_r6*k09_r_r6*k12_r_r6*k14_r_r6*k16_r_r6*k19_r_r6*m_m1*m_m7 + k02_r_r6*k04_r_r6*k06_r_r6*k09_r_r6*k11_r_r6*k13_r_r6*k15_r_r6*k17_r_r6*m_m1*m_m10 + k01_r_r6*k03_r_r6*k05_r_r6*k09_r_r6*k12_r_r6*k15_r_r6*k17_r_r6*k19_r_r6*m_m1*m_m7 + k01_r_r6*k03_r_r6*k06_r_r6*k09_r_r6*k12_r_r6*k14_r_r6*k17_r_r6*k19_r_r6*m_m1*m_m7 + k01_r_r6*k03_r_r6*k07_r_r6*k09_r_r6*k12_r_r6*k14_r_r6*k16_r_r6*k19_r_r6*m_m1*m_m7 + k01_r_r6*k04_r_r6*k06_r_r6*k08_r_r6*k12_r_r6*k14_r_r6*k16_r_r6*k19_r_r6*m_m1*m_m8 + k02_r_r6*k04_r_r6*k06_r_r6*k08_r_r6*k11_r_r6*k14_r_r6*k16_r_r6*k19_r_r6*m_m1*m_m8 + k02_r_r6*k04_r_r6*k07_r_r6*k09_r_r6*k11_r_r6*k13_r_r6*k15_r_r6*k17_r_r6*m_m1*m_m10 + k01_r_r6*k03_r_r6*k06_r_r6*k09_r_r6*k12_r_r6*k15_r_r6*k17_r_r6*k19_r_r6*m_m1*m_m7 + k01_r_r6*k03_r_r6*k07_r_r6*k09_r_r6*k12_r_r6*k14_r_r6*k17_r_r6*k19_r_r6*m_m1*m_m7 + k01_r_r6*k04_r_r6*k06_r_r6*k08_r_r6*k12_r_r6*k14_r_r6*k17_r_r6*k19_r_r6*m_m1*m_m8 + k02_r_r6*k04_r_r6*k06_r_r6*k08_r_r6*k11_r_r6*k14_r_r6*k17_r_r6*k19_r_r6*m_m1*m_m8 + k02_r_r6*k04_r_r6*k06_r_r6*k09_r_r6*k11_r_r6*k13_r_r6*k15_r_r6*k19_r_r6*m_m1*m_m10 + k02_r_r6*k05_r_r6*k07_r_r6*k09_r_r6*k11_r_r6*k13_r_r6*k15_r_r6*k17_r_r6*m_m1*m_m10 + k01_r_r6*k03_r_r6*k07_r_r6*k09_r_r6*k12_r_r6*k15_r_r6*k17_r_r6*k19_r_r6*m_m1*m_m7 + k01_r_r6*k04_r_r6*k06_r_r6*k08_r_r6*k12_r_r6*k15_r_r6*k17_r_r6*k19_r_r6*m_m1*m_m8 + k02_r_r6*k04_r_r6*k06_r_r6*k08_r_r6*k11_r_r6*k15_r_r6*k17_r_r6*k19_r_r6*m_m1*m_m8 + k02_r_r6*k04_r_r6*k06_r_r6*k09_r_r6*k11_r_r6*k13_r_r6*k16_r_r6*k19_r_r6*m_m1*m_m10 + k02_r_r6*k04_r_r6*k07_r_r6*k09_r_r6*k11_r_r6*k13_r_r6*k15_r_r6*k19_r_r6*m_m1*m_m10 + k01_r_r6*k04_r_r6*k06_r_r6*k09_r_r6*k12_r_r6*k14_r_r6*k16_r_r6*k18_r_r6*m_m1*m_m11 + k02_r_r6*k04_r_r6*k06_r_r6*k09_r_r6*k11_r_r6*k13_r_r6*k17_r_r6*k19_r_r6*m_m1*m_m10 + k02_r_r6*k04_r_r6*k06_r_r6*k09_r_r6*k11_r_r6*k14_r_r6*k16_r_r6*k18_r_r6*m_m1*m_m11 + k02_r_r6*k04_r_r6*k07_r_r6*k09_r_r6*k11_r_r6*k13_r_r6*k16_r_r6*k19_r_r6*m_m1*m_m10 + k02_r_r6*k05_r_r6*k07_r_r6*k09_r_r6*k11_r_r6*k13_r_r6*k15_r_r6*k19_r_r6*m_m1*m_m10 + k03_r_r6*k05_r_r6*k07_r_r6*k09_r_r6*k11_r_r6*k14_r_r6*k16_r_r6*k19_r_r6*m_m1*m_m7 + k01_r_r6*k04_r_r6*k07_r_r6*k09_r_r6*k12_r_r6*k14_r_r6*k16_r_r6*k18_r_r6*m_m1*m_m11 + k02_r_r6*k04_r_r6*k07_r_r6*k09_r_r6*k11_r_r6*k13_r_r6*k17_r_r6*k19_r_r6*m_m1*m_m10 + k02_r_r6*k04_r_r6*k07_r_r6*k09_r_r6*k11_r_r6*k14_r_r6*k16_r_r6*k18_r_r6*m_m1*m_m11 + k02_r_r6*k05_r_r6*k07_r_r6*k09_r_r6*k11_r_r6*k13_r_r6*k16_r_r6*k19_r_r6*m_m1*m_m10 + k03_r_r6*k05_r_r6*k07_r_r6*k09_r_r6*k11_r_r6*k14_r_r6*k17_r_r6*k19_r_r6*m_m1*m_m7 + k01_r_r6*k05_r_r6*k07_r_r6*k09_r_r6*k12_r_r6*k14_r_r6*k16_r_r6*k18_r_r6*m_m1*m_m11 + k02_r_r6*k05_r_r6*k07_r_r6*k09_r_r6*k11_r_r6*k13_r_r6*k17_r_r6*k19_r_r6*m_m1*m_m10 + k02_r_r6*k05_r_r6*k07_r_r6*k09_r_r6*k11_r_r6*k14_r_r6*k16_r_r6*k18_r_r6*m_m1*m_m11 + k03_r_r6*k05_r_r6*k07_r_r6*k09_r_r6*k11_r_r6*k15_r_r6*k17_r_r6*k19_r_r6*m_m1*m_m7 + k01_r_r6*k04_r_r6*k06_r_r6*k09_r_r6*k13_r_r6*k15_r_r6*k17_r_r6*k19_r_r6*m_m1*m_m10 + k01_r_r6*k04_r_r6*k07_r_r6*k09_r_r6*k13_r_r6*k15_r_r6*k17_r_r6*k19_r_r6*m_m1*m_m10 + k01_r_r6*k05_r_r6*k07_r_r6*k09_r_r6*k13_r_r6*k15_r_r6*k17_r_r6*k19_r_r6*m_m1*m_m10 + k02_r_r6*k04_r_r6*k06_r_r6*k08_r_r6*k12_r_r6*k14_r_r6*k16_r_r6*k18_r_r6*m_m8*m_m11 + k02_r_r6*k04_r_r6*k06_r_r6*k08_r_r6*k12_r_r6*k14_r_r6*k16_r_r6*k20_r_r6*m_m8*m_m12 + k02_r_r6*k04_r_r6*k06_r_r6*k08_r_r6*k13_r_r6*k15_r_r6*k17_r_r6*k19_r_r6*m_m8*m_m10 + k03_r_r6*k05_r_r6*k07_r_r6*k09_r_r6*k12_r_r6*k14_r_r6*k16_r_r6*k18_r_r6*m_m7*m_m11 + k02_r_r6*k04_r_r6*k06_r_r6*k08_r_r6*k12_r_r6*k14_r_r6*k17_r_r6*k20_r_r6*m_m8*m_m12 + k02_r_r6*k04_r_r6*k06_r_r6*k08_r_r6*k12_r_r6*k15_r_r6*k17_r_r6*k20_r_r6*m_m8*m_m12 + k02_r_r6*k04_r_r6*k06_r_r6*k10_r_r6*k12_r_r6*k14_r_r6*k16_r_r6*k18_r_r6*m_m11*m_m12 + k02_r_r6*k04_r_r6*k08_r_r6*k10_r_r6*k12_r_r6*k14_r_r6*k16_r_r6*k19_r_r6*m_m8*m_m12 + k03_r_r6*k05_r_r6*k07_r_r6*k09_r_r6*k12_r_r6*k14_r_r6*k16_r_r6*k20_r_r6*m_m7*m_m12 + k03_r_r6*k05_r_r6*k07_r_r6*k09_r_r6*k13_r_r6*k15_r_r6*k17_r_r6*k19_r_r6*m_m7*m_m10 + k03_r_r6*k05_r_r6*k07_r_r6*k10_r_r6*k12_r_r6*k14_r_r6*k16_r_r6*k19_r_r6*m_m7*m_m12 + k02_r_r6*k04_r_r6*k07_r_r6*k10_r_r6*k12_r_r6*k14_r_r6*k16_r_r6*k18_r_r6*m_m11*m_m12 + k02_r_r6*k04_r_r6*k08_r_r6*k10_r_r6*k12_r_r6*k14_r_r6*k17_r_r6*k19_r_r6*m_m8*m_m12 + k02_r_r6*k05_r_r6*k08_r_r6*k10_r_r6*k12_r_r6*k14_r_r6*k16_r_r6*k19_r_r6*m_m8*m_m12 + k03_r_r6*k05_r_r6*k07_r_r6*k09_r_r6*k12_r_r6*k14_r_r6*k17_r_r6*k20_r_r6*m_m7*m_m12 + k03_r_r6*k05_r_r6*k07_r_r6*k10_r_r6*k12_r_r6*k14_r_r6*k17_r_r6*k19_r_r6*m_m7*m_m12 + k02_r_r6*k04_r_r6*k08_r_r6*k10_r_r6*k12_r_r6*k15_r_r6*k17_r_r6*k19_r_r6*m_m8*m_m12 + k02_r_r6*k05_r_r6*k07_r_r6*k10_r_r6*k12_r_r6*k14_r_r6*k16_r_r6*k18_r_r6*m_m11*m_m12 + k02_r_r6*k05_r_r6*k08_r_r6*k10_r_r6*k12_r_r6*k14_r_r6*k17_r_r6*k19_r_r6*m_m8*m_m12 + k02_r_r6*k06_r_r6*k08_r_r6*k10_r_r6*k12_r_r6*k14_r_r6*k16_r_r6*k19_r_r6*m_m8*m_m12 + k03_r_r6*k05_r_r6*k07_r_r6*k09_r_r6*k12_r_r6*k15_r_r6*k17_r_r6*k20_r_r6*m_m7*m_m12 + k03_r_r6*k05_r_r6*k07_r_r6*k10_r_r6*k12_r_r6*k15_r_r6*k17_r_r6*k19_r_r6*m_m7*m_m12 + k02_r_r6*k04_r_r6*k06_r_r6*k09_r_r6*k12_r_r6*k14_r_r6*k18_r_r6*k20_r_r6*m_m11*m_m12 + k02_r_r6*k04_r_r6*k06_r_r6*k09_r_r6*k13_r_r6*k15_r_r6*k17_r_r6*k20_r_r6*m_m10*m_m12 + k02_r_r6*k04_r_r6*k06_r_r6*k10_r_r6*k13_r_r6*k15_r_r6*k17_r_r6*k19_r_r6*m_m10*m_m12 + k02_r_r6*k05_r_r6*k08_r_r6*k10_r_r6*k12_r_r6*k15_r_r6*k17_r_r6*k19_r_r6*m_m8*m_m12 + k02_r_r6*k06_r_r6*k08_r_r6*k10_r_r6*k12_r_r6*k14_r_r6*k17_r_r6*k19_r_r6*m_m8*m_m12 + k02_r_r6*k04_r_r6*k06_r_r6*k09_r_r6*k12_r_r6*k15_r_r6*k18_r_r6*k20_r_r6*m_m11*m_m12 + k02_r_r6*k04_r_r6*k07_r_r6*k09_r_r6*k12_r_r6*k14_r_r6*k18_r_r6*k20_r_r6*m_m11*m_m12 + k02_r_r6*k04_r_r6*k07_r_r6*k09_r_r6*k13_r_r6*k15_r_r6*k17_r_r6*k20_r_r6*m_m10*m_m12 + k02_r_r6*k04_r_r6*k07_r_r6*k10_r_r6*k13_r_r6*k15_r_r6*k17_r_r6*k19_r_r6*m_m10*m_m12 + k02_r_r6*k06_r_r6*k08_r_r6*k10_r_r6*k12_r_r6*k15_r_r6*k17_r_r6*k19_r_r6*m_m8*m_m12 + k04_r_r6*k06_r_r6*k08_r_r6*k10_r_r6*k12_r_r6*k14_r_r6*k16_r_r6*k19_r_r6*m_m8*m_m12 + k02_r_r6*k04_r_r6*k06_r_r6*k09_r_r6*k12_r_r6*k16_r_r6*k18_r_r6*k20_r_r6*m_m11*m_m12 + k02_r_r6*k04_r_r6*k07_r_r6*k09_r_r6*k12_r_r6*k15_r_r6*k18_r_r6*k20_r_r6*m_m11*m_m12 + k02_r_r6*k05_r_r6*k07_r_r6*k09_r_r6*k12_r_r6*k14_r_r6*k18_r_r6*k20_r_r6*m_m11*m_m12 + k02_r_r6*k05_r_r6*k07_r_r6*k09_r_r6*k13_r_r6*k15_r_r6*k17_r_r6*k20_r_r6*m_m10*m_m12 + k02_r_r6*k05_r_r6*k07_r_r6*k10_r_r6*k13_r_r6*k15_r_r6*k17_r_r6*k19_r_r6*m_m10*m_m12 + k04_r_r6*k06_r_r6*k08_r_r6*k10_r_r6*k12_r_r6*k14_r_r6*k17_r_r6*k19_r_r6*m_m8*m_m12 + k02_r_r6*k04_r_r6*k07_r_r6*k09_r_r6*k12_r_r6*k16_r_r6*k18_r_r6*k20_r_r6*m_m11*m_m12 + k02_r_r6*k05_r_r6*k07_r_r6*k09_r_r6*k12_r_r6*k15_r_r6*k18_r_r6*k20_r_r6*m_m11*m_m12 + k04_r_r6*k06_r_r6*k08_r_r6*k10_r_r6*k12_r_r6*k15_r_r6*k17_r_r6*k19_r_r6*m_m8*m_m12 + k02_r_r6*k04_r_r6*k06_r_r6*k09_r_r6*k14_r_r6*k16_r_r6*k18_r_r6*k20_r_r6*m_m11*m_m12 + k02_r_r6*k05_r_r6*k07_r_r6*k09_r_r6*k12_r_r6*k16_r_r6*k18_r_r6*k20_r_r6*m_m11*m_m12 + k02_r_r6*k04_r_r6*k07_r_r6*k09_r_r6*k14_r_r6*k16_r_r6*k18_r_r6*k20_r_r6*m_m11*m_m12 + k02_r_r6*k05_r_r6*k07_r_r6*k09_r_r6*k14_r_r6*k16_r_r6*k18_r_r6*k20_r_r6*m_m11*m_m12 + k01_r_r6*k03_r_r6*k05_r_r6*k08_r_r6*k12_r_r6*k14_r_r6*k16_r_r6*k19_r_r6*m_m1*m_m7*m_m8 + k01_r_r6*k03_r_r6*k05_r_r6*k07_r_r6*k12_r_r6*k14_r_r6*k16_r_r6*k18_r_r6*m_m1*m_m7*m_m11 + k01_r_r6*k03_r_r6*k05_r_r6*k08_r_r6*k12_r_r6*k14_r_r6*k17_r_r6*k19_r_r6*m_m1*m_m7*m_m8 + k01_r_r6*k03_r_r6*k06_r_r6*k08_r_r6*k12_r_r6*k14_r_r6*k16_r_r6*k19_r_r6*m_m1*m_m7*m_m8 + k02_r_r6*k04_r_r6*k06_r_r6*k08_r_r6*k11_r_r6*k13_r_r6*k15_r_r6*k17_r_r6*m_m1*m_m8*m_m10 + k01_r_r6*k03_r_r6*k05_r_r6*k08_r_r6*k12_r_r6*k15_r_r6*k17_r_r6*k19_r_r6*m_m1*m_m7*m_m8 + k01_r_r6*k03_r_r6*k06_r_r6*k08_r_r6*k12_r_r6*k14_r_r6*k17_r_r6*k19_r_r6*m_m1*m_m7*m_m8 + k01_r_r6*k03_r_r6*k05_r_r6*k09_r_r6*k12_r_r6*k14_r_r6*k16_r_r6*k18_r_r6*m_m1*m_m7*m_m11 + k01_r_r6*k03_r_r6*k06_r_r6*k08_r_r6*k12_r_r6*k15_r_r6*k17_r_r6*k19_r_r6*m_m1*m_m7*m_m8 + k02_r_r6*k04_r_r6*k06_r_r6*k08_r_r6*k11_r_r6*k13_r_r6*k15_r_r6*k19_r_r6*m_m1*m_m8*m_m10 + k01_r_r6*k03_r_r6*k05_r_r6*k07_r_r6*k13_r_r6*k15_r_r6*k17_r_r6*k19_r_r6*m_m1*m_m7*m_m10 + k01_r_r6*k03_r_r6*k06_r_r6*k09_r_r6*k12_r_r6*k14_r_r6*k16_r_r6*k18_r_r6*m_m1*m_m7*m_m11 + k02_r_r6*k04_r_r6*k06_r_r6*k08_r_r6*k11_r_r6*k13_r_r6*k16_r_r6*k19_r_r6*m_m1*m_m8*m_m10 + k03_r_r6*k05_r_r6*k07_r_r6*k09_r_r6*k11_r_r6*k13_r_r6*k15_r_r6*k17_r_r6*m_m1*m_m7*m_m10 + k01_r_r6*k03_r_r6*k07_r_r6*k09_r_r6*k12_r_r6*k14_r_r6*k16_r_r6*k18_r_r6*m_m1*m_m7*m_m11 + k01_r_r6*k04_r_r6*k06_r_r6*k08_r_r6*k12_r_r6*k14_r_r6*k16_r_r6*k18_r_r6*m_m1*m_m8*m_m11 + k02_r_r6*k04_r_r6*k06_r_r6*k08_r_r6*k11_r_r6*k13_r_r6*k17_r_r6*k19_r_r6*m_m1*m_m8*m_m10 + k02_r_r6*k04_r_r6*k06_r_r6*k08_r_r6*k11_r_r6*k14_r_r6*k16_r_r6*k18_r_r6*m_m1*m_m8*m_m11 + k01_r_r6*k03_r_r6*k05_r_r6*k09_r_r6*k13_r_r6*k15_r_r6*k17_r_r6*k19_r_r6*m_m1*m_m7*m_m10 + k02_r_r6*k04_r_r6*k06_r_r6*k09_r_r6*k11_r_r6*k13_r_r6*k15_r_r6*k18_r_r6*m_m1*m_m10*m_m11 + k03_r_r6*k05_r_r6*k07_r_r6*k09_r_r6*k11_r_r6*k13_r_r6*k15_r_r6*k19_r_r6*m_m1*m_m7*m_m10 + k01_r_r6*k03_r_r6*k06_r_r6*k09_r_r6*k13_r_r6*k15_r_r6*k17_r_r6*k19_r_r6*m_m1*m_m7*m_m10 + k02_r_r6*k04_r_r6*k06_r_r6*k09_r_r6*k11_r_r6*k13_r_r6*k16_r_r6*k18_r_r6*m_m1*m_m10*m_m11 + k02_r_r6*k04_r_r6*k07_r_r6*k09_r_r6*k11_r_r6*k13_r_r6*k15_r_r6*k18_r_r6*m_m1*m_m10*m_m11 + k03_r_r6*k05_r_r6*k07_r_r6*k09_r_r6*k11_r_r6*k13_r_r6*k16_r_r6*k19_r_r6*m_m1*m_m7*m_m10 + k01_r_r6*k03_r_r6*k07_r_r6*k09_r_r6*k13_r_r6*k15_r_r6*k17_r_r6*k19_r_r6*m_m1*m_m7*m_m10 + k01_r_r6*k04_r_r6*k06_r_r6*k08_r_r6*k13_r_r6*k15_r_r6*k17_r_r6*k19_r_r6*m_m1*m_m8*m_m10 + k02_r_r6*k04_r_r6*k07_r_r6*k09_r_r6*k11_r_r6*k13_r_r6*k16_r_r6*k18_r_r6*m_m1*m_m10*m_m11 + k02_r_r6*k05_r_r6*k07_r_r6*k09_r_r6*k11_r_r6*k13_r_r6*k15_r_r6*k18_r_r6*m_m1*m_m10*m_m11 + k03_r_r6*k05_r_r6*k07_r_r6*k09_r_r6*k11_r_r6*k13_r_r6*k17_r_r6*k19_r_r6*m_m1*m_m7*m_m10 + k03_r_r6*k05_r_r6*k07_r_r6*k09_r_r6*k11_r_r6*k14_r_r6*k16_r_r6*k18_r_r6*m_m1*m_m7*m_m11 + k02_r_r6*k05_r_r6*k07_r_r6*k09_r_r6*k11_r_r6*k13_r_r6*k16_r_r6*k18_r_r6*m_m1*m_m10*m_m11 + k03_r_r6*k05_r_r6*k08_r_r6*k10_r_r6*k12_r_r6*k14_r_r6*k16_r_r6*k19_r_r6*m_m7*m_m8*m_m12 + k02_r_r6*k04_r_r6*k06_r_r6*k08_r_r6*k12_r_r6*k14_r_r6*k18_r_r6*k20_r_r6*m_m8*m_m11*m_m12 + k02_r_r6*k04_r_r6*k06_r_r6*k08_r_r6*k13_r_r6*k15_r_r6*k17_r_r6*k20_r_r6*m_m8*m_m10*m_m12 + k02_r_r6*k04_r_r6*k08_r_r6*k10_r_r6*k12_r_r6*k14_r_r6*k16_r_r6*k18_r_r6*m_m8*m_m11*m_m12 + k03_r_r6*k05_r_r6*k07_r_r6*k10_r_r6*k12_r_r6*k14_r_r6*k16_r_r6*k18_r_r6*m_m7*m_m11*m_m12 + k03_r_r6*k05_r_r6*k08_r_r6*k10_r_r6*k12_r_r6*k14_r_r6*k17_r_r6*k19_r_r6*m_m7*m_m8*m_m12 + k03_r_r6*k06_r_r6*k08_r_r6*k10_r_r6*k12_r_r6*k14_r_r6*k16_r_r6*k19_r_r6*m_m7*m_m8*m_m12 + k02_r_r6*k04_r_r6*k06_r_r6*k08_r_r6*k12_r_r6*k15_r_r6*k18_r_r6*k20_r_r6*m_m8*m_m11*m_m12 + k02_r_r6*k05_r_r6*k08_r_r6*k10_r_r6*k12_r_r6*k14_r_r6*k16_r_r6*k18_r_r6*m_m8*m_m11*m_m12 + k03_r_r6*k05_r_r6*k08_r_r6*k10_r_r6*k12_r_r6*k15_r_r6*k17_r_r6*k19_r_r6*m_m7*m_m8*m_m12 + k03_r_r6*k06_r_r6*k08_r_r6*k10_r_r6*k12_r_r6*k14_r_r6*k17_r_r6*k19_r_r6*m_m7*m_m8*m_m12 + k02_r_r6*k04_r_r6*k06_r_r6*k08_r_r6*k12_r_r6*k16_r_r6*k18_r_r6*k20_r_r6*m_m8*m_m11*m_m12 + k02_r_r6*k06_r_r6*k08_r_r6*k10_r_r6*k12_r_r6*k14_r_r6*k16_r_r6*k18_r_r6*m_m8*m_m11*m_m12 + k03_r_r6*k06_r_r6*k08_r_r6*k10_r_r6*k12_r_r6*k15_r_r6*k17_r_r6*k19_r_r6*m_m7*m_m8*m_m12 + k02_r_r6*k04_r_r6*k08_r_r6*k10_r_r6*k13_r_r6*k15_r_r6*k17_r_r6*k19_r_r6*m_m8*m_m10*m_m12 + k03_r_r6*k05_r_r6*k07_r_r6*k09_r_r6*k12_r_r6*k14_r_r6*k18_r_r6*k20_r_r6*m_m7*m_m11*m_m12 + k03_r_r6*k05_r_r6*k07_r_r6*k09_r_r6*k13_r_r6*k15_r_r6*k17_r_r6*k20_r_r6*m_m7*m_m10*m_m12 + k03_r_r6*k05_r_r6*k07_r_r6*k10_r_r6*k13_r_r6*k15_r_r6*k17_r_r6*k19_r_r6*m_m7*m_m10*m_m12 + k02_r_r6*k04_r_r6*k06_r_r6*k08_r_r6*k14_r_r6*k16_r_r6*k18_r_r6*k20_r_r6*m_m8*m_m11*m_m12 + k02_r_r6*k05_r_r6*k08_r_r6*k10_r_r6*k13_r_r6*k15_r_r6*k17_r_r6*k19_r_r6*m_m8*m_m10*m_m12 + k03_r_r6*k05_r_r6*k07_r_r6*k09_r_r6*k12_r_r6*k15_r_r6*k18_r_r6*k20_r_r6*m_m7*m_m11*m_m12 + k04_r_r6*k06_r_r6*k08_r_r6*k10_r_r6*k12_r_r6*k14_r_r6*k16_r_r6*k18_r_r6*m_m8*m_m11*m_m12 + k02_r_r6*k04_r_r6*k06_r_r6*k09_r_r6*k13_r_r6*k15_r_r6*k18_r_r6*k20_r_r6*m_m10*m_m11*m_m12 + k02_r_r6*k06_r_r6*k08_r_r6*k10_r_r6*k13_r_r6*k15_r_r6*k17_r_r6*k19_r_r6*m_m8*m_m10*m_m12 + k03_r_r6*k05_r_r6*k07_r_r6*k09_r_r6*k12_r_r6*k16_r_r6*k18_r_r6*k20_r_r6*m_m7*m_m11*m_m12 + k02_r_r6*k04_r_r6*k06_r_r6*k09_r_r6*k13_r_r6*k16_r_r6*k18_r_r6*k20_r_r6*m_m10*m_m11*m_m12 + k02_r_r6*k04_r_r6*k07_r_r6*k09_r_r6*k13_r_r6*k15_r_r6*k18_r_r6*k20_r_r6*m_m10*m_m11*m_m12 + k02_r_r6*k04_r_r6*k07_r_r6*k09_r_r6*k13_r_r6*k16_r_r6*k18_r_r6*k20_r_r6*m_m10*m_m11*m_m12 + k02_r_r6*k05_r_r6*k07_r_r6*k09_r_r6*k13_r_r6*k15_r_r6*k18_r_r6*k20_r_r6*m_m10*m_m11*m_m12 + k03_r_r6*k05_r_r6*k07_r_r6*k09_r_r6*k14_r_r6*k16_r_r6*k18_r_r6*k20_r_r6*m_m7*m_m11*m_m12 + k04_r_r6*k06_r_r6*k08_r_r6*k10_r_r6*k13_r_r6*k15_r_r6*k17_r_r6*k19_r_r6*m_m8*m_m10*m_m12 + k02_r_r6*k05_r_r6*k07_r_r6*k09_r_r6*k13_r_r6*k16_r_r6*k18_r_r6*k20_r_r6*m_m10*m_m11*m_m12 + k01_r_r6*k03_r_r6*k05_r_r6*k08_r_r6*k12_r_r6*k14_r_r6*k16_r_r6*k18_r_r6*m_m1*m_m7*m_m8*m_m11 + k01_r_r6*k03_r_r6*k06_r_r6*k08_r_r6*k12_r_r6*k14_r_r6*k16_r_r6*k18_r_r6*m_m1*m_m7*m_m8*m_m11 + k01_r_r6*k03_r_r6*k05_r_r6*k08_r_r6*k13_r_r6*k15_r_r6*k17_r_r6*k19_r_r6*m_m1*m_m7*m_m8*m_m10 + k02_r_r6*k04_r_r6*k06_r_r6*k08_r_r6*k11_r_r6*k13_r_r6*k15_r_r6*k18_r_r6*m_m1*m_m8*m_m10*m_m11 + k01_r_r6*k03_r_r6*k06_r_r6*k08_r_r6*k13_r_r6*k15_r_r6*k17_r_r6*k19_r_r6*m_m1*m_m7*m_m8*m_m10 + k02_r_r6*k04_r_r6*k06_r_r6*k08_r_r6*k11_r_r6*k13_r_r6*k16_r_r6*k18_r_r6*m_m1*m_m8*m_m10*m_m11 + k03_r_r6*k05_r_r6*k07_r_r6*k09_r_r6*k11_r_r6*k13_r_r6*k15_r_r6*k18_r_r6*m_m1*m_m7*m_m10*m_m11 + k03_r_r6*k05_r_r6*k07_r_r6*k09_r_r6*k11_r_r6*k13_r_r6*k16_r_r6*k18_r_r6*m_m1*m_m7*m_m10*m_m11 + k03_r_r6*k05_r_r6*k08_r_r6*k10_r_r6*k12_r_r6*k14_r_r6*k16_r_r6*k18_r_r6*m_m7*m_m8*m_m11*m_m12 + k03_r_r6*k06_r_r6*k08_r_r6*k10_r_r6*k12_r_r6*k14_r_r6*k16_r_r6*k18_r_r6*m_m7*m_m8*m_m11*m_m12 + k02_r_r6*k04_r_r6*k06_r_r6*k08_r_r6*k13_r_r6*k15_r_r6*k18_r_r6*k20_r_r6*m_m8*m_m10*m_m11*m_m12 + k03_r_r6*k05_r_r6*k08_r_r6*k10_r_r6*k13_r_r6*k15_r_r6*k17_r_r6*k19_r_r6*m_m7*m_m8*m_m10*m_m12 + k02_r_r6*k04_r_r6*k06_r_r6*k08_r_r6*k13_r_r6*k16_r_r6*k18_r_r6*k20_r_r6*m_m8*m_m10*m_m11*m_m12 + k03_r_r6*k06_r_r6*k08_r_r6*k10_r_r6*k13_r_r6*k15_r_r6*k17_r_r6*k19_r_r6*m_m7*m_m8*m_m10*m_m12 + k03_r_r6*k05_r_r6*k07_r_r6*k09_r_r6*k13_r_r6*k15_r_r6*k18_r_r6*k20_r_r6*m_m7*m_m10*m_m11*m_m12 + k03_r_r6*k05_r_r6*k07_r_r6*k09_r_r6*k13_r_r6*k16_r_r6*k18_r_r6*k20_r_r6*m_m7*m_m10*m_m11*m_m12))^n_sub_r_r6 + 1)*(k02_r_r6*k04_r_r6*k06_r_r6*k09_r_r6*k12_r_r6*k14_r_r6*k16_r_r6*k19_r_r6 + k02_r_r6*k04_r_r6*k06_r_r6*k09_r_r6*k12_r_r6*k14_r_r6*k17_r_r6*k19_r_r6 + k02_r_r6*k04_r_r6*k07_r_r6*k09_r_r6*k12_r_r6*k14_r_r6*k16_r_r6*k19_r_r6 + k02_r_r6*k04_r_r6*k06_r_r6*k09_r_r6*k12_r_r6*k15_r_r6*k17_r_r6*k19_r_r6 + k02_r_r6*k04_r_r6*k07_r_r6*k09_r_r6*k12_r_r6*k14_r_r6*k17_r_r6*k19_r_r6 + k02_r_r6*k05_r_r6*k07_r_r6*k09_r_r6*k12_r_r6*k14_r_r6*k16_r_r6*k19_r_r6 + k02_r_r6*k04_r_r6*k07_r_r6*k09_r_r6*k12_r_r6*k15_r_r6*k17_r_r6*k19_r_r6 + k02_r_r6*k05_r_r6*k07_r_r6*k09_r_r6*k12_r_r6*k14_r_r6*k17_r_r6*k19_r_r6 + k02_r_r6*k05_r_r6*k07_r_r6*k09_r_r6*k12_r_r6*k15_r_r6*k17_r_r6*k19_r_r6 + k01_r_r6*k04_r_r6*k06_r_r6*k09_r_r6*k12_r_r6*k14_r_r6*k16_r_r6*k19_r_r6*m_m1 + k02_r_r6*k04_r_r6*k06_r_r6*k09_r_r6*k11_r_r6*k14_r_r6*k16_r_r6*k19_r_r6*m_m1 + k01_r_r6*k04_r_r6*k06_r_r6*k09_r_r6*k12_r_r6*k14_r_r6*k17_r_r6*k19_r_r6*m_m1 + k01_r_r6*k04_r_r6*k07_r_r6*k09_r_r6*k12_r_r6*k14_r_r6*k16_r_r6*k19_r_r6*m_m1 + k02_r_r6*k04_r_r6*k06_r_r6*k09_r_r6*k11_r_r6*k14_r_r6*k17_r_r6*k19_r_r6*m_m1 + k02_r_r6*k04_r_r6*k07_r_r6*k09_r_r6*k11_r_r6*k14_r_r6*k16_r_r6*k19_r_r6*m_m1 + k01_r_r6*k04_r_r6*k06_r_r6*k09_r_r6*k12_r_r6*k15_r_r6*k17_r_r6*k19_r_r6*m_m1 + k01_r_r6*k04_r_r6*k07_r_r6*k09_r_r6*k12_r_r6*k14_r_r6*k17_r_r6*k19_r_r6*m_m1 + k01_r_r6*k05_r_r6*k07_r_r6*k09_r_r6*k12_r_r6*k14_r_r6*k16_r_r6*k19_r_r6*m_m1 + k02_r_r6*k04_r_r6*k06_r_r6*k09_r_r6*k11_r_r6*k15_r_r6*k17_r_r6*k19_r_r6*m_m1 + k02_r_r6*k04_r_r6*k07_r_r6*k09_r_r6*k11_r_r6*k14_r_r6*k17_r_r6*k19_r_r6*m_m1 + k02_r_r6*k05_r_r6*k07_r_r6*k09_r_r6*k11_r_r6*k14_r_r6*k16_r_r6*k19_r_r6*m_m1 + k01_r_r6*k04_r_r6*k07_r_r6*k09_r_r6*k12_r_r6*k15_r_r6*k17_r_r6*k19_r_r6*m_m1 + k01_r_r6*k05_r_r6*k07_r_r6*k09_r_r6*k12_r_r6*k14_r_r6*k17_r_r6*k19_r_r6*m_m1 + k02_r_r6*k04_r_r6*k07_r_r6*k09_r_r6*k11_r_r6*k15_r_r6*k17_r_r6*k19_r_r6*m_m1 + k02_r_r6*k05_r_r6*k07_r_r6*k09_r_r6*k11_r_r6*k14_r_r6*k17_r_r6*k19_r_r6*m_m1 + k01_r_r6*k05_r_r6*k07_r_r6*k09_r_r6*k12_r_r6*k15_r_r6*k17_r_r6*k19_r_r6*m_m1 + k02_r_r6*k05_r_r6*k07_r_r6*k09_r_r6*k11_r_r6*k15_r_r6*k17_r_r6*k19_r_r6*m_m1 + k02_r_r6*k04_r_r6*k06_r_r6*k08_r_r6*k12_r_r6*k14_r_r6*k16_r_r6*k19_r_r6*m_m8 + k02_r_r6*k04_r_r6*k06_r_r6*k08_r_r6*k12_r_r6*k14_r_r6*k17_r_r6*k19_r_r6*m_m8 + k02_r_r6*k04_r_r6*k06_r_r6*k08_r_r6*k12_r_r6*k15_r_r6*k17_r_r6*k19_r_r6*m_m8 + k02_r_r6*k04_r_r6*k06_r_r6*k09_r_r6*k12_r_r6*k14_r_r6*k16_r_r6*k18_r_r6*m_m11 + k03_r_r6*k05_r_r6*k07_r_r6*k09_r_r6*k12_r_r6*k14_r_r6*k16_r_r6*k19_r_r6*m_m7 + k02_r_r6*k04_r_r6*k07_r_r6*k09_r_r6*k12_r_r6*k14_r_r6*k16_r_r6*k18_r_r6*m_m11 + k03_r_r6*k05_r_r6*k07_r_r6*k09_r_r6*k12_r_r6*k14_r_r6*k17_r_r6*k19_r_r6*m_m7 + k02_r_r6*k05_r_r6*k07_r_r6*k09_r_r6*k12_r_r6*k14_r_r6*k16_r_r6*k18_r_r6*m_m11 + k03_r_r6*k05_r_r6*k07_r_r6*k09_r_r6*k12_r_r6*k15_r_r6*k17_r_r6*k19_r_r6*m_m7 + k02_r_r6*k04_r_r6*k06_r_r6*k09_r_r6*k12_r_r6*k14_r_r6*k16_r_r6*k20_r_r6*m_m12 + k02_r_r6*k04_r_r6*k06_r_r6*k09_r_r6*k13_r_r6*k15_r_r6*k17_r_r6*k19_r_r6*m_m10 + k02_r_r6*k04_r_r6*k06_r_r6*k10_r_r6*k12_r_r6*k14_r_r6*k16_r_r6*k19_r_r6*m_m12 + k02_r_r6*k04_r_r6*k06_r_r6*k09_r_r6*k12_r_r6*k14_r_r6*k17_r_r6*k20_r_r6*m_m12 + k02_r_r6*k04_r_r6*k06_r_r6*k10_r_r6*k12_r_r6*k14_r_r6*k17_r_r6*k19_r_r6*m_m12 + k02_r_r6*k04_r_r6*k07_r_r6*k09_r_r6*k12_r_r6*k14_r_r6*k16_r_r6*k20_r_r6*m_m12 + k02_r_r6*k04_r_r6*k07_r_r6*k09_r_r6*k13_r_r6*k15_r_r6*k17_r_r6*k19_r_r6*m_m10 + k02_r_r6*k04_r_r6*k07_r_r6*k10_r_r6*k12_r_r6*k14_r_r6*k16_r_r6*k19_r_r6*m_m12 + k02_r_r6*k04_r_r6*k06_r_r6*k09_r_r6*k12_r_r6*k15_r_r6*k17_r_r6*k20_r_r6*m_m12 + k02_r_r6*k04_r_r6*k06_r_r6*k10_r_r6*k12_r_r6*k15_r_r6*k17_r_r6*k19_r_r6*m_m12 + k02_r_r6*k04_r_r6*k07_r_r6*k09_r_r6*k12_r_r6*k14_r_r6*k17_r_r6*k20_r_r6*m_m12 + k02_r_r6*k04_r_r6*k07_r_r6*k10_r_r6*k12_r_r6*k14_r_r6*k17_r_r6*k19_r_r6*m_m12 + k02_r_r6*k05_r_r6*k07_r_r6*k09_r_r6*k12_r_r6*k14_r_r6*k16_r_r6*k20_r_r6*m_m12 + k02_r_r6*k05_r_r6*k07_r_r6*k09_r_r6*k13_r_r6*k15_r_r6*k17_r_r6*k19_r_r6*m_m10 + k02_r_r6*k05_r_r6*k07_r_r6*k10_r_r6*k12_r_r6*k14_r_r6*k16_r_r6*k19_r_r6*m_m12 + k02_r_r6*k04_r_r6*k07_r_r6*k09_r_r6*k12_r_r6*k15_r_r6*k17_r_r6*k20_r_r6*m_m12 + k02_r_r6*k04_r_r6*k07_r_r6*k10_r_r6*k12_r_r6*k15_r_r6*k17_r_r6*k19_r_r6*m_m12 + k02_r_r6*k05_r_r6*k07_r_r6*k09_r_r6*k12_r_r6*k14_r_r6*k17_r_r6*k20_r_r6*m_m12 + k02_r_r6*k05_r_r6*k07_r_r6*k10_r_r6*k12_r_r6*k14_r_r6*k17_r_r6*k19_r_r6*m_m12 + k02_r_r6*k05_r_r6*k07_r_r6*k09_r_r6*k12_r_r6*k15_r_r6*k17_r_r6*k20_r_r6*m_m12 + k02_r_r6*k05_r_r6*k07_r_r6*k10_r_r6*k12_r_r6*k15_r_r6*k17_r_r6*k19_r_r6*m_m12 + k01_r_r6*k03_r_r6*k05_r_r6*k07_r_r6*k12_r_r6*k14_r_r6*k16_r_r6*k19_r_r6*m_m1*m_m7 + k01_r_r6*k03_r_r6*k05_r_r6*k07_r_r6*k12_r_r6*k14_r_r6*k17_r_r6*k19_r_r6*m_m1*m_m7 + k01_r_r6*k03_r_r6*k05_r_r6*k07_r_r6*k12_r_r6*k15_r_r6*k17_r_r6*k19_r_r6*m_m1*m_m7 + k01_r_r6*k03_r_r6*k05_r_r6*k09_r_r6*k12_r_r6*k14_r_r6*k16_r_r6*k19_r_r6*m_m1*m_m7 + k01_r_r6*k03_r_r6*k05_r_r6*k09_r_r6*k12_r_r6*k14_r_r6*k17_r_r6*k19_r_r6*m_m1*m_m7 + k01_r_r6*k03_r_r6*k06_r_r6*k09_r_r6*k12_r_r6*k14_r_r6*k16_r_r6*k19_r_r6*m_m1*m_m7 + k02_r_r6*k04_r_r6*k06_r_r6*k09_r_r6*k11_r_r6*k13_r_r6*k15_r_r6*k17_r_r6*m_m1*m_m10 + k01_r_r6*k03_r_r6*k05_r_r6*k09_r_r6*k12_r_r6*k15_r_r6*k17_r_r6*k19_r_r6*m_m1*m_m7 + k01_r_r6*k03_r_r6*k06_r_r6*k09_r_r6*k12_r_r6*k14_r_r6*k17_r_r6*k19_r_r6*m_m1*m_m7 + k01_r_r6*k03_r_r6*k07_r_r6*k09_r_r6*k12_r_r6*k14_r_r6*k16_r_r6*k19_r_r6*m_m1*m_m7 + k01_r_r6*k04_r_r6*k06_r_r6*k08_r_r6*k12_r_r6*k14_r_r6*k16_r_r6*k19_r_r6*m_m1*m_m8 + k02_r_r6*k04_r_r6*k06_r_r6*k08_r_r6*k11_r_r6*k14_r_r6*k16_r_r6*k19_r_r6*m_m1*m_m8 + k02_r_r6*k04_r_r6*k07_r_r6*k09_r_r6*k11_r_r6*k13_r_r6*k15_r_r6*k17_r_r6*m_m1*m_m10 + k01_r_r6*k03_r_r6*k06_r_r6*k09_r_r6*k12_r_r6*k15_r_r6*k17_r_r6*k19_r_r6*m_m1*m_m7 + k01_r_r6*k03_r_r6*k07_r_r6*k09_r_r6*k12_r_r6*k14_r_r6*k17_r_r6*k19_r_r6*m_m1*m_m7 + k01_r_r6*k04_r_r6*k06_r_r6*k08_r_r6*k12_r_r6*k14_r_r6*k17_r_r6*k19_r_r6*m_m1*m_m8 + k02_r_r6*k04_r_r6*k06_r_r6*k08_r_r6*k11_r_r6*k14_r_r6*k17_r_r6*k19_r_r6*m_m1*m_m8 + k02_r_r6*k04_r_r6*k06_r_r6*k09_r_r6*k11_r_r6*k13_r_r6*k15_r_r6*k19_r_r6*m_m1*m_m10 + k02_r_r6*k05_r_r6*k07_r_r6*k09_r_r6*k11_r_r6*k13_r_r6*k15_r_r6*k17_r_r6*m_m1*m_m10 + k01_r_r6*k03_r_r6*k07_r_r6*k09_r_r6*k12_r_r6*k15_r_r6*k17_r_r6*k19_r_r6*m_m1*m_m7 + k01_r_r6*k04_r_r6*k06_r_r6*k08_r_r6*k12_r_r6*k15_r_r6*k17_r_r6*k19_r_r6*m_m1*m_m8 + k02_r_r6*k04_r_r6*k06_r_r6*k08_r_r6*k11_r_r6*k15_r_r6*k17_r_r6*k19_r_r6*m_m1*m_m8 + k02_r_r6*k04_r_r6*k06_r_r6*k09_r_r6*k11_r_r6*k13_r_r6*k16_r_r6*k19_r_r6*m_m1*m_m10 + k02_r_r6*k04_r_r6*k07_r_r6*k09_r_r6*k11_r_r6*k13_r_r6*k15_r_r6*k19_r_r6*m_m1*m_m10 + k01_r_r6*k04_r_r6*k06_r_r6*k09_r_r6*k12_r_r6*k14_r_r6*k16_r_r6*k18_r_r6*m_m1*m_m11 + k02_r_r6*k04_r_r6*k06_r_r6*k09_r_r6*k11_r_r6*k13_r_r6*k17_r_r6*k19_r_r6*m_m1*m_m10 + k02_r_r6*k04_r_r6*k06_r_r6*k09_r_r6*k11_r_r6*k14_r_r6*k16_r_r6*k18_r_r6*m_m1*m_m11 + k02_r_r6*k04_r_r6*k07_r_r6*k09_r_r6*k11_r_r6*k13_r_r6*k16_r_r6*k19_r_r6*m_m1*m_m10 + k02_r_r6*k05_r_r6*k07_r_r6*k09_r_r6*k11_r_r6*k13_r_r6*k15_r_r6*k19_r_r6*m_m1*m_m10 + k03_r_r6*k05_r_r6*k07_r_r6*k09_r_r6*k11_r_r6*k14_r_r6*k16_r_r6*k19_r_r6*m_m1*m_m7 + k01_r_r6*k04_r_r6*k07_r_r6*k09_r_r6*k12_r_r6*k14_r_r6*k16_r_r6*k18_r_r6*m_m1*m_m11 + k02_r_r6*k04_r_r6*k07_r_r6*k09_r_r6*k11_r_r6*k13_r_r6*k17_r_r6*k19_r_r6*m_m1*m_m10 + k02_r_r6*k04_r_r6*k07_r_r6*k09_r_r6*k11_r_r6*k14_r_r6*k16_r_r6*k18_r_r6*m_m1*m_m11 + k02_r_r6*k05_r_r6*k07_r_r6*k09_r_r6*k11_r_r6*k13_r_r6*k16_r_r6*k19_r_r6*m_m1*m_m10 + k03_r_r6*k05_r_r6*k07_r_r6*k09_r_r6*k11_r_r6*k14_r_r6*k17_r_r6*k19_r_r6*m_m1*m_m7 + k01_r_r6*k05_r_r6*k07_r_r6*k09_r_r6*k12_r_r6*k14_r_r6*k16_r_r6*k18_r_r6*m_m1*m_m11 + k02_r_r6*k05_r_r6*k07_r_r6*k09_r_r6*k11_r_r6*k13_r_r6*k17_r_r6*k19_r_r6*m_m1*m_m10 + k02_r_r6*k05_r_r6*k07_r_r6*k09_r_r6*k11_r_r6*k14_r_r6*k16_r_r6*k18_r_r6*m_m1*m_m11 + k03_r_r6*k05_r_r6*k07_r_r6*k09_r_r6*k11_r_r6*k15_r_r6*k17_r_r6*k19_r_r6*m_m1*m_m7 + k01_r_r6*k04_r_r6*k06_r_r6*k09_r_r6*k13_r_r6*k15_r_r6*k17_r_r6*k19_r_r6*m_m1*m_m10 + k01_r_r6*k04_r_r6*k07_r_r6*k09_r_r6*k13_r_r6*k15_r_r6*k17_r_r6*k19_r_r6*m_m1*m_m10 + k01_r_r6*k05_r_r6*k07_r_r6*k09_r_r6*k13_r_r6*k15_r_r6*k17_r_r6*k19_r_r6*m_m1*m_m10 + k02_r_r6*k04_r_r6*k06_r_r6*k08_r_r6*k12_r_r6*k14_r_r6*k16_r_r6*k18_r_r6*m_m8*m_m11 + k02_r_r6*k04_r_r6*k06_r_r6*k08_r_r6*k12_r_r6*k14_r_r6*k16_r_r6*k20_r_r6*m_m8*m_m12 + k02_r_r6*k04_r_r6*k06_r_r6*k08_r_r6*k13_r_r6*k15_r_r6*k17_r_r6*k19_r_r6*m_m8*m_m10 + k03_r_r6*k05_r_r6*k07_r_r6*k09_r_r6*k12_r_r6*k14_r_r6*k16_r_r6*k18_r_r6*m_m7*m_m11 + k02_r_r6*k04_r_r6*k06_r_r6*k08_r_r6*k12_r_r6*k14_r_r6*k17_r_r6*k20_r_r6*m_m8*m_m12 + k02_r_r6*k04_r_r6*k06_r_r6*k08_r_r6*k12_r_r6*k15_r_r6*k17_r_r6*k20_r_r6*m_m8*m_m12 + k02_r_r6*k04_r_r6*k06_r_r6*k10_r_r6*k12_r_r6*k14_r_r6*k16_r_r6*k18_r_r6*m_m11*m_m12 + k02_r_r6*k04_r_r6*k08_r_r6*k10_r_r6*k12_r_r6*k14_r_r6*k16_r_r6*k19_r_r6*m_m8*m_m12 + k03_r_r6*k05_r_r6*k07_r_r6*k09_r_r6*k12_r_r6*k14_r_r6*k16_r_r6*k20_r_r6*m_m7*m_m12 + k03_r_r6*k05_r_r6*k07_r_r6*k09_r_r6*k13_r_r6*k15_r_r6*k17_r_r6*k19_r_r6*m_m7*m_m10 + k03_r_r6*k05_r_r6*k07_r_r6*k10_r_r6*k12_r_r6*k14_r_r6*k16_r_r6*k19_r_r6*m_m7*m_m12 + k02_r_r6*k04_r_r6*k07_r_r6*k10_r_r6*k12_r_r6*k14_r_r6*k16_r_r6*k18_r_r6*m_m11*m_m12 + k02_r_r6*k04_r_r6*k08_r_r6*k10_r_r6*k12_r_r6*k14_r_r6*k17_r_r6*k19_r_r6*m_m8*m_m12 + k02_r_r6*k05_r_r6*k08_r_r6*k10_r_r6*k12_r_r6*k14_r_r6*k16_r_r6*k19_r_r6*m_m8*m_m12 + k03_r_r6*k05_r_r6*k07_r_r6*k09_r_r6*k12_r_r6*k14_r_r6*k17_r_r6*k20_r_r6*m_m7*m_m12 + k03_r_r6*k05_r_r6*k07_r_r6*k10_r_r6*k12_r_r6*k14_r_r6*k17_r_r6*k19_r_r6*m_m7*m_m12 + k02_r_r6*k04_r_r6*k08_r_r6*k10_r_r6*k12_r_r6*k15_r_r6*k17_r_r6*k19_r_r6*m_m8*m_m12 + k02_r_r6*k05_r_r6*k07_r_r6*k10_r_r6*k12_r_r6*k14_r_r6*k16_r_r6*k18_r_r6*m_m11*m_m12 + k02_r_r6*k05_r_r6*k08_r_r6*k10_r_r6*k12_r_r6*k14_r_r6*k17_r_r6*k19_r_r6*m_m8*m_m12 + k02_r_r6*k06_r_r6*k08_r_r6*k10_r_r6*k12_r_r6*k14_r_r6*k16_r_r6*k19_r_r6*m_m8*m_m12 + k03_r_r6*k05_r_r6*k07_r_r6*k09_r_r6*k12_r_r6*k15_r_r6*k17_r_r6*k20_r_r6*m_m7*m_m12 + k03_r_r6*k05_r_r6*k07_r_r6*k10_r_r6*k12_r_r6*k15_r_r6*k17_r_r6*k19_r_r6*m_m7*m_m12 + k02_r_r6*k04_r_r6*k06_r_r6*k09_r_r6*k12_r_r6*k14_r_r6*k18_r_r6*k20_r_r6*m_m11*m_m12 + k02_r_r6*k04_r_r6*k06_r_r6*k09_r_r6*k13_r_r6*k15_r_r6*k17_r_r6*k20_r_r6*m_m10*m_m12 + k02_r_r6*k04_r_r6*k06_r_r6*k10_r_r6*k13_r_r6*k15_r_r6*k17_r_r6*k19_r_r6*m_m10*m_m12 + k02_r_r6*k05_r_r6*k08_r_r6*k10_r_r6*k12_r_r6*k15_r_r6*k17_r_r6*k19_r_r6*m_m8*m_m12 + k02_r_r6*k06_r_r6*k08_r_r6*k10_r_r6*k12_r_r6*k14_r_r6*k17_r_r6*k19_r_r6*m_m8*m_m12 + k02_r_r6*k04_r_r6*k06_r_r6*k09_r_r6*k12_r_r6*k15_r_r6*k18_r_r6*k20_r_r6*m_m11*m_m12 + k02_r_r6*k04_r_r6*k07_r_r6*k09_r_r6*k12_r_r6*k14_r_r6*k18_r_r6*k20_r_r6*m_m11*m_m12 + k02_r_r6*k04_r_r6*k07_r_r6*k09_r_r6*k13_r_r6*k15_r_r6*k17_r_r6*k20_r_r6*m_m10*m_m12 + k02_r_r6*k04_r_r6*k07_r_r6*k10_r_r6*k13_r_r6*k15_r_r6*k17_r_r6*k19_r_r6*m_m10*m_m12 + k02_r_r6*k06_r_r6*k08_r_r6*k10_r_r6*k12_r_r6*k15_r_r6*k17_r_r6*k19_r_r6*m_m8*m_m12 + k04_r_r6*k06_r_r6*k08_r_r6*k10_r_r6*k12_r_r6*k14_r_r6*k16_r_r6*k19_r_r6*m_m8*m_m12 + k02_r_r6*k04_r_r6*k06_r_r6*k09_r_r6*k12_r_r6*k16_r_r6*k18_r_r6*k20_r_r6*m_m11*m_m12 + k02_r_r6*k04_r_r6*k07_r_r6*k09_r_r6*k12_r_r6*k15_r_r6*k18_r_r6*k20_r_r6*m_m11*m_m12 + k02_r_r6*k05_r_r6*k07_r_r6*k09_r_r6*k12_r_r6*k14_r_r6*k18_r_r6*k20_r_r6*m_m11*m_m12 + k02_r_r6*k05_r_r6*k07_r_r6*k09_r_r6*k13_r_r6*k15_r_r6*k17_r_r6*k20_r_r6*m_m10*m_m12 + k02_r_r6*k05_r_r6*k07_r_r6*k10_r_r6*k13_r_r6*k15_r_r6*k17_r_r6*k19_r_r6*m_m10*m_m12 + k04_r_r6*k06_r_r6*k08_r_r6*k10_r_r6*k12_r_r6*k14_r_r6*k17_r_r6*k19_r_r6*m_m8*m_m12 + k02_r_r6*k04_r_r6*k07_r_r6*k09_r_r6*k12_r_r6*k16_r_r6*k18_r_r6*k20_r_r6*m_m11*m_m12 + k02_r_r6*k05_r_r6*k07_r_r6*k09_r_r6*k12_r_r6*k15_r_r6*k18_r_r6*k20_r_r6*m_m11*m_m12 + k04_r_r6*k06_r_r6*k08_r_r6*k10_r_r6*k12_r_r6*k15_r_r6*k17_r_r6*k19_r_r6*m_m8*m_m12 + k02_r_r6*k04_r_r6*k06_r_r6*k09_r_r6*k14_r_r6*k16_r_r6*k18_r_r6*k20_r_r6*m_m11*m_m12 + k02_r_r6*k05_r_r6*k07_r_r6*k09_r_r6*k12_r_r6*k16_r_r6*k18_r_r6*k20_r_r6*m_m11*m_m12 + k02_r_r6*k04_r_r6*k07_r_r6*k09_r_r6*k14_r_r6*k16_r_r6*k18_r_r6*k20_r_r6*m_m11*m_m12 + k02_r_r6*k05_r_r6*k07_r_r6*k09_r_r6*k14_r_r6*k16_r_r6*k18_r_r6*k20_r_r6*m_m11*m_m12 + k01_r_r6*k03_r_r6*k05_r_r6*k08_r_r6*k12_r_r6*k14_r_r6*k16_r_r6*k19_r_r6*m_m1*m_m7*m_m8 + k01_r_r6*k03_r_r6*k05_r_r6*k07_r_r6*k12_r_r6*k14_r_r6*k16_r_r6*k18_r_r6*m_m1*m_m7*m_m11 + k01_r_r6*k03_r_r6*k05_r_r6*k08_r_r6*k12_r_r6*k14_r_r6*k17_r_r6*k19_r_r6*m_m1*m_m7*m_m8 + k01_r_r6*k03_r_r6*k06_r_r6*k08_r_r6*k12_r_r6*k14_r_r6*k16_r_r6*k19_r_r6*m_m1*m_m7*m_m8 + k02_r_r6*k04_r_r6*k06_r_r6*k08_r_r6*k11_r_r6*k13_r_r6*k15_r_r6*k17_r_r6*m_m1*m_m8*m_m10 + k01_r_r6*k03_r_r6*k05_r_r6*k08_r_r6*k12_r_r6*k15_r_r6*k17_r_r6*k19_r_r6*m_m1*m_m7*m_m8 + k01_r_r6*k03_r_r6*k06_r_r6*k08_r_r6*k12_r_r6*k14_r_r6*k17_r_r6*k19_r_r6*m_m1*m_m7*m_m8 + k01_r_r6*k03_r_r6*k05_r_r6*k09_r_r6*k12_r_r6*k14_r_r6*k16_r_r6*k18_r_r6*m_m1*m_m7*m_m11 + k01_r_r6*k03_r_r6*k06_r_r6*k08_r_r6*k12_r_r6*k15_r_r6*k17_r_r6*k19_r_r6*m_m1*m_m7*m_m8 + k02_r_r6*k04_r_r6*k06_r_r6*k08_r_r6*k11_r_r6*k13_r_r6*k15_r_r6*k19_r_r6*m_m1*m_m8*m_m10 + k01_r_r6*k03_r_r6*k05_r_r6*k07_r_r6*k13_r_r6*k15_r_r6*k17_r_r6*k19_r_r6*m_m1*m_m7*m_m10 + k01_r_r6*k03_r_r6*k06_r_r6*k09_r_r6*k12_r_r6*k14_r_r6*k16_r_r6*k18_r_r6*m_m1*m_m7*m_m11 + k02_r_r6*k04_r_r6*k06_r_r6*k08_r_r6*k11_r_r6*k13_r_r6*k16_r_r6*k19_r_r6*m_m1*m_m8*m_m10 + k03_r_r6*k05_r_r6*k07_r_r6*k09_r_r6*k11_r_r6*k13_r_r6*k15_r_r6*k17_r_r6*m_m1*m_m7*m_m10 + k01_r_r6*k03_r_r6*k07_r_r6*k09_r_r6*k12_r_r6*k14_r_r6*k16_r_r6*k18_r_r6*m_m1*m_m7*m_m11 + k01_r_r6*k04_r_r6*k06_r_r6*k08_r_r6*k12_r_r6*k14_r_r6*k16_r_r6*k18_r_r6*m_m1*m_m8*m_m11 + k02_r_r6*k04_r_r6*k06_r_r6*k08_r_r6*k11_r_r6*k13_r_r6*k17_r_r6*k19_r_r6*m_m1*m_m8*m_m10 + k02_r_r6*k04_r_r6*k06_r_r6*k08_r_r6*k11_r_r6*k14_r_r6*k16_r_r6*k18_r_r6*m_m1*m_m8*m_m11 + k01_r_r6*k03_r_r6*k05_r_r6*k09_r_r6*k13_r_r6*k15_r_r6*k17_r_r6*k19_r_r6*m_m1*m_m7*m_m10 + k02_r_r6*k04_r_r6*k06_r_r6*k09_r_r6*k11_r_r6*k13_r_r6*k15_r_r6*k18_r_r6*m_m1*m_m10*m_m11 + k03_r_r6*k05_r_r6*k07_r_r6*k09_r_r6*k11_r_r6*k13_r_r6*k15_r_r6*k19_r_r6*m_m1*m_m7*m_m10 + k01_r_r6*k03_r_r6*k06_r_r6*k09_r_r6*k13_r_r6*k15_r_r6*k17_r_r6*k19_r_r6*m_m1*m_m7*m_m10 + k02_r_r6*k04_r_r6*k06_r_r6*k09_r_r6*k11_r_r6*k13_r_r6*k16_r_r6*k18_r_r6*m_m1*m_m10*m_m11 + k02_r_r6*k04_r_r6*k07_r_r6*k09_r_r6*k11_r_r6*k13_r_r6*k15_r_r6*k18_r_r6*m_m1*m_m10*m_m11 + k03_r_r6*k05_r_r6*k07_r_r6*k09_r_r6*k11_r_r6*k13_r_r6*k16_r_r6*k19_r_r6*m_m1*m_m7*m_m10 + k01_r_r6*k03_r_r6*k07_r_r6*k09_r_r6*k13_r_r6*k15_r_r6*k17_r_r6*k19_r_r6*m_m1*m_m7*m_m10 + k01_r_r6*k04_r_r6*k06_r_r6*k08_r_r6*k13_r_r6*k15_r_r6*k17_r_r6*k19_r_r6*m_m1*m_m8*m_m10 + k02_r_r6*k04_r_r6*k07_r_r6*k09_r_r6*k11_r_r6*k13_r_r6*k16_r_r6*k18_r_r6*m_m1*m_m10*m_m11 + k02_r_r6*k05_r_r6*k07_r_r6*k09_r_r6*k11_r_r6*k13_r_r6*k15_r_r6*k18_r_r6*m_m1*m_m10*m_m11 + k03_r_r6*k05_r_r6*k07_r_r6*k09_r_r6*k11_r_r6*k13_r_r6*k17_r_r6*k19_r_r6*m_m1*m_m7*m_m10 + k03_r_r6*k05_r_r6*k07_r_r6*k09_r_r6*k11_r_r6*k14_r_r6*k16_r_r6*k18_r_r6*m_m1*m_m7*m_m11 + k02_r_r6*k05_r_r6*k07_r_r6*k09_r_r6*k11_r_r6*k13_r_r6*k16_r_r6*k18_r_r6*m_m1*m_m10*m_m11 + k03_r_r6*k05_r_r6*k08_r_r6*k10_r_r6*k12_r_r6*k14_r_r6*k16_r_r6*k19_r_r6*m_m7*m_m8*m_m12 + k02_r_r6*k04_r_r6*k06_r_r6*k08_r_r6*k12_r_r6*k14_r_r6*k18_r_r6*k20_r_r6*m_m8*m_m11*m_m12 + k02_r_r6*k04_r_r6*k06_r_r6*k08_r_r6*k13_r_r6*k15_r_r6*k17_r_r6*k20_r_r6*m_m8*m_m10*m_m12 + k02_r_r6*k04_r_r6*k08_r_r6*k10_r_r6*k12_r_r6*k14_r_r6*k16_r_r6*k18_r_r6*m_m8*m_m11*m_m12 + k03_r_r6*k05_r_r6*k07_r_r6*k10_r_r6*k12_r_r6*k14_r_r6*k16_r_r6*k18_r_r6*m_m7*m_m11*m_m12 + k03_r_r6*k05_r_r6*k08_r_r6*k10_r_r6*k12_r_r6*k14_r_r6*k17_r_r6*k19_r_r6*m_m7*m_m8*m_m12 + k03_r_r6*k06_r_r6*k08_r_r6*k10_r_r6*k12_r_r6*k14_r_r6*k16_r_r6*k19_r_r6*m_m7*m_m8*m_m12 + k02_r_r6*k04_r_r6*k06_r_r6*k08_r_r6*k12_r_r6*k15_r_r6*k18_r_r6*k20_r_r6*m_m8*m_m11*m_m12 + k02_r_r6*k05_r_r6*k08_r_r6*k10_r_r6*k12_r_r6*k14_r_r6*k16_r_r6*k18_r_r6*m_m8*m_m11*m_m12 + k03_r_r6*k05_r_r6*k08_r_r6*k10_r_r6*k12_r_r6*k15_r_r6*k17_r_r6*k19_r_r6*m_m7*m_m8*m_m12 + k03_r_r6*k06_r_r6*k08_r_r6*k10_r_r6*k12_r_r6*k14_r_r6*k17_r_r6*k19_r_r6*m_m7*m_m8*m_m12 + k02_r_r6*k04_r_r6*k06_r_r6*k08_r_r6*k12_r_r6*k16_r_r6*k18_r_r6*k20_r_r6*m_m8*m_m11*m_m12 + k02_r_r6*k06_r_r6*k08_r_r6*k10_r_r6*k12_r_r6*k14_r_r6*k16_r_r6*k18_r_r6*m_m8*m_m11*m_m12 + k03_r_r6*k06_r_r6*k08_r_r6*k10_r_r6*k12_r_r6*k15_r_r6*k17_r_r6*k19_r_r6*m_m7*m_m8*m_m12 + k02_r_r6*k04_r_r6*k08_r_r6*k10_r_r6*k13_r_r6*k15_r_r6*k17_r_r6*k19_r_r6*m_m8*m_m10*m_m12 + k03_r_r6*k05_r_r6*k07_r_r6*k09_r_r6*k12_r_r6*k14_r_r6*k18_r_r6*k20_r_r6*m_m7*m_m11*m_m12 + k03_r_r6*k05_r_r6*k07_r_r6*k09_r_r6*k13_r_r6*k15_r_r6*k17_r_r6*k20_r_r6*m_m7*m_m10*m_m12 + k03_r_r6*k05_r_r6*k07_r_r6*k10_r_r6*k13_r_r6*k15_r_r6*k17_r_r6*k19_r_r6*m_m7*m_m10*m_m12 + k02_r_r6*k04_r_r6*k06_r_r6*k08_r_r6*k14_r_r6*k16_r_r6*k18_r_r6*k20_r_r6*m_m8*m_m11*m_m12 + k02_r_r6*k05_r_r6*k08_r_r6*k10_r_r6*k13_r_r6*k15_r_r6*k17_r_r6*k19_r_r6*m_m8*m_m10*m_m12 + k03_r_r6*k05_r_r6*k07_r_r6*k09_r_r6*k12_r_r6*k15_r_r6*k18_r_r6*k20_r_r6*m_m7*m_m11*m_m12 + k04_r_r6*k06_r_r6*k08_r_r6*k10_r_r6*k12_r_r6*k14_r_r6*k16_r_r6*k18_r_r6*m_m8*m_m11*m_m12 + k02_r_r6*k04_r_r6*k06_r_r6*k09_r_r6*k13_r_r6*k15_r_r6*k18_r_r6*k20_r_r6*m_m10*m_m11*m_m12 + k02_r_r6*k06_r_r6*k08_r_r6*k10_r_r6*k13_r_r6*k15_r_r6*k17_r_r6*k19_r_r6*m_m8*m_m10*m_m12 + k03_r_r6*k05_r_r6*k07_r_r6*k09_r_r6*k12_r_r6*k16_r_r6*k18_r_r6*k20_r_r6*m_m7*m_m11*m_m12 + k02_r_r6*k04_r_r6*k06_r_r6*k09_r_r6*k13_r_r6*k16_r_r6*k18_r_r6*k20_r_r6*m_m10*m_m11*m_m12 + k02_r_r6*k04_r_r6*k07_r_r6*k09_r_r6*k13_r_r6*k15_r_r6*k18_r_r6*k20_r_r6*m_m10*m_m11*m_m12 + k02_r_r6*k04_r_r6*k07_r_r6*k09_r_r6*k13_r_r6*k16_r_r6*k18_r_r6*k20_r_r6*m_m10*m_m11*m_m12 + k02_r_r6*k05_r_r6*k07_r_r6*k09_r_r6*k13_r_r6*k15_r_r6*k18_r_r6*k20_r_r6*m_m10*m_m11*m_m12 + k03_r_r6*k05_r_r6*k07_r_r6*k09_r_r6*k14_r_r6*k16_r_r6*k18_r_r6*k20_r_r6*m_m7*m_m11*m_m12 + k04_r_r6*k06_r_r6*k08_r_r6*k10_r_r6*k13_r_r6*k15_r_r6*k17_r_r6*k19_r_r6*m_m8*m_m10*m_m12 + k02_r_r6*k05_r_r6*k07_r_r6*k09_r_r6*k13_r_r6*k16_r_r6*k18_r_r6*k20_r_r6*m_m10*m_m11*m_m12 + k01_r_r6*k03_r_r6*k05_r_r6*k08_r_r6*k12_r_r6*k14_r_r6*k16_r_r6*k18_r_r6*m_m1*m_m7*m_m8*m_m11 + k01_r_r6*k03_r_r6*k06_r_r6*k08_r_r6*k12_r_r6*k14_r_r6*k16_r_r6*k18_r_r6*m_m1*m_m7*m_m8*m_m11 + k01_r_r6*k03_r_r6*k05_r_r6*k08_r_r6*k13_r_r6*k15_r_r6*k17_r_r6*k19_r_r6*m_m1*m_m7*m_m8*m_m10 + k02_r_r6*k04_r_r6*k06_r_r6*k08_r_r6*k11_r_r6*k13_r_r6*k15_r_r6*k18_r_r6*m_m1*m_m8*m_m10*m_m11 + k01_r_r6*k03_r_r6*k06_r_r6*k08_r_r6*k13_r_r6*k15_r_r6*k17_r_r6*k19_r_r6*m_m1*m_m7*m_m8*m_m10 + k02_r_r6*k04_r_r6*k06_r_r6*k08_r_r6*k11_r_r6*k13_r_r6*k16_r_r6*k18_r_r6*m_m1*m_m8*m_m10*m_m11 + k03_r_r6*k05_r_r6*k07_r_r6*k09_r_r6*k11_r_r6*k13_r_r6*k15_r_r6*k18_r_r6*m_m1*m_m7*m_m10*m_m11 + k03_r_r6*k05_r_r6*k07_r_r6*k09_r_r6*k11_r_r6*k13_r_r6*k16_r_r6*k18_r_r6*m_m1*m_m7*m_m10*m_m11 + k03_r_r6*k05_r_r6*k08_r_r6*k10_r_r6*k12_r_r6*k14_r_r6*k16_r_r6*k18_r_r6*m_m7*m_m8*m_m11*m_m12 + k03_r_r6*k06_r_r6*k08_r_r6*k10_r_r6*k12_r_r6*k14_r_r6*k16_r_r6*k18_r_r6*m_m7*m_m8*m_m11*m_m12 + k02_r_r6*k04_r_r6*k06_r_r6*k08_r_r6*k13_r_r6*k15_r_r6*k18_r_r6*k20_r_r6*m_m8*m_m10*m_m11*m_m12 + k03_r_r6*k05_r_r6*k08_r_r6*k10_r_r6*k13_r_r6*k15_r_r6*k17_r_r6*k19_r_r6*m_m7*m_m8*m_m10*m_m12 + k02_r_r6*k04_r_r6*k06_r_r6*k08_r_r6*k13_r_r6*k16_r_r6*k18_r_r6*k20_r_r6*m_m8*m_m10*m_m11*m_m12 + k03_r_r6*k06_r_r6*k08_r_r6*k10_r_r6*k13_r_r6*k15_r_r6*k17_r_r6*k19_r_r6*m_m7*m_m8*m_m10*m_m12 + k03_r_r6*k05_r_r6*k07_r_r6*k09_r_r6*k13_r_r6*k15_r_r6*k18_r_r6*k20_r_r6*m_m7*m_m10*m_m11*m_m12 + k03_r_r6*k05_r_r6*k07_r_r6*k09_r_r6*k13_r_r6*k16_r_r6*k18_r_r6*k20_r_r6*m_m7*m_m10*m_m11*m_m12)))*(1/m_m11_ref);

  // Reactions:
  r_r1: $m_m3 + m_m6 -> m_m5 + $m_m14; k04_r_r1*(k01_r_r1*k05_r_r1*k07_r_r1*k09_r_r1*k11_r_r1*m_m3*m_m6 - k02_r_r1*k06_r_r1*k08_r_r1*k10_r_r1*k12_r_r1*m_m5*m_m14)/(k02_r_r1*k04_r_r1*k06_r_r1*k08_r_r1*k11_r_r1 + k02_r_r1*k04_r_r1*k06_r_r1*k09_r_r1*k11_r_r1 + k02_r_r1*k04_r_r1*k07_r_r1*k09_r_r1*k11_r_r1 + k03_r_r1*k05_r_r1*k07_r_r1*k09_r_r1*k11_r_r1*m_m6^2 + k01_r_r1*k04_r_r1*k06_r_r1*k08_r_r1*k11_r_r1*m_m3 + k01_r_r1*k04_r_r1*k06_r_r1*k09_r_r1*k11_r_r1*m_m3 + k01_r_r1*k04_r_r1*k07_r_r1*k09_r_r1*k11_r_r1*m_m3 + k02_r_r1*k04_r_r1*k06_r_r1*k08_r_r1*k10_r_r1*m_m5 + k02_r_r1*k03_r_r1*k06_r_r1*k08_r_r1*k11_r_r1*m_m6 + k02_r_r1*k03_r_r1*k06_r_r1*k09_r_r1*k11_r_r1*m_m6 + k02_r_r1*k03_r_r1*k07_r_r1*k09_r_r1*k11_r_r1*m_m6 + k04_r_r1*k05_r_r1*k07_r_r1*k09_r_r1*k11_r_r1*m_m6 + k02_r_r1*k04_r_r1*k06_r_r1*k08_r_r1*k12_r_r1*m_m14 + k02_r_r1*k04_r_r1*k06_r_r1*k09_r_r1*k12_r_r1*m_m14 + k02_r_r1*k04_r_r1*k07_r_r1*k09_r_r1*k12_r_r1*m_m14 + k01_r_r1*k04_r_r1*k05_r_r1*k07_r_r1*k09_r_r1*m_m3*m_m6 + k01_r_r1*k04_r_r1*k05_r_r1*k07_r_r1*k11_r_r1*m_m3*m_m6 + k01_r_r1*k04_r_r1*k06_r_r1*k08_r_r1*k10_r_r1*m_m3*m_m5 + k01_r_r1*k04_r_r1*k05_r_r1*k08_r_r1*k11_r_r1*m_m3*m_m6 + k01_r_r1*k04_r_r1*k05_r_r1*k09_r_r1*k11_r_r1*m_m3*m_m6 + k02_r_r1*k03_r_r1*k06_r_r1*k08_r_r1*k10_r_r1*m_m5*m_m6 + k02_r_r1*k04_r_r1*k06_r_r1*k10_r_r1*k12_r_r1*m_m5*m_m14 + k02_r_r1*k04_r_r1*k07_r_r1*k10_r_r1*k12_r_r1*m_m5*m_m14 + k02_r_r1*k04_r_r1*k08_r_r1*k10_r_r1*k12_r_r1*m_m5*m_m14 + k04_r_r1*k05_r_r1*k07_r_r1*k09_r_r1*k12_r_r1*m_m6*m_m14 + k04_r_r1*k06_r_r1*k08_r_r1*k10_r_r1*k12_r_r1*m_m5*m_m14 + k01_r_r1*k04_r_r1*k05_r_r1*k07_r_r1*k10_r_r1*m_m3*m_m5*m_m6 + k01_r_r1*k04_r_r1*k05_r_r1*k08_r_r1*k10_r_r1*m_m3*m_m5*m_m6 + k04_r_r1*k05_r_r1*k07_r_r1*k10_r_r1*k12_r_r1*m_m5*m_m6*m_m14 + k04_r_r1*k05_r_r1*k08_r_r1*k10_r_r1*k12_r_r1*m_m5*m_m6*m_m14);
  r_r2: m_m5 -> m_m7; n_sub_r_r2*(k01_r_r2*k03_r_r2*k05_r_r2*m_m5 - k02_r_r2*k04_r_r2*k06_r_r2*m_m7)*(k08_r_r2*k10_r_r2 + k08_r_r2*k11_r_r2 + k09_r_r2*k11_r_r2)/((L_0_r_r2*(Keff_m_m6_r_r2/(Keff_m_m6_r_r2 + m_m6))^n_sub_r_r2*((k02_r_r2*k04_r_r2 + k02_r_r2*k05_r_r2 + k03_r_r2*k05_r_r2)*(k08_r_r2*k10_r_r2 + k08_r_r2*k11_r_r2 + k09_r_r2*k11_r_r2)/(k02_r_r2*k04_r_r2*k08_r_r2*k10_r_r2 + k02_r_r2*k04_r_r2*k08_r_r2*k11_r_r2 + k02_r_r2*k05_r_r2*k08_r_r2*k10_r_r2 + k02_r_r2*k04_r_r2*k09_r_r2*k11_r_r2 + k02_r_r2*k05_r_r2*k08_r_r2*k11_r_r2 + k03_r_r2*k05_r_r2*k08_r_r2*k10_r_r2 + k02_r_r2*k05_r_r2*k09_r_r2*k11_r_r2 + k03_r_r2*k05_r_r2*k08_r_r2*k11_r_r2 + k03_r_r2*k05_r_r2*k09_r_r2*k11_r_r2 + k01_r_r2*k03_r_r2*k08_r_r2*k10_r_r2*m_m5 + k01_r_r2*k03_r_r2*k08_r_r2*k11_r_r2*m_m5 + k01_r_r2*k04_r_r2*k08_r_r2*k10_r_r2*m_m5 + k02_r_r2*k04_r_r2*k07_r_r2*k09_r_r2*m_m6 + k01_r_r2*k03_r_r2*k09_r_r2*k11_r_r2*m_m5 + k01_r_r2*k04_r_r2*k08_r_r2*k11_r_r2*m_m5 + k01_r_r2*k05_r_r2*k08_r_r2*k10_r_r2*m_m5 + k02_r_r2*k04_r_r2*k07_r_r2*k10_r_r2*m_m6 + k02_r_r2*k05_r_r2*k07_r_r2*k09_r_r2*m_m6 + k01_r_r2*k04_r_r2*k09_r_r2*k11_r_r2*m_m5 + k01_r_r2*k05_r_r2*k08_r_r2*k11_r_r2*m_m5 + k02_r_r2*k04_r_r2*k07_r_r2*k11_r_r2*m_m6 + k02_r_r2*k05_r_r2*k07_r_r2*k10_r_r2*m_m6 + k03_r_r2*k05_r_r2*k07_r_r2*k09_r_r2*m_m6 + k01_r_r2*k05_r_r2*k09_r_r2*k11_r_r2*m_m5 + k02_r_r2*k05_r_r2*k07_r_r2*k11_r_r2*m_m6 + k03_r_r2*k05_r_r2*k07_r_r2*k10_r_r2*m_m6 + k03_r_r2*k05_r_r2*k07_r_r2*k11_r_r2*m_m6 + k02_r_r2*k06_r_r2*k08_r_r2*k10_r_r2*m_m7 + k02_r_r2*k06_r_r2*k08_r_r2*k11_r_r2*m_m7 + k03_r_r2*k06_r_r2*k08_r_r2*k10_r_r2*m_m7 + k02_r_r2*k06_r_r2*k09_r_r2*k11_r_r2*m_m7 + k03_r_r2*k06_r_r2*k08_r_r2*k11_r_r2*m_m7 + k04_r_r2*k06_r_r2*k08_r_r2*k10_r_r2*m_m7 + k02_r_r2*k04_r_r2*k08_r_r2*k12_r_r2*m_m10 + k03_r_r2*k06_r_r2*k09_r_r2*k11_r_r2*m_m7 + k04_r_r2*k06_r_r2*k08_r_r2*k11_r_r2*m_m7 + k02_r_r2*k04_r_r2*k09_r_r2*k12_r_r2*m_m10 + k02_r_r2*k05_r_r2*k08_r_r2*k12_r_r2*m_m10 + k04_r_r2*k06_r_r2*k09_r_r2*k11_r_r2*m_m7 + k02_r_r2*k04_r_r2*k10_r_r2*k12_r_r2*m_m10 + k02_r_r2*k05_r_r2*k09_r_r2*k12_r_r2*m_m10 + k03_r_r2*k05_r_r2*k08_r_r2*k12_r_r2*m_m10 + k02_r_r2*k05_r_r2*k10_r_r2*k12_r_r2*m_m10 + k03_r_r2*k05_r_r2*k09_r_r2*k12_r_r2*m_m10 + k03_r_r2*k05_r_r2*k10_r_r2*k12_r_r2*m_m10))^n_sub_r_r2 + 1)*(k02_r_r2*k04_r_r2*k08_r_r2*k10_r_r2 + k02_r_r2*k04_r_r2*k08_r_r2*k11_r_r2 + k02_r_r2*k05_r_r2*k08_r_r2*k10_r_r2 + k02_r_r2*k04_r_r2*k09_r_r2*k11_r_r2 + k02_r_r2*k05_r_r2*k08_r_r2*k11_r_r2 + k03_r_r2*k05_r_r2*k08_r_r2*k10_r_r2 + k02_r_r2*k05_r_r2*k09_r_r2*k11_r_r2 + k03_r_r2*k05_r_r2*k08_r_r2*k11_r_r2 + k03_r_r2*k05_r_r2*k09_r_r2*k11_r_r2 + k01_r_r2*k03_r_r2*k08_r_r2*k10_r_r2*m_m5 + k01_r_r2*k03_r_r2*k08_r_r2*k11_r_r2*m_m5 + k01_r_r2*k04_r_r2*k08_r_r2*k10_r_r2*m_m5 + k02_r_r2*k04_r_r2*k07_r_r2*k09_r_r2*m_m6 + k01_r_r2*k03_r_r2*k09_r_r2*k11_r_r2*m_m5 + k01_r_r2*k04_r_r2*k08_r_r2*k11_r_r2*m_m5 + k01_r_r2*k05_r_r2*k08_r_r2*k10_r_r2*m_m5 + k02_r_r2*k04_r_r2*k07_r_r2*k10_r_r2*m_m6 + k02_r_r2*k05_r_r2*k07_r_r2*k09_r_r2*m_m6 + k01_r_r2*k04_r_r2*k09_r_r2*k11_r_r2*m_m5 + k01_r_r2*k05_r_r2*k08_r_r2*k11_r_r2*m_m5 + k02_r_r2*k04_r_r2*k07_r_r2*k11_r_r2*m_m6 + k02_r_r2*k05_r_r2*k07_r_r2*k10_r_r2*m_m6 + k03_r_r2*k05_r_r2*k07_r_r2*k09_r_r2*m_m6 + k01_r_r2*k05_r_r2*k09_r_r2*k11_r_r2*m_m5 + k02_r_r2*k05_r_r2*k07_r_r2*k11_r_r2*m_m6 + k03_r_r2*k05_r_r2*k07_r_r2*k10_r_r2*m_m6 + k03_r_r2*k05_r_r2*k07_r_r2*k11_r_r2*m_m6 + k02_r_r2*k06_r_r2*k08_r_r2*k10_r_r2*m_m7 + k02_r_r2*k06_r_r2*k08_r_r2*k11_r_r2*m_m7 + k03_r_r2*k06_r_r2*k08_r_r2*k10_r_r2*m_m7 + k02_r_r2*k06_r_r2*k09_r_r2*k11_r_r2*m_m7 + k03_r_r2*k06_r_r2*k08_r_r2*k11_r_r2*m_m7 + k04_r_r2*k06_r_r2*k08_r_r2*k10_r_r2*m_m7 + k02_r_r2*k04_r_r2*k08_r_r2*k12_r_r2*m_m10 + k03_r_r2*k06_r_r2*k09_r_r2*k11_r_r2*m_m7 + k04_r_r2*k06_r_r2*k08_r_r2*k11_r_r2*m_m7 + k02_r_r2*k04_r_r2*k09_r_r2*k12_r_r2*m_m10 + k02_r_r2*k05_r_r2*k08_r_r2*k12_r_r2*m_m10 + k04_r_r2*k06_r_r2*k09_r_r2*k11_r_r2*m_m7 + k02_r_r2*k04_r_r2*k10_r_r2*k12_r_r2*m_m10 + k02_r_r2*k05_r_r2*k09_r_r2*k12_r_r2*m_m10 + k03_r_r2*k05_r_r2*k08_r_r2*k12_r_r2*m_m10 + k02_r_r2*k05_r_r2*k10_r_r2*k12_r_r2*m_m10 + k03_r_r2*k05_r_r2*k09_r_r2*k12_r_r2*m_m10 + k03_r_r2*k05_r_r2*k10_r_r2*k12_r_r2*m_m10));  // modifiers: m_m6, m_m10
  r_r3: $m_m1 + m_m7 -> m_m8 + $m_m12; n_sub_r_r3*(k01_r_r3*k03_r_r3*k05_r_r3*k07_r_r3*k09_r_r3*m_m1*m_m7 - k02_r_r3*k04_r_r3*k06_r_r3*k08_r_r3*k10_r_r3*m_m8*m_m12)*(k12_r_r3*k14_r_r3*k16_r_r3*k19_r_r3 + k12_r_r3*k14_r_r3*k17_r_r3*k19_r_r3 + k12_r_r3*k15_r_r3*k17_r_r3*k19_r_r3 + k12_r_r3*k14_r_r3*k16_r_r3*k18_r_r3*m_m11 + k13_r_r3*k15_r_r3*k17_r_r3*k19_r_r3*m_m10)/((L_0_r_r3*(Keff_m_m5_r_r3/(Keff_m_m5_r_r3 + m_m5))^n_sub_r_r3*((Keff_m_m9_r_r3 + m_m9)/Keff_m_m9_r_r3)^n_sub_r_r3*((k02_r_r3*k04_r_r3*k06_r_r3*k09_r_r3 + k02_r_r3*k04_r_r3*k07_r_r3*k09_r_r3 + k02_r_r3*k05_r_r3*k07_r_r3*k09_r_r3 + k02_r_r3*k04_r_r3*k06_r_r3*k08_r_r3*m_m8 + k03_r_r3*k05_r_r3*k07_r_r3*k09_r_r3*m_m7)*(k12_r_r3*k14_r_r3*k16_r_r3*k19_r_r3 + k12_r_r3*k14_r_r3*k17_r_r3*k19_r_r3 + k12_r_r3*k15_r_r3*k17_r_r3*k19_r_r3 + k12_r_r3*k14_r_r3*k16_r_r3*k18_r_r3*m_m11 + k13_r_r3*k15_r_r3*k17_r_r3*k19_r_r3*m_m10)/(k02_r_r3*k04_r_r3*k06_r_r3*k09_r_r3*k12_r_r3*k14_r_r3*k16_r_r3*k19_r_r3 + k02_r_r3*k04_r_r3*k06_r_r3*k09_r_r3*k12_r_r3*k14_r_r3*k17_r_r3*k19_r_r3 + k02_r_r3*k04_r_r3*k07_r_r3*k09_r_r3*k12_r_r3*k14_r_r3*k16_r_r3*k19_r_r3 + k02_r_r3*k04_r_r3*k06_r_r3*k09_r_r3*k12_r_r3*k15_r_r3*k17_r_r3*k19_r_r3 + k02_r_r3*k04_r_r3*k07_r_r3*k09_r_r3*k12_r_r3*k14_r_r3*k17_r_r3*k19_r_r3 + k02_r_r3*k05_r_r3*k07_r_r3*k09_r_r3*k12_r_r3*k14_r_r3*k16_r_r3*k19_r_r3 + k02_r_r3*k04_r_r3*k07_r_r3*k09_r_r3*k12_r_r3*k15_r_r3*k17_r_r3*k19_r_r3 + k02_r_r3*k05_r_r3*k07_r_r3*k09_r_r3*k12_r_r3*k14_r_r3*k17_r_r3*k19_r_r3 + k02_r_r3*k05_r_r3*k07_r_r3*k09_r_r3*k12_r_r3*k15_r_r3*k17_r_r3*k19_r_r3 + k01_r_r3*k04_r_r3*k06_r_r3*k09_r_r3*k12_r_r3*k14_r_r3*k16_r_r3*k19_r_r3*m_m1 + k02_r_r3*k04_r_r3*k06_r_r3*k09_r_r3*k11_r_r3*k14_r_r3*k16_r_r3*k19_r_r3*m_m1 + k01_r_r3*k04_r_r3*k06_r_r3*k09_r_r3*k12_r_r3*k14_r_r3*k17_r_r3*k19_r_r3*m_m1 + k01_r_r3*k04_r_r3*k07_r_r3*k09_r_r3*k12_r_r3*k14_r_r3*k16_r_r3*k19_r_r3*m_m1 + k02_r_r3*k04_r_r3*k06_r_r3*k09_r_r3*k11_r_r3*k14_r_r3*k17_r_r3*k19_r_r3*m_m1 + k02_r_r3*k04_r_r3*k07_r_r3*k09_r_r3*k11_r_r3*k14_r_r3*k16_r_r3*k19_r_r3*m_m1 + k01_r_r3*k04_r_r3*k06_r_r3*k09_r_r3*k12_r_r3*k15_r_r3*k17_r_r3*k19_r_r3*m_m1 + k01_r_r3*k04_r_r3*k07_r_r3*k09_r_r3*k12_r_r3*k14_r_r3*k17_r_r3*k19_r_r3*m_m1 + k01_r_r3*k05_r_r3*k07_r_r3*k09_r_r3*k12_r_r3*k14_r_r3*k16_r_r3*k19_r_r3*m_m1 + k02_r_r3*k04_r_r3*k06_r_r3*k09_r_r3*k11_r_r3*k15_r_r3*k17_r_r3*k19_r_r3*m_m1 + k02_r_r3*k04_r_r3*k07_r_r3*k09_r_r3*k11_r_r3*k14_r_r3*k17_r_r3*k19_r_r3*m_m1 + k02_r_r3*k05_r_r3*k07_r_r3*k09_r_r3*k11_r_r3*k14_r_r3*k16_r_r3*k19_r_r3*m_m1 + k01_r_r3*k04_r_r3*k07_r_r3*k09_r_r3*k12_r_r3*k15_r_r3*k17_r_r3*k19_r_r3*m_m1 + k01_r_r3*k05_r_r3*k07_r_r3*k09_r_r3*k12_r_r3*k14_r_r3*k17_r_r3*k19_r_r3*m_m1 + k02_r_r3*k04_r_r3*k07_r_r3*k09_r_r3*k11_r_r3*k15_r_r3*k17_r_r3*k19_r_r3*m_m1 + k02_r_r3*k05_r_r3*k07_r_r3*k09_r_r3*k11_r_r3*k14_r_r3*k17_r_r3*k19_r_r3*m_m1 + k01_r_r3*k05_r_r3*k07_r_r3*k09_r_r3*k12_r_r3*k15_r_r3*k17_r_r3*k19_r_r3*m_m1 + k02_r_r3*k05_r_r3*k07_r_r3*k09_r_r3*k11_r_r3*k15_r_r3*k17_r_r3*k19_r_r3*m_m1 + k02_r_r3*k04_r_r3*k06_r_r3*k08_r_r3*k12_r_r3*k14_r_r3*k16_r_r3*k19_r_r3*m_m8 + k02_r_r3*k04_r_r3*k06_r_r3*k08_r_r3*k12_r_r3*k14_r_r3*k17_r_r3*k19_r_r3*m_m8 + k02_r_r3*k04_r_r3*k06_r_r3*k08_r_r3*k12_r_r3*k15_r_r3*k17_r_r3*k19_r_r3*m_m8 + k02_r_r3*k04_r_r3*k06_r_r3*k09_r_r3*k12_r_r3*k14_r_r3*k16_r_r3*k18_r_r3*m_m11 + k03_r_r3*k05_r_r3*k07_r_r3*k09_r_r3*k12_r_r3*k14_r_r3*k16_r_r3*k19_r_r3*m_m7 + k02_r_r3*k04_r_r3*k07_r_r3*k09_r_r3*k12_r_r3*k14_r_r3*k16_r_r3*k18_r_r3*m_m11 + k03_r_r3*k05_r_r3*k07_r_r3*k09_r_r3*k12_r_r3*k14_r_r3*k17_r_r3*k19_r_r3*m_m7 + k02_r_r3*k05_r_r3*k07_r_r3*k09_r_r3*k12_r_r3*k14_r_r3*k16_r_r3*k18_r_r3*m_m11 + k03_r_r3*k05_r_r3*k07_r_r3*k09_r_r3*k12_r_r3*k15_r_r3*k17_r_r3*k19_r_r3*m_m7 + k02_r_r3*k04_r_r3*k06_r_r3*k09_r_r3*k12_r_r3*k14_r_r3*k16_r_r3*k20_r_r3*m_m12 + k02_r_r3*k04_r_r3*k06_r_r3*k09_r_r3*k13_r_r3*k15_r_r3*k17_r_r3*k19_r_r3*m_m10 + k02_r_r3*k04_r_r3*k06_r_r3*k10_r_r3*k12_r_r3*k14_r_r3*k16_r_r3*k19_r_r3*m_m12 + k02_r_r3*k04_r_r3*k06_r_r3*k09_r_r3*k12_r_r3*k14_r_r3*k17_r_r3*k20_r_r3*m_m12 + k02_r_r3*k04_r_r3*k06_r_r3*k10_r_r3*k12_r_r3*k14_r_r3*k17_r_r3*k19_r_r3*m_m12 + k02_r_r3*k04_r_r3*k07_r_r3*k09_r_r3*k12_r_r3*k14_r_r3*k16_r_r3*k20_r_r3*m_m12 + k02_r_r3*k04_r_r3*k07_r_r3*k09_r_r3*k13_r_r3*k15_r_r3*k17_r_r3*k19_r_r3*m_m10 + k02_r_r3*k04_r_r3*k07_r_r3*k10_r_r3*k12_r_r3*k14_r_r3*k16_r_r3*k19_r_r3*m_m12 + k02_r_r3*k04_r_r3*k06_r_r3*k09_r_r3*k12_r_r3*k15_r_r3*k17_r_r3*k20_r_r3*m_m12 + k02_r_r3*k04_r_r3*k06_r_r3*k10_r_r3*k12_r_r3*k15_r_r3*k17_r_r3*k19_r_r3*m_m12 + k02_r_r3*k04_r_r3*k07_r_r3*k09_r_r3*k12_r_r3*k14_r_r3*k17_r_r3*k20_r_r3*m_m12 + k02_r_r3*k04_r_r3*k07_r_r3*k10_r_r3*k12_r_r3*k14_r_r3*k17_r_r3*k19_r_r3*m_m12 + k02_r_r3*k05_r_r3*k07_r_r3*k09_r_r3*k12_r_r3*k14_r_r3*k16_r_r3*k20_r_r3*m_m12 + k02_r_r3*k05_r_r3*k07_r_r3*k09_r_r3*k13_r_r3*k15_r_r3*k17_r_r3*k19_r_r3*m_m10 + k02_r_r3*k05_r_r3*k07_r_r3*k10_r_r3*k12_r_r3*k14_r_r3*k16_r_r3*k19_r_r3*m_m12 + k02_r_r3*k04_r_r3*k07_r_r3*k09_r_r3*k12_r_r3*k15_r_r3*k17_r_r3*k20_r_r3*m_m12 + k02_r_r3*k04_r_r3*k07_r_r3*k10_r_r3*k12_r_r3*k15_r_r3*k17_r_r3*k19_r_r3*m_m12 + k02_r_r3*k05_r_r3*k07_r_r3*k09_r_r3*k12_r_r3*k14_r_r3*k17_r_r3*k20_r_r3*m_m12 + k02_r_r3*k05_r_r3*k07_r_r3*k10_r_r3*k12_r_r3*k14_r_r3*k17_r_r3*k19_r_r3*m_m12 + k02_r_r3*k05_r_r3*k07_r_r3*k09_r_r3*k12_r_r3*k15_r_r3*k17_r_r3*k20_r_r3*m_m12 + k02_r_r3*k05_r_r3*k07_r_r3*k10_r_r3*k12_r_r3*k15_r_r3*k17_r_r3*k19_r_r3*m_m12 + k01_r_r3*k03_r_r3*k05_r_r3*k07_r_r3*k12_r_r3*k14_r_r3*k16_r_r3*k19_r_r3*m_m1*m_m7 + k01_r_r3*k03_r_r3*k05_r_r3*k07_r_r3*k12_r_r3*k14_r_r3*k17_r_r3*k19_r_r3*m_m1*m_m7 + k01_r_r3*k03_r_r3*k05_r_r3*k07_r_r3*k12_r_r3*k15_r_r3*k17_r_r3*k19_r_r3*m_m1*m_m7 + k01_r_r3*k03_r_r3*k05_r_r3*k09_r_r3*k12_r_r3*k14_r_r3*k16_r_r3*k19_r_r3*m_m1*m_m7 + k01_r_r3*k03_r_r3*k05_r_r3*k09_r_r3*k12_r_r3*k14_r_r3*k17_r_r3*k19_r_r3*m_m1*m_m7 + k01_r_r3*k03_r_r3*k06_r_r3*k09_r_r3*k12_r_r3*k14_r_r3*k16_r_r3*k19_r_r3*m_m1*m_m7 + k02_r_r3*k04_r_r3*k06_r_r3*k09_r_r3*k11_r_r3*k13_r_r3*k15_r_r3*k17_r_r3*m_m1*m_m10 + k01_r_r3*k03_r_r3*k05_r_r3*k09_r_r3*k12_r_r3*k15_r_r3*k17_r_r3*k19_r_r3*m_m1*m_m7 + k01_r_r3*k03_r_r3*k06_r_r3*k09_r_r3*k12_r_r3*k14_r_r3*k17_r_r3*k19_r_r3*m_m1*m_m7 + k01_r_r3*k03_r_r3*k07_r_r3*k09_r_r3*k12_r_r3*k14_r_r3*k16_r_r3*k19_r_r3*m_m1*m_m7 + k01_r_r3*k04_r_r3*k06_r_r3*k08_r_r3*k12_r_r3*k14_r_r3*k16_r_r3*k19_r_r3*m_m1*m_m8 + k02_r_r3*k04_r_r3*k06_r_r3*k08_r_r3*k11_r_r3*k14_r_r3*k16_r_r3*k19_r_r3*m_m1*m_m8 + k02_r_r3*k04_r_r3*k07_r_r3*k09_r_r3*k11_r_r3*k13_r_r3*k15_r_r3*k17_r_r3*m_m1*m_m10 + k01_r_r3*k03_r_r3*k06_r_r3*k09_r_r3*k12_r_r3*k15_r_r3*k17_r_r3*k19_r_r3*m_m1*m_m7 + k01_r_r3*k03_r_r3*k07_r_r3*k09_r_r3*k12_r_r3*k14_r_r3*k17_r_r3*k19_r_r3*m_m1*m_m7 + k01_r_r3*k04_r_r3*k06_r_r3*k08_r_r3*k12_r_r3*k14_r_r3*k17_r_r3*k19_r_r3*m_m1*m_m8 + k02_r_r3*k04_r_r3*k06_r_r3*k08_r_r3*k11_r_r3*k14_r_r3*k17_r_r3*k19_r_r3*m_m1*m_m8 + k02_r_r3*k04_r_r3*k06_r_r3*k09_r_r3*k11_r_r3*k13_r_r3*k15_r_r3*k19_r_r3*m_m1*m_m10 + k02_r_r3*k05_r_r3*k07_r_r3*k09_r_r3*k11_r_r3*k13_r_r3*k15_r_r3*k17_r_r3*m_m1*m_m10 + k01_r_r3*k03_r_r3*k07_r_r3*k09_r_r3*k12_r_r3*k15_r_r3*k17_r_r3*k19_r_r3*m_m1*m_m7 + k01_r_r3*k04_r_r3*k06_r_r3*k08_r_r3*k12_r_r3*k15_r_r3*k17_r_r3*k19_r_r3*m_m1*m_m8 + k02_r_r3*k04_r_r3*k06_r_r3*k08_r_r3*k11_r_r3*k15_r_r3*k17_r_r3*k19_r_r3*m_m1*m_m8 + k02_r_r3*k04_r_r3*k06_r_r3*k09_r_r3*k11_r_r3*k13_r_r3*k16_r_r3*k19_r_r3*m_m1*m_m10 + k02_r_r3*k04_r_r3*k07_r_r3*k09_r_r3*k11_r_r3*k13_r_r3*k15_r_r3*k19_r_r3*m_m1*m_m10 + k01_r_r3*k04_r_r3*k06_r_r3*k09_r_r3*k12_r_r3*k14_r_r3*k16_r_r3*k18_r_r3*m_m1*m_m11 + k02_r_r3*k04_r_r3*k06_r_r3*k09_r_r3*k11_r_r3*k13_r_r3*k17_r_r3*k19_r_r3*m_m1*m_m10 + k02_r_r3*k04_r_r3*k06_r_r3*k09_r_r3*k11_r_r3*k14_r_r3*k16_r_r3*k18_r_r3*m_m1*m_m11 + k02_r_r3*k04_r_r3*k07_r_r3*k09_r_r3*k11_r_r3*k13_r_r3*k16_r_r3*k19_r_r3*m_m1*m_m10 + k02_r_r3*k05_r_r3*k07_r_r3*k09_r_r3*k11_r_r3*k13_r_r3*k15_r_r3*k19_r_r3*m_m1*m_m10 + k03_r_r3*k05_r_r3*k07_r_r3*k09_r_r3*k11_r_r3*k14_r_r3*k16_r_r3*k19_r_r3*m_m1*m_m7 + k01_r_r3*k04_r_r3*k07_r_r3*k09_r_r3*k12_r_r3*k14_r_r3*k16_r_r3*k18_r_r3*m_m1*m_m11 + k02_r_r3*k04_r_r3*k07_r_r3*k09_r_r3*k11_r_r3*k13_r_r3*k17_r_r3*k19_r_r3*m_m1*m_m10 + k02_r_r3*k04_r_r3*k07_r_r3*k09_r_r3*k11_r_r3*k14_r_r3*k16_r_r3*k18_r_r3*m_m1*m_m11 + k02_r_r3*k05_r_r3*k07_r_r3*k09_r_r3*k11_r_r3*k13_r_r3*k16_r_r3*k19_r_r3*m_m1*m_m10 + k03_r_r3*k05_r_r3*k07_r_r3*k09_r_r3*k11_r_r3*k14_r_r3*k17_r_r3*k19_r_r3*m_m1*m_m7 + k01_r_r3*k05_r_r3*k07_r_r3*k09_r_r3*k12_r_r3*k14_r_r3*k16_r_r3*k18_r_r3*m_m1*m_m11 + k02_r_r3*k05_r_r3*k07_r_r3*k09_r_r3*k11_r_r3*k13_r_r3*k17_r_r3*k19_r_r3*m_m1*m_m10 + k02_r_r3*k05_r_r3*k07_r_r3*k09_r_r3*k11_r_r3*k14_r_r3*k16_r_r3*k18_r_r3*m_m1*m_m11 + k03_r_r3*k05_r_r3*k07_r_r3*k09_r_r3*k11_r_r3*k15_r_r3*k17_r_r3*k19_r_r3*m_m1*m_m7 + k01_r_r3*k04_r_r3*k06_r_r3*k09_r_r3*k13_r_r3*k15_r_r3*k17_r_r3*k19_r_r3*m_m1*m_m10 + k01_r_r3*k04_r_r3*k07_r_r3*k09_r_r3*k13_r_r3*k15_r_r3*k17_r_r3*k19_r_r3*m_m1*m_m10 + k01_r_r3*k05_r_r3*k07_r_r3*k09_r_r3*k13_r_r3*k15_r_r3*k17_r_r3*k19_r_r3*m_m1*m_m10 + k02_r_r3*k04_r_r3*k06_r_r3*k08_r_r3*k12_r_r3*k14_r_r3*k16_r_r3*k18_r_r3*m_m8*m_m11 + k02_r_r3*k04_r_r3*k06_r_r3*k08_r_r3*k12_r_r3*k14_r_r3*k16_r_r3*k20_r_r3*m_m8*m_m12 + k02_r_r3*k04_r_r3*k06_r_r3*k08_r_r3*k13_r_r3*k15_r_r3*k17_r_r3*k19_r_r3*m_m8*m_m10 + k03_r_r3*k05_r_r3*k07_r_r3*k09_r_r3*k12_r_r3*k14_r_r3*k16_r_r3*k18_r_r3*m_m7*m_m11 + k02_r_r3*k04_r_r3*k06_r_r3*k08_r_r3*k12_r_r3*k14_r_r3*k17_r_r3*k20_r_r3*m_m8*m_m12 + k02_r_r3*k04_r_r3*k06_r_r3*k08_r_r3*k12_r_r3*k15_r_r3*k17_r_r3*k20_r_r3*m_m8*m_m12 + k02_r_r3*k04_r_r3*k06_r_r3*k10_r_r3*k12_r_r3*k14_r_r3*k16_r_r3*k18_r_r3*m_m11*m_m12 + k02_r_r3*k04_r_r3*k08_r_r3*k10_r_r3*k12_r_r3*k14_r_r3*k16_r_r3*k19_r_r3*m_m8*m_m12 + k03_r_r3*k05_r_r3*k07_r_r3*k09_r_r3*k12_r_r3*k14_r_r3*k16_r_r3*k20_r_r3*m_m7*m_m12 + k03_r_r3*k05_r_r3*k07_r_r3*k09_r_r3*k13_r_r3*k15_r_r3*k17_r_r3*k19_r_r3*m_m7*m_m10 + k03_r_r3*k05_r_r3*k07_r_r3*k10_r_r3*k12_r_r3*k14_r_r3*k16_r_r3*k19_r_r3*m_m7*m_m12 + k02_r_r3*k04_r_r3*k07_r_r3*k10_r_r3*k12_r_r3*k14_r_r3*k16_r_r3*k18_r_r3*m_m11*m_m12 + k02_r_r3*k04_r_r3*k08_r_r3*k10_r_r3*k12_r_r3*k14_r_r3*k17_r_r3*k19_r_r3*m_m8*m_m12 + k02_r_r3*k05_r_r3*k08_r_r3*k10_r_r3*k12_r_r3*k14_r_r3*k16_r_r3*k19_r_r3*m_m8*m_m12 + k03_r_r3*k05_r_r3*k07_r_r3*k09_r_r3*k12_r_r3*k14_r_r3*k17_r_r3*k20_r_r3*m_m7*m_m12 + k03_r_r3*k05_r_r3*k07_r_r3*k10_r_r3*k12_r_r3*k14_r_r3*k17_r_r3*k19_r_r3*m_m7*m_m12 + k02_r_r3*k04_r_r3*k08_r_r3*k10_r_r3*k12_r_r3*k15_r_r3*k17_r_r3*k19_r_r3*m_m8*m_m12 + k02_r_r3*k05_r_r3*k07_r_r3*k10_r_r3*k12_r_r3*k14_r_r3*k16_r_r3*k18_r_r3*m_m11*m_m12 + k02_r_r3*k05_r_r3*k08_r_r3*k10_r_r3*k12_r_r3*k14_r_r3*k17_r_r3*k19_r_r3*m_m8*m_m12 + k02_r_r3*k06_r_r3*k08_r_r3*k10_r_r3*k12_r_r3*k14_r_r3*k16_r_r3*k19_r_r3*m_m8*m_m12 + k03_r_r3*k05_r_r3*k07_r_r3*k09_r_r3*k12_r_r3*k15_r_r3*k17_r_r3*k20_r_r3*m_m7*m_m12 + k03_r_r3*k05_r_r3*k07_r_r3*k10_r_r3*k12_r_r3*k15_r_r3*k17_r_r3*k19_r_r3*m_m7*m_m12 + k02_r_r3*k04_r_r3*k06_r_r3*k09_r_r3*k12_r_r3*k14_r_r3*k18_r_r3*k20_r_r3*m_m11*m_m12 + k02_r_r3*k04_r_r3*k06_r_r3*k09_r_r3*k13_r_r3*k15_r_r3*k17_r_r3*k20_r_r3*m_m10*m_m12 + k02_r_r3*k04_r_r3*k06_r_r3*k10_r_r3*k13_r_r3*k15_r_r3*k17_r_r3*k19_r_r3*m_m10*m_m12 + k02_r_r3*k05_r_r3*k08_r_r3*k10_r_r3*k12_r_r3*k15_r_r3*k17_r_r3*k19_r_r3*m_m8*m_m12 + k02_r_r3*k06_r_r3*k08_r_r3*k10_r_r3*k12_r_r3*k14_r_r3*k17_r_r3*k19_r_r3*m_m8*m_m12 + k02_r_r3*k04_r_r3*k06_r_r3*k09_r_r3*k12_r_r3*k15_r_r3*k18_r_r3*k20_r_r3*m_m11*m_m12 + k02_r_r3*k04_r_r3*k07_r_r3*k09_r_r3*k12_r_r3*k14_r_r3*k18_r_r3*k20_r_r3*m_m11*m_m12 + k02_r_r3*k04_r_r3*k07_r_r3*k09_r_r3*k13_r_r3*k15_r_r3*k17_r_r3*k20_r_r3*m_m10*m_m12 + k02_r_r3*k04_r_r3*k07_r_r3*k10_r_r3*k13_r_r3*k15_r_r3*k17_r_r3*k19_r_r3*m_m10*m_m12 + k02_r_r3*k06_r_r3*k08_r_r3*k10_r_r3*k12_r_r3*k15_r_r3*k17_r_r3*k19_r_r3*m_m8*m_m12 + k04_r_r3*k06_r_r3*k08_r_r3*k10_r_r3*k12_r_r3*k14_r_r3*k16_r_r3*k19_r_r3*m_m8*m_m12 + k02_r_r3*k04_r_r3*k06_r_r3*k09_r_r3*k12_r_r3*k16_r_r3*k18_r_r3*k20_r_r3*m_m11*m_m12 + k02_r_r3*k04_r_r3*k07_r_r3*k09_r_r3*k12_r_r3*k15_r_r3*k18_r_r3*k20_r_r3*m_m11*m_m12 + k02_r_r3*k05_r_r3*k07_r_r3*k09_r_r3*k12_r_r3*k14_r_r3*k18_r_r3*k20_r_r3*m_m11*m_m12 + k02_r_r3*k05_r_r3*k07_r_r3*k09_r_r3*k13_r_r3*k15_r_r3*k17_r_r3*k20_r_r3*m_m10*m_m12 + k02_r_r3*k05_r_r3*k07_r_r3*k10_r_r3*k13_r_r3*k15_r_r3*k17_r_r3*k19_r_r3*m_m10*m_m12 + k04_r_r3*k06_r_r3*k08_r_r3*k10_r_r3*k12_r_r3*k14_r_r3*k17_r_r3*k19_r_r3*m_m8*m_m12 + k02_r_r3*k04_r_r3*k07_r_r3*k09_r_r3*k12_r_r3*k16_r_r3*k18_r_r3*k20_r_r3*m_m11*m_m12 + k02_r_r3*k05_r_r3*k07_r_r3*k09_r_r3*k12_r_r3*k15_r_r3*k18_r_r3*k20_r_r3*m_m11*m_m12 + k04_r_r3*k06_r_r3*k08_r_r3*k10_r_r3*k12_r_r3*k15_r_r3*k17_r_r3*k19_r_r3*m_m8*m_m12 + k02_r_r3*k04_r_r3*k06_r_r3*k09_r_r3*k14_r_r3*k16_r_r3*k18_r_r3*k20_r_r3*m_m11*m_m12 + k02_r_r3*k05_r_r3*k07_r_r3*k09_r_r3*k12_r_r3*k16_r_r3*k18_r_r3*k20_r_r3*m_m11*m_m12 + k02_r_r3*k04_r_r3*k07_r_r3*k09_r_r3*k14_r_r3*k16_r_r3*k18_r_r3*k20_r_r3*m_m11*m_m12 + k02_r_r3*k05_r_r3*k07_r_r3*k09_r_r3*k14_r_r3*k16_r_r3*k18_r_r3*k20_r_r3*m_m11*m_m12 + k01_r_r3*k03_r_r3*k05_r_r3*k08_r_r3*k12_r_r3*k14_r_r3*k16_r_r3*k19_r_r3*m_m1*m_m7*m_m8 + k01_r_r3*k03_r_r3*k05_r_r3*k07_r_r3*k12_r_r3*k14_r_r3*k16_r_r3*k18_r_r3*m_m1*m_m7*m_m11 + k01_r_r3*k03_r_r3*k05_r_r3*k08_r_r3*k12_r_r3*k14_r_r3*k17_r_r3*k19_r_r3*m_m1*m_m7*m_m8 + k01_r_r3*k03_r_r3*k06_r_r3*k08_r_r3*k12_r_r3*k14_r_r3*k16_r_r3*k19_r_r3*m_m1*m_m7*m_m8 + k02_r_r3*k04_r_r3*k06_r_r3*k08_r_r3*k11_r_r3*k13_r_r3*k15_r_r3*k17_r_r3*m_m1*m_m8*m_m10 + k01_r_r3*k03_r_r3*k05_r_r3*k08_r_r3*k12_r_r3*k15_r_r3*k17_r_r3*k19_r_r3*m_m1*m_m7*m_m8 + k01_r_r3*k03_r_r3*k06_r_r3*k08_r_r3*k12_r_r3*k14_r_r3*k17_r_r3*k19_r_r3*m_m1*m_m7*m_m8 + k01_r_r3*k03_r_r3*k05_r_r3*k09_r_r3*k12_r_r3*k14_r_r3*k16_r_r3*k18_r_r3*m_m1*m_m7*m_m11 + k01_r_r3*k03_r_r3*k06_r_r3*k08_r_r3*k12_r_r3*k15_r_r3*k17_r_r3*k19_r_r3*m_m1*m_m7*m_m8 + k02_r_r3*k04_r_r3*k06_r_r3*k08_r_r3*k11_r_r3*k13_r_r3*k15_r_r3*k19_r_r3*m_m1*m_m8*m_m10 + k01_r_r3*k03_r_r3*k05_r_r3*k07_r_r3*k13_r_r3*k15_r_r3*k17_r_r3*k19_r_r3*m_m1*m_m7*m_m10 + k01_r_r3*k03_r_r3*k06_r_r3*k09_r_r3*k12_r_r3*k14_r_r3*k16_r_r3*k18_r_r3*m_m1*m_m7*m_m11 + k02_r_r3*k04_r_r3*k06_r_r3*k08_r_r3*k11_r_r3*k13_r_r3*k16_r_r3*k19_r_r3*m_m1*m_m8*m_m10 + k03_r_r3*k05_r_r3*k07_r_r3*k09_r_r3*k11_r_r3*k13_r_r3*k15_r_r3*k17_r_r3*m_m1*m_m7*m_m10 + k01_r_r3*k03_r_r3*k07_r_r3*k09_r_r3*k12_r_r3*k14_r_r3*k16_r_r3*k18_r_r3*m_m1*m_m7*m_m11 + k01_r_r3*k04_r_r3*k06_r_r3*k08_r_r3*k12_r_r3*k14_r_r3*k16_r_r3*k18_r_r3*m_m1*m_m8*m_m11 + k02_r_r3*k04_r_r3*k06_r_r3*k08_r_r3*k11_r_r3*k13_r_r3*k17_r_r3*k19_r_r3*m_m1*m_m8*m_m10 + k02_r_r3*k04_r_r3*k06_r_r3*k08_r_r3*k11_r_r3*k14_r_r3*k16_r_r3*k18_r_r3*m_m1*m_m8*m_m11 + k01_r_r3*k03_r_r3*k05_r_r3*k09_r_r3*k13_r_r3*k15_r_r3*k17_r_r3*k19_r_r3*m_m1*m_m7*m_m10 + k02_r_r3*k04_r_r3*k06_r_r3*k09_r_r3*k11_r_r3*k13_r_r3*k15_r_r3*k18_r_r3*m_m1*m_m10*m_m11 + k03_r_r3*k05_r_r3*k07_r_r3*k09_r_r3*k11_r_r3*k13_r_r3*k15_r_r3*k19_r_r3*m_m1*m_m7*m_m10 + k01_r_r3*k03_r_r3*k06_r_r3*k09_r_r3*k13_r_r3*k15_r_r3*k17_r_r3*k19_r_r3*m_m1*m_m7*m_m10 + k02_r_r3*k04_r_r3*k06_r_r3*k09_r_r3*k11_r_r3*k13_r_r3*k16_r_r3*k18_r_r3*m_m1*m_m10*m_m11 + k02_r_r3*k04_r_r3*k07_r_r3*k09_r_r3*k11_r_r3*k13_r_r3*k15_r_r3*k18_r_r3*m_m1*m_m10*m_m11 + k03_r_r3*k05_r_r3*k07_r_r3*k09_r_r3*k11_r_r3*k13_r_r3*k16_r_r3*k19_r_r3*m_m1*m_m7*m_m10 + k01_r_r3*k03_r_r3*k07_r_r3*k09_r_r3*k13_r_r3*k15_r_r3*k17_r_r3*k19_r_r3*m_m1*m_m7*m_m10 + k01_r_r3*k04_r_r3*k06_r_r3*k08_r_r3*k13_r_r3*k15_r_r3*k17_r_r3*k19_r_r3*m_m1*m_m8*m_m10 + k02_r_r3*k04_r_r3*k07_r_r3*k09_r_r3*k11_r_r3*k13_r_r3*k16_r_r3*k18_r_r3*m_m1*m_m10*m_m11 + k02_r_r3*k05_r_r3*k07_r_r3*k09_r_r3*k11_r_r3*k13_r_r3*k15_r_r3*k18_r_r3*m_m1*m_m10*m_m11 + k03_r_r3*k05_r_r3*k07_r_r3*k09_r_r3*k11_r_r3*k13_r_r3*k17_r_r3*k19_r_r3*m_m1*m_m7*m_m10 + k03_r_r3*k05_r_r3*k07_r_r3*k09_r_r3*k11_r_r3*k14_r_r3*k16_r_r3*k18_r_r3*m_m1*m_m7*m_m11 + k02_r_r3*k05_r_r3*k07_r_r3*k09_r_r3*k11_r_r3*k13_r_r3*k16_r_r3*k18_r_r3*m_m1*m_m10*m_m11 + k03_r_r3*k05_r_r3*k08_r_r3*k10_r_r3*k12_r_r3*k14_r_r3*k16_r_r3*k19_r_r3*m_m7*m_m8*m_m12 + k02_r_r3*k04_r_r3*k06_r_r3*k08_r_r3*k12_r_r3*k14_r_r3*k18_r_r3*k20_r_r3*m_m8*m_m11*m_m12 + k02_r_r3*k04_r_r3*k06_r_r3*k08_r_r3*k13_r_r3*k15_r_r3*k17_r_r3*k20_r_r3*m_m8*m_m10*m_m12 + k02_r_r3*k04_r_r3*k08_r_r3*k10_r_r3*k12_r_r3*k14_r_r3*k16_r_r3*k18_r_r3*m_m8*m_m11*m_m12 + k03_r_r3*k05_r_r3*k07_r_r3*k10_r_r3*k12_r_r3*k14_r_r3*k16_r_r3*k18_r_r3*m_m7*m_m11*m_m12 + k03_r_r3*k05_r_r3*k08_r_r3*k10_r_r3*k12_r_r3*k14_r_r3*k17_r_r3*k19_r_r3*m_m7*m_m8*m_m12 + k03_r_r3*k06_r_r3*k08_r_r3*k10_r_r3*k12_r_r3*k14_r_r3*k16_r_r3*k19_r_r3*m_m7*m_m8*m_m12 + k02_r_r3*k04_r_r3*k06_r_r3*k08_r_r3*k12_r_r3*k15_r_r3*k18_r_r3*k20_r_r3*m_m8*m_m11*m_m12 + k02_r_r3*k05_r_r3*k08_r_r3*k10_r_r3*k12_r_r3*k14_r_r3*k16_r_r3*k18_r_r3*m_m8*m_m11*m_m12 + k03_r_r3*k05_r_r3*k08_r_r3*k10_r_r3*k12_r_r3*k15_r_r3*k17_r_r3*k19_r_r3*m_m7*m_m8*m_m12 + k03_r_r3*k06_r_r3*k08_r_r3*k10_r_r3*k12_r_r3*k14_r_r3*k17_r_r3*k19_r_r3*m_m7*m_m8*m_m12 + k02_r_r3*k04_r_r3*k06_r_r3*k08_r_r3*k12_r_r3*k16_r_r3*k18_r_r3*k20_r_r3*m_m8*m_m11*m_m12 + k02_r_r3*k06_r_r3*k08_r_r3*k10_r_r3*k12_r_r3*k14_r_r3*k16_r_r3*k18_r_r3*m_m8*m_m11*m_m12 + k03_r_r3*k06_r_r3*k08_r_r3*k10_r_r3*k12_r_r3*k15_r_r3*k17_r_r3*k19_r_r3*m_m7*m_m8*m_m12 + k02_r_r3*k04_r_r3*k08_r_r3*k10_r_r3*k13_r_r3*k15_r_r3*k17_r_r3*k19_r_r3*m_m8*m_m10*m_m12 + k03_r_r3*k05_r_r3*k07_r_r3*k09_r_r3*k12_r_r3*k14_r_r3*k18_r_r3*k20_r_r3*m_m7*m_m11*m_m12 + k03_r_r3*k05_r_r3*k07_r_r3*k09_r_r3*k13_r_r3*k15_r_r3*k17_r_r3*k20_r_r3*m_m7*m_m10*m_m12 + k03_r_r3*k05_r_r3*k07_r_r3*k10_r_r3*k13_r_r3*k15_r_r3*k17_r_r3*k19_r_r3*m_m7*m_m10*m_m12 + k02_r_r3*k04_r_r3*k06_r_r3*k08_r_r3*k14_r_r3*k16_r_r3*k18_r_r3*k20_r_r3*m_m8*m_m11*m_m12 + k02_r_r3*k05_r_r3*k08_r_r3*k10_r_r3*k13_r_r3*k15_r_r3*k17_r_r3*k19_r_r3*m_m8*m_m10*m_m12 + k03_r_r3*k05_r_r3*k07_r_r3*k09_r_r3*k12_r_r3*k15_r_r3*k18_r_r3*k20_r_r3*m_m7*m_m11*m_m12 + k04_r_r3*k06_r_r3*k08_r_r3*k10_r_r3*k12_r_r3*k14_r_r3*k16_r_r3*k18_r_r3*m_m8*m_m11*m_m12 + k02_r_r3*k04_r_r3*k06_r_r3*k09_r_r3*k13_r_r3*k15_r_r3*k18_r_r3*k20_r_r3*m_m10*m_m11*m_m12 + k02_r_r3*k06_r_r3*k08_r_r3*k10_r_r3*k13_r_r3*k15_r_r3*k17_r_r3*k19_r_r3*m_m8*m_m10*m_m12 + k03_r_r3*k05_r_r3*k07_r_r3*k09_r_r3*k12_r_r3*k16_r_r3*k18_r_r3*k20_r_r3*m_m7*m_m11*m_m12 + k02_r_r3*k04_r_r3*k06_r_r3*k09_r_r3*k13_r_r3*k16_r_r3*k18_r_r3*k20_r_r3*m_m10*m_m11*m_m12 + k02_r_r3*k04_r_r3*k07_r_r3*k09_r_r3*k13_r_r3*k15_r_r3*k18_r_r3*k20_r_r3*m_m10*m_m11*m_m12 + k02_r_r3*k04_r_r3*k07_r_r3*k09_r_r3*k13_r_r3*k16_r_r3*k18_r_r3*k20_r_r3*m_m10*m_m11*m_m12 + k02_r_r3*k05_r_r3*k07_r_r3*k09_r_r3*k13_r_r3*k15_r_r3*k18_r_r3*k20_r_r3*m_m10*m_m11*m_m12 + k03_r_r3*k05_r_r3*k07_r_r3*k09_r_r3*k14_r_r3*k16_r_r3*k18_r_r3*k20_r_r3*m_m7*m_m11*m_m12 + k04_r_r3*k06_r_r3*k08_r_r3*k10_r_r3*k13_r_r3*k15_r_r3*k17_r_r3*k19_r_r3*m_m8*m_m10*m_m12 + k02_r_r3*k05_r_r3*k07_r_r3*k09_r_r3*k13_r_r3*k16_r_r3*k18_r_r3*k20_r_r3*m_m10*m_m11*m_m12 + k01_r_r3*k03_r_r3*k05_r_r3*k08_r_r3*k12_r_r3*k14_r_r3*k16_r_r3*k18_r_r3*m_m1*m_m7*m_m8*m_m11 + k01_r_r3*k03_r_r3*k06_r_r3*k08_r_r3*k12_r_r3*k14_r_r3*k16_r_r3*k18_r_r3*m_m1*m_m7*m_m8*m_m11 + k01_r_r3*k03_r_r3*k05_r_r3*k08_r_r3*k13_r_r3*k15_r_r3*k17_r_r3*k19_r_r3*m_m1*m_m7*m_m8*m_m10 + k02_r_r3*k04_r_r3*k06_r_r3*k08_r_r3*k11_r_r3*k13_r_r3*k15_r_r3*k18_r_r3*m_m1*m_m8*m_m10*m_m11 + k01_r_r3*k03_r_r3*k06_r_r3*k08_r_r3*k13_r_r3*k15_r_r3*k17_r_r3*k19_r_r3*m_m1*m_m7*m_m8*m_m10 + k02_r_r3*k04_r_r3*k06_r_r3*k08_r_r3*k11_r_r3*k13_r_r3*k16_r_r3*k18_r_r3*m_m1*m_m8*m_m10*m_m11 + k03_r_r3*k05_r_r3*k07_r_r3*k09_r_r3*k11_r_r3*k13_r_r3*k15_r_r3*k18_r_r3*m_m1*m_m7*m_m10*m_m11 + k03_r_r3*k05_r_r3*k07_r_r3*k09_r_r3*k11_r_r3*k13_r_r3*k16_r_r3*k18_r_r3*m_m1*m_m7*m_m10*m_m11 + k03_r_r3*k05_r_r3*k08_r_r3*k10_r_r3*k12_r_r3*k14_r_r3*k16_r_r3*k18_r_r3*m_m7*m_m8*m_m11*m_m12 + k03_r_r3*k06_r_r3*k08_r_r3*k10_r_r3*k12_r_r3*k14_r_r3*k16_r_r3*k18_r_r3*m_m7*m_m8*m_m11*m_m12 + k02_r_r3*k04_r_r3*k06_r_r3*k08_r_r3*k13_r_r3*k15_r_r3*k18_r_r3*k20_r_r3*m_m8*m_m10*m_m11*m_m12 + k03_r_r3*k05_r_r3*k08_r_r3*k10_r_r3*k13_r_r3*k15_r_r3*k17_r_r3*k19_r_r3*m_m7*m_m8*m_m10*m_m12 + k02_r_r3*k04_r_r3*k06_r_r3*k08_r_r3*k13_r_r3*k16_r_r3*k18_r_r3*k20_r_r3*m_m8*m_m10*m_m11*m_m12 + k03_r_r3*k06_r_r3*k08_r_r3*k10_r_r3*k13_r_r3*k15_r_r3*k17_r_r3*k19_r_r3*m_m7*m_m8*m_m10*m_m12 + k03_r_r3*k05_r_r3*k07_r_r3*k09_r_r3*k13_r_r3*k15_r_r3*k18_r_r3*k20_r_r3*m_m7*m_m10*m_m11*m_m12 + k03_r_r3*k05_r_r3*k07_r_r3*k09_r_r3*k13_r_r3*k16_r_r3*k18_r_r3*k20_r_r3*m_m7*m_m10*m_m11*m_m12))^n_sub_r_r3 + 1)*(k02_r_r3*k04_r_r3*k06_r_r3*k09_r_r3*k12_r_r3*k14_r_r3*k16_r_r3*k19_r_r3 + k02_r_r3*k04_r_r3*k06_r_r3*k09_r_r3*k12_r_r3*k14_r_r3*k17_r_r3*k19_r_r3 + k02_r_r3*k04_r_r3*k07_r_r3*k09_r_r3*k12_r_r3*k14_r_r3*k16_r_r3*k19_r_r3 + k02_r_r3*k04_r_r3*k06_r_r3*k09_r_r3*k12_r_r3*k15_r_r3*k17_r_r3*k19_r_r3 + k02_r_r3*k04_r_r3*k07_r_r3*k09_r_r3*k12_r_r3*k14_r_r3*k17_r_r3*k19_r_r3 + k02_r_r3*k05_r_r3*k07_r_r3*k09_r_r3*k12_r_r3*k14_r_r3*k16_r_r3*k19_r_r3 + k02_r_r3*k04_r_r3*k07_r_r3*k09_r_r3*k12_r_r3*k15_r_r3*k17_r_r3*k19_r_r3 + k02_r_r3*k05_r_r3*k07_r_r3*k09_r_r3*k12_r_r3*k14_r_r3*k17_r_r3*k19_r_r3 + k02_r_r3*k05_r_r3*k07_r_r3*k09_r_r3*k12_r_r3*k15_r_r3*k17_r_r3*k19_r_r3 + k01_r_r3*k04_r_r3*k06_r_r3*k09_r_r3*k12_r_r3*k14_r_r3*k16_r_r3*k19_r_r3*m_m1 + k02_r_r3*k04_r_r3*k06_r_r3*k09_r_r3*k11_r_r3*k14_r_r3*k16_r_r3*k19_r_r3*m_m1 + k01_r_r3*k04_r_r3*k06_r_r3*k09_r_r3*k12_r_r3*k14_r_r3*k17_r_r3*k19_r_r3*m_m1 + k01_r_r3*k04_r_r3*k07_r_r3*k09_r_r3*k12_r_r3*k14_r_r3*k16_r_r3*k19_r_r3*m_m1 + k02_r_r3*k04_r_r3*k06_r_r3*k09_r_r3*k11_r_r3*k14_r_r3*k17_r_r3*k19_r_r3*m_m1 + k02_r_r3*k04_r_r3*k07_r_r3*k09_r_r3*k11_r_r3*k14_r_r3*k16_r_r3*k19_r_r3*m_m1 + k01_r_r3*k04_r_r3*k06_r_r3*k09_r_r3*k12_r_r3*k15_r_r3*k17_r_r3*k19_r_r3*m_m1 + k01_r_r3*k04_r_r3*k07_r_r3*k09_r_r3*k12_r_r3*k14_r_r3*k17_r_r3*k19_r_r3*m_m1 + k01_r_r3*k05_r_r3*k07_r_r3*k09_r_r3*k12_r_r3*k14_r_r3*k16_r_r3*k19_r_r3*m_m1 + k02_r_r3*k04_r_r3*k06_r_r3*k09_r_r3*k11_r_r3*k15_r_r3*k17_r_r3*k19_r_r3*m_m1 + k02_r_r3*k04_r_r3*k07_r_r3*k09_r_r3*k11_r_r3*k14_r_r3*k17_r_r3*k19_r_r3*m_m1 + k02_r_r3*k05_r_r3*k07_r_r3*k09_r_r3*k11_r_r3*k14_r_r3*k16_r_r3*k19_r_r3*m_m1 + k01_r_r3*k04_r_r3*k07_r_r3*k09_r_r3*k12_r_r3*k15_r_r3*k17_r_r3*k19_r_r3*m_m1 + k01_r_r3*k05_r_r3*k07_r_r3*k09_r_r3*k12_r_r3*k14_r_r3*k17_r_r3*k19_r_r3*m_m1 + k02_r_r3*k04_r_r3*k07_r_r3*k09_r_r3*k11_r_r3*k15_r_r3*k17_r_r3*k19_r_r3*m_m1 + k02_r_r3*k05_r_r3*k07_r_r3*k09_r_r3*k11_r_r3*k14_r_r3*k17_r_r3*k19_r_r3*m_m1 + k01_r_r3*k05_r_r3*k07_r_r3*k09_r_r3*k12_r_r3*k15_r_r3*k17_r_r3*k19_r_r3*m_m1 + k02_r_r3*k05_r_r3*k07_r_r3*k09_r_r3*k11_r_r3*k15_r_r3*k17_r_r3*k19_r_r3*m_m1 + k02_r_r3*k04_r_r3*k06_r_r3*k08_r_r3*k12_r_r3*k14_r_r3*k16_r_r3*k19_r_r3*m_m8 + k02_r_r3*k04_r_r3*k06_r_r3*k08_r_r3*k12_r_r3*k14_r_r3*k17_r_r3*k19_r_r3*m_m8 + k02_r_r3*k04_r_r3*k06_r_r3*k08_r_r3*k12_r_r3*k15_r_r3*k17_r_r3*k19_r_r3*m_m8 + k02_r_r3*k04_r_r3*k06_r_r3*k09_r_r3*k12_r_r3*k14_r_r3*k16_r_r3*k18_r_r3*m_m11 + k03_r_r3*k05_r_r3*k07_r_r3*k09_r_r3*k12_r_r3*k14_r_r3*k16_r_r3*k19_r_r3*m_m7 + k02_r_r3*k04_r_r3*k07_r_r3*k09_r_r3*k12_r_r3*k14_r_r3*k16_r_r3*k18_r_r3*m_m11 + k03_r_r3*k05_r_r3*k07_r_r3*k09_r_r3*k12_r_r3*k14_r_r3*k17_r_r3*k19_r_r3*m_m7 + k02_r_r3*k05_r_r3*k07_r_r3*k09_r_r3*k12_r_r3*k14_r_r3*k16_r_r3*k18_r_r3*m_m11 + k03_r_r3*k05_r_r3*k07_r_r3*k09_r_r3*k12_r_r3*k15_r_r3*k17_r_r3*k19_r_r3*m_m7 + k02_r_r3*k04_r_r3*k06_r_r3*k09_r_r3*k12_r_r3*k14_r_r3*k16_r_r3*k20_r_r3*m_m12 + k02_r_r3*k04_r_r3*k06_r_r3*k09_r_r3*k13_r_r3*k15_r_r3*k17_r_r3*k19_r_r3*m_m10 + k02_r_r3*k04_r_r3*k06_r_r3*k10_r_r3*k12_r_r3*k14_r_r3*k16_r_r3*k19_r_r3*m_m12 + k02_r_r3*k04_r_r3*k06_r_r3*k09_r_r3*k12_r_r3*k14_r_r3*k17_r_r3*k20_r_r3*m_m12 + k02_r_r3*k04_r_r3*k06_r_r3*k10_r_r3*k12_r_r3*k14_r_r3*k17_r_r3*k19_r_r3*m_m12 + k02_r_r3*k04_r_r3*k07_r_r3*k09_r_r3*k12_r_r3*k14_r_r3*k16_r_r3*k20_r_r3*m_m12 + k02_r_r3*k04_r_r3*k07_r_r3*k09_r_r3*k13_r_r3*k15_r_r3*k17_r_r3*k19_r_r3*m_m10 + k02_r_r3*k04_r_r3*k07_r_r3*k10_r_r3*k12_r_r3*k14_r_r3*k16_r_r3*k19_r_r3*m_m12 + k02_r_r3*k04_r_r3*k06_r_r3*k09_r_r3*k12_r_r3*k15_r_r3*k17_r_r3*k20_r_r3*m_m12 + k02_r_r3*k04_r_r3*k06_r_r3*k10_r_r3*k12_r_r3*k15_r_r3*k17_r_r3*k19_r_r3*m_m12 + k02_r_r3*k04_r_r3*k07_r_r3*k09_r_r3*k12_r_r3*k14_r_r3*k17_r_r3*k20_r_r3*m_m12 + k02_r_r3*k04_r_r3*k07_r_r3*k10_r_r3*k12_r_r3*k14_r_r3*k17_r_r3*k19_r_r3*m_m12 + k02_r_r3*k05_r_r3*k07_r_r3*k09_r_r3*k12_r_r3*k14_r_r3*k16_r_r3*k20_r_r3*m_m12 + k02_r_r3*k05_r_r3*k07_r_r3*k09_r_r3*k13_r_r3*k15_r_r3*k17_r_r3*k19_r_r3*m_m10 + k02_r_r3*k05_r_r3*k07_r_r3*k10_r_r3*k12_r_r3*k14_r_r3*k16_r_r3*k19_r_r3*m_m12 + k02_r_r3*k04_r_r3*k07_r_r3*k09_r_r3*k12_r_r3*k15_r_r3*k17_r_r3*k20_r_r3*m_m12 + k02_r_r3*k04_r_r3*k07_r_r3*k10_r_r3*k12_r_r3*k15_r_r3*k17_r_r3*k19_r_r3*m_m12 + k02_r_r3*k05_r_r3*k07_r_r3*k09_r_r3*k12_r_r3*k14_r_r3*k17_r_r3*k20_r_r3*m_m12 + k02_r_r3*k05_r_r3*k07_r_r3*k10_r_r3*k12_r_r3*k14_r_r3*k17_r_r3*k19_r_r3*m_m12 + k02_r_r3*k05_r_r3*k07_r_r3*k09_r_r3*k12_r_r3*k15_r_r3*k17_r_r3*k20_r_r3*m_m12 + k02_r_r3*k05_r_r3*k07_r_r3*k10_r_r3*k12_r_r3*k15_r_r3*k17_r_r3*k19_r_r3*m_m12 + k01_r_r3*k03_r_r3*k05_r_r3*k07_r_r3*k12_r_r3*k14_r_r3*k16_r_r3*k19_r_r3*m_m1*m_m7 + k01_r_r3*k03_r_r3*k05_r_r3*k07_r_r3*k12_r_r3*k14_r_r3*k17_r_r3*k19_r_r3*m_m1*m_m7 + k01_r_r3*k03_r_r3*k05_r_r3*k07_r_r3*k12_r_r3*k15_r_r3*k17_r_r3*k19_r_r3*m_m1*m_m7 + k01_r_r3*k03_r_r3*k05_r_r3*k09_r_r3*k12_r_r3*k14_r_r3*k16_r_r3*k19_r_r3*m_m1*m_m7 + k01_r_r3*k03_r_r3*k05_r_r3*k09_r_r3*k12_r_r3*k14_r_r3*k17_r_r3*k19_r_r3*m_m1*m_m7 + k01_r_r3*k03_r_r3*k06_r_r3*k09_r_r3*k12_r_r3*k14_r_r3*k16_r_r3*k19_r_r3*m_m1*m_m7 + k02_r_r3*k04_r_r3*k06_r_r3*k09_r_r3*k11_r_r3*k13_r_r3*k15_r_r3*k17_r_r3*m_m1*m_m10 + k01_r_r3*k03_r_r3*k05_r_r3*k09_r_r3*k12_r_r3*k15_r_r3*k17_r_r3*k19_r_r3*m_m1*m_m7 + k01_r_r3*k03_r_r3*k06_r_r3*k09_r_r3*k12_r_r3*k14_r_r3*k17_r_r3*k19_r_r3*m_m1*m_m7 + k01_r_r3*k03_r_r3*k07_r_r3*k09_r_r3*k12_r_r3*k14_r_r3*k16_r_r3*k19_r_r3*m_m1*m_m7 + k01_r_r3*k04_r_r3*k06_r_r3*k08_r_r3*k12_r_r3*k14_r_r3*k16_r_r3*k19_r_r3*m_m1*m_m8 + k02_r_r3*k04_r_r3*k06_r_r3*k08_r_r3*k11_r_r3*k14_r_r3*k16_r_r3*k19_r_r3*m_m1*m_m8 + k02_r_r3*k04_r_r3*k07_r_r3*k09_r_r3*k11_r_r3*k13_r_r3*k15_r_r3*k17_r_r3*m_m1*m_m10 + k01_r_r3*k03_r_r3*k06_r_r3*k09_r_r3*k12_r_r3*k15_r_r3*k17_r_r3*k19_r_r3*m_m1*m_m7 + k01_r_r3*k03_r_r3*k07_r_r3*k09_r_r3*k12_r_r3*k14_r_r3*k17_r_r3*k19_r_r3*m_m1*m_m7 + k01_r_r3*k04_r_r3*k06_r_r3*k08_r_r3*k12_r_r3*k14_r_r3*k17_r_r3*k19_r_r3*m_m1*m_m8 + k02_r_r3*k04_r_r3*k06_r_r3*k08_r_r3*k11_r_r3*k14_r_r3*k17_r_r3*k19_r_r3*m_m1*m_m8 + k02_r_r3*k04_r_r3*k06_r_r3*k09_r_r3*k11_r_r3*k13_r_r3*k15_r_r3*k19_r_r3*m_m1*m_m10 + k02_r_r3*k05_r_r3*k07_r_r3*k09_r_r3*k11_r_r3*k13_r_r3*k15_r_r3*k17_r_r3*m_m1*m_m10 + k01_r_r3*k03_r_r3*k07_r_r3*k09_r_r3*k12_r_r3*k15_r_r3*k17_r_r3*k19_r_r3*m_m1*m_m7 + k01_r_r3*k04_r_r3*k06_r_r3*k08_r_r3*k12_r_r3*k15_r_r3*k17_r_r3*k19_r_r3*m_m1*m_m8 + k02_r_r3*k04_r_r3*k06_r_r3*k08_r_r3*k11_r_r3*k15_r_r3*k17_r_r3*k19_r_r3*m_m1*m_m8 + k02_r_r3*k04_r_r3*k06_r_r3*k09_r_r3*k11_r_r3*k13_r_r3*k16_r_r3*k19_r_r3*m_m1*m_m10 + k02_r_r3*k04_r_r3*k07_r_r3*k09_r_r3*k11_r_r3*k13_r_r3*k15_r_r3*k19_r_r3*m_m1*m_m10 + k01_r_r3*k04_r_r3*k06_r_r3*k09_r_r3*k12_r_r3*k14_r_r3*k16_r_r3*k18_r_r3*m_m1*m_m11 + k02_r_r3*k04_r_r3*k06_r_r3*k09_r_r3*k11_r_r3*k13_r_r3*k17_r_r3*k19_r_r3*m_m1*m_m10 + k02_r_r3*k04_r_r3*k06_r_r3*k09_r_r3*k11_r_r3*k14_r_r3*k16_r_r3*k18_r_r3*m_m1*m_m11 + k02_r_r3*k04_r_r3*k07_r_r3*k09_r_r3*k11_r_r3*k13_r_r3*k16_r_r3*k19_r_r3*m_m1*m_m10 + k02_r_r3*k05_r_r3*k07_r_r3*k09_r_r3*k11_r_r3*k13_r_r3*k15_r_r3*k19_r_r3*m_m1*m_m10 + k03_r_r3*k05_r_r3*k07_r_r3*k09_r_r3*k11_r_r3*k14_r_r3*k16_r_r3*k19_r_r3*m_m1*m_m7 + k01_r_r3*k04_r_r3*k07_r_r3*k09_r_r3*k12_r_r3*k14_r_r3*k16_r_r3*k18_r_r3*m_m1*m_m11 + k02_r_r3*k04_r_r3*k07_r_r3*k09_r_r3*k11_r_r3*k13_r_r3*k17_r_r3*k19_r_r3*m_m1*m_m10 + k02_r_r3*k04_r_r3*k07_r_r3*k09_r_r3*k11_r_r3*k14_r_r3*k16_r_r3*k18_r_r3*m_m1*m_m11 + k02_r_r3*k05_r_r3*k07_r_r3*k09_r_r3*k11_r_r3*k13_r_r3*k16_r_r3*k19_r_r3*m_m1*m_m10 + k03_r_r3*k05_r_r3*k07_r_r3*k09_r_r3*k11_r_r3*k14_r_r3*k17_r_r3*k19_r_r3*m_m1*m_m7 + k01_r_r3*k05_r_r3*k07_r_r3*k09_r_r3*k12_r_r3*k14_r_r3*k16_r_r3*k18_r_r3*m_m1*m_m11 + k02_r_r3*k05_r_r3*k07_r_r3*k09_r_r3*k11_r_r3*k13_r_r3*k17_r_r3*k19_r_r3*m_m1*m_m10 + k02_r_r3*k05_r_r3*k07_r_r3*k09_r_r3*k11_r_r3*k14_r_r3*k16_r_r3*k18_r_r3*m_m1*m_m11 + k03_r_r3*k05_r_r3*k07_r_r3*k09_r_r3*k11_r_r3*k15_r_r3*k17_r_r3*k19_r_r3*m_m1*m_m7 + k01_r_r3*k04_r_r3*k06_r_r3*k09_r_r3*k13_r_r3*k15_r_r3*k17_r_r3*k19_r_r3*m_m1*m_m10 + k01_r_r3*k04_r_r3*k07_r_r3*k09_r_r3*k13_r_r3*k15_r_r3*k17_r_r3*k19_r_r3*m_m1*m_m10 + k01_r_r3*k05_r_r3*k07_r_r3*k09_r_r3*k13_r_r3*k15_r_r3*k17_r_r3*k19_r_r3*m_m1*m_m10 + k02_r_r3*k04_r_r3*k06_r_r3*k08_r_r3*k12_r_r3*k14_r_r3*k16_r_r3*k18_r_r3*m_m8*m_m11 + k02_r_r3*k04_r_r3*k06_r_r3*k08_r_r3*k12_r_r3*k14_r_r3*k16_r_r3*k20_r_r3*m_m8*m_m12 + k02_r_r3*k04_r_r3*k06_r_r3*k08_r_r3*k13_r_r3*k15_r_r3*k17_r_r3*k19_r_r3*m_m8*m_m10 + k03_r_r3*k05_r_r3*k07_r_r3*k09_r_r3*k12_r_r3*k14_r_r3*k16_r_r3*k18_r_r3*m_m7*m_m11 + k02_r_r3*k04_r_r3*k06_r_r3*k08_r_r3*k12_r_r3*k14_r_r3*k17_r_r3*k20_r_r3*m_m8*m_m12 + k02_r_r3*k04_r_r3*k06_r_r3*k08_r_r3*k12_r_r3*k15_r_r3*k17_r_r3*k20_r_r3*m_m8*m_m12 + k02_r_r3*k04_r_r3*k06_r_r3*k10_r_r3*k12_r_r3*k14_r_r3*k16_r_r3*k18_r_r3*m_m11*m_m12 + k02_r_r3*k04_r_r3*k08_r_r3*k10_r_r3*k12_r_r3*k14_r_r3*k16_r_r3*k19_r_r3*m_m8*m_m12 + k03_r_r3*k05_r_r3*k07_r_r3*k09_r_r3*k12_r_r3*k14_r_r3*k16_r_r3*k20_r_r3*m_m7*m_m12 + k03_r_r3*k05_r_r3*k07_r_r3*k09_r_r3*k13_r_r3*k15_r_r3*k17_r_r3*k19_r_r3*m_m7*m_m10 + k03_r_r3*k05_r_r3*k07_r_r3*k10_r_r3*k12_r_r3*k14_r_r3*k16_r_r3*k19_r_r3*m_m7*m_m12 + k02_r_r3*k04_r_r3*k07_r_r3*k10_r_r3*k12_r_r3*k14_r_r3*k16_r_r3*k18_r_r3*m_m11*m_m12 + k02_r_r3*k04_r_r3*k08_r_r3*k10_r_r3*k12_r_r3*k14_r_r3*k17_r_r3*k19_r_r3*m_m8*m_m12 + k02_r_r3*k05_r_r3*k08_r_r3*k10_r_r3*k12_r_r3*k14_r_r3*k16_r_r3*k19_r_r3*m_m8*m_m12 + k03_r_r3*k05_r_r3*k07_r_r3*k09_r_r3*k12_r_r3*k14_r_r3*k17_r_r3*k20_r_r3*m_m7*m_m12 + k03_r_r3*k05_r_r3*k07_r_r3*k10_r_r3*k12_r_r3*k14_r_r3*k17_r_r3*k19_r_r3*m_m7*m_m12 + k02_r_r3*k04_r_r3*k08_r_r3*k10_r_r3*k12_r_r3*k15_r_r3*k17_r_r3*k19_r_r3*m_m8*m_m12 + k02_r_r3*k05_r_r3*k07_r_r3*k10_r_r3*k12_r_r3*k14_r_r3*k16_r_r3*k18_r_r3*m_m11*m_m12 + k02_r_r3*k05_r_r3*k08_r_r3*k10_r_r3*k12_r_r3*k14_r_r3*k17_r_r3*k19_r_r3*m_m8*m_m12 + k02_r_r3*k06_r_r3*k08_r_r3*k10_r_r3*k12_r_r3*k14_r_r3*k16_r_r3*k19_r_r3*m_m8*m_m12 + k03_r_r3*k05_r_r3*k07_r_r3*k09_r_r3*k12_r_r3*k15_r_r3*k17_r_r3*k20_r_r3*m_m7*m_m12 + k03_r_r3*k05_r_r3*k07_r_r3*k10_r_r3*k12_r_r3*k15_r_r3*k17_r_r3*k19_r_r3*m_m7*m_m12 + k02_r_r3*k04_r_r3*k06_r_r3*k09_r_r3*k12_r_r3*k14_r_r3*k18_r_r3*k20_r_r3*m_m11*m_m12 + k02_r_r3*k04_r_r3*k06_r_r3*k09_r_r3*k13_r_r3*k15_r_r3*k17_r_r3*k20_r_r3*m_m10*m_m12 + k02_r_r3*k04_r_r3*k06_r_r3*k10_r_r3*k13_r_r3*k15_r_r3*k17_r_r3*k19_r_r3*m_m10*m_m12 + k02_r_r3*k05_r_r3*k08_r_r3*k10_r_r3*k12_r_r3*k15_r_r3*k17_r_r3*k19_r_r3*m_m8*m_m12 + k02_r_r3*k06_r_r3*k08_r_r3*k10_r_r3*k12_r_r3*k14_r_r3*k17_r_r3*k19_r_r3*m_m8*m_m12 + k02_r_r3*k04_r_r3*k06_r_r3*k09_r_r3*k12_r_r3*k15_r_r3*k18_r_r3*k20_r_r3*m_m11*m_m12 + k02_r_r3*k04_r_r3*k07_r_r3*k09_r_r3*k12_r_r3*k14_r_r3*k18_r_r3*k20_r_r3*m_m11*m_m12 + k02_r_r3*k04_r_r3*k07_r_r3*k09_r_r3*k13_r_r3*k15_r_r3*k17_r_r3*k20_r_r3*m_m10*m_m12 + k02_r_r3*k04_r_r3*k07_r_r3*k10_r_r3*k13_r_r3*k15_r_r3*k17_r_r3*k19_r_r3*m_m10*m_m12 + k02_r_r3*k06_r_r3*k08_r_r3*k10_r_r3*k12_r_r3*k15_r_r3*k17_r_r3*k19_r_r3*m_m8*m_m12 + k04_r_r3*k06_r_r3*k08_r_r3*k10_r_r3*k12_r_r3*k14_r_r3*k16_r_r3*k19_r_r3*m_m8*m_m12 + k02_r_r3*k04_r_r3*k06_r_r3*k09_r_r3*k12_r_r3*k16_r_r3*k18_r_r3*k20_r_r3*m_m11*m_m12 + k02_r_r3*k04_r_r3*k07_r_r3*k09_r_r3*k12_r_r3*k15_r_r3*k18_r_r3*k20_r_r3*m_m11*m_m12 + k02_r_r3*k05_r_r3*k07_r_r3*k09_r_r3*k12_r_r3*k14_r_r3*k18_r_r3*k20_r_r3*m_m11*m_m12 + k02_r_r3*k05_r_r3*k07_r_r3*k09_r_r3*k13_r_r3*k15_r_r3*k17_r_r3*k20_r_r3*m_m10*m_m12 + k02_r_r3*k05_r_r3*k07_r_r3*k10_r_r3*k13_r_r3*k15_r_r3*k17_r_r3*k19_r_r3*m_m10*m_m12 + k04_r_r3*k06_r_r3*k08_r_r3*k10_r_r3*k12_r_r3*k14_r_r3*k17_r_r3*k19_r_r3*m_m8*m_m12 + k02_r_r3*k04_r_r3*k07_r_r3*k09_r_r3*k12_r_r3*k16_r_r3*k18_r_r3*k20_r_r3*m_m11*m_m12 + k02_r_r3*k05_r_r3*k07_r_r3*k09_r_r3*k12_r_r3*k15_r_r3*k18_r_r3*k20_r_r3*m_m11*m_m12 + k04_r_r3*k06_r_r3*k08_r_r3*k10_r_r3*k12_r_r3*k15_r_r3*k17_r_r3*k19_r_r3*m_m8*m_m12 + k02_r_r3*k04_r_r3*k06_r_r3*k09_r_r3*k14_r_r3*k16_r_r3*k18_r_r3*k20_r_r3*m_m11*m_m12 + k02_r_r3*k05_r_r3*k07_r_r3*k09_r_r3*k12_r_r3*k16_r_r3*k18_r_r3*k20_r_r3*m_m11*m_m12 + k02_r_r3*k04_r_r3*k07_r_r3*k09_r_r3*k14_r_r3*k16_r_r3*k18_r_r3*k20_r_r3*m_m11*m_m12 + k02_r_r3*k05_r_r3*k07_r_r3*k09_r_r3*k14_r_r3*k16_r_r3*k18_r_r3*k20_r_r3*m_m11*m_m12 + k01_r_r3*k03_r_r3*k05_r_r3*k08_r_r3*k12_r_r3*k14_r_r3*k16_r_r3*k19_r_r3*m_m1*m_m7*m_m8 + k01_r_r3*k03_r_r3*k05_r_r3*k07_r_r3*k12_r_r3*k14_r_r3*k16_r_r3*k18_r_r3*m_m1*m_m7*m_m11 + k01_r_r3*k03_r_r3*k05_r_r3*k08_r_r3*k12_r_r3*k14_r_r3*k17_r_r3*k19_r_r3*m_m1*m_m7*m_m8 + k01_r_r3*k03_r_r3*k06_r_r3*k08_r_r3*k12_r_r3*k14_r_r3*k16_r_r3*k19_r_r3*m_m1*m_m7*m_m8 + k02_r_r3*k04_r_r3*k06_r_r3*k08_r_r3*k11_r_r3*k13_r_r3*k15_r_r3*k17_r_r3*m_m1*m_m8*m_m10 + k01_r_r3*k03_r_r3*k05_r_r3*k08_r_r3*k12_r_r3*k15_r_r3*k17_r_r3*k19_r_r3*m_m1*m_m7*m_m8 + k01_r_r3*k03_r_r3*k06_r_r3*k08_r_r3*k12_r_r3*k14_r_r3*k17_r_r3*k19_r_r3*m_m1*m_m7*m_m8 + k01_r_r3*k03_r_r3*k05_r_r3*k09_r_r3*k12_r_r3*k14_r_r3*k16_r_r3*k18_r_r3*m_m1*m_m7*m_m11 + k01_r_r3*k03_r_r3*k06_r_r3*k08_r_r3*k12_r_r3*k15_r_r3*k17_r_r3*k19_r_r3*m_m1*m_m7*m_m8 + k02_r_r3*k04_r_r3*k06_r_r3*k08_r_r3*k11_r_r3*k13_r_r3*k15_r_r3*k19_r_r3*m_m1*m_m8*m_m10 + k01_r_r3*k03_r_r3*k05_r_r3*k07_r_r3*k13_r_r3*k15_r_r3*k17_r_r3*k19_r_r3*m_m1*m_m7*m_m10 + k01_r_r3*k03_r_r3*k06_r_r3*k09_r_r3*k12_r_r3*k14_r_r3*k16_r_r3*k18_r_r3*m_m1*m_m7*m_m11 + k02_r_r3*k04_r_r3*k06_r_r3*k08_r_r3*k11_r_r3*k13_r_r3*k16_r_r3*k19_r_r3*m_m1*m_m8*m_m10 + k03_r_r3*k05_r_r3*k07_r_r3*k09_r_r3*k11_r_r3*k13_r_r3*k15_r_r3*k17_r_r3*m_m1*m_m7*m_m10 + k01_r_r3*k03_r_r3*k07_r_r3*k09_r_r3*k12_r_r3*k14_r_r3*k16_r_r3*k18_r_r3*m_m1*m_m7*m_m11 + k01_r_r3*k04_r_r3*k06_r_r3*k08_r_r3*k12_r_r3*k14_r_r3*k16_r_r3*k18_r_r3*m_m1*m_m8*m_m11 + k02_r_r3*k04_r_r3*k06_r_r3*k08_r_r3*k11_r_r3*k13_r_r3*k17_r_r3*k19_r_r3*m_m1*m_m8*m_m10 + k02_r_r3*k04_r_r3*k06_r_r3*k08_r_r3*k11_r_r3*k14_r_r3*k16_r_r3*k18_r_r3*m_m1*m_m8*m_m11 + k01_r_r3*k03_r_r3*k05_r_r3*k09_r_r3*k13_r_r3*k15_r_r3*k17_r_r3*k19_r_r3*m_m1*m_m7*m_m10 + k02_r_r3*k04_r_r3*k06_r_r3*k09_r_r3*k11_r_r3*k13_r_r3*k15_r_r3*k18_r_r3*m_m1*m_m10*m_m11 + k03_r_r3*k05_r_r3*k07_r_r3*k09_r_r3*k11_r_r3*k13_r_r3*k15_r_r3*k19_r_r3*m_m1*m_m7*m_m10 + k01_r_r3*k03_r_r3*k06_r_r3*k09_r_r3*k13_r_r3*k15_r_r3*k17_r_r3*k19_r_r3*m_m1*m_m7*m_m10 + k02_r_r3*k04_r_r3*k06_r_r3*k09_r_r3*k11_r_r3*k13_r_r3*k16_r_r3*k18_r_r3*m_m1*m_m10*m_m11 + k02_r_r3*k04_r_r3*k07_r_r3*k09_r_r3*k11_r_r3*k13_r_r3*k15_r_r3*k18_r_r3*m_m1*m_m10*m_m11 + k03_r_r3*k05_r_r3*k07_r_r3*k09_r_r3*k11_r_r3*k13_r_r3*k16_r_r3*k19_r_r3*m_m1*m_m7*m_m10 + k01_r_r3*k03_r_r3*k07_r_r3*k09_r_r3*k13_r_r3*k15_r_r3*k17_r_r3*k19_r_r3*m_m1*m_m7*m_m10 + k01_r_r3*k04_r_r3*k06_r_r3*k08_r_r3*k13_r_r3*k15_r_r3*k17_r_r3*k19_r_r3*m_m1*m_m8*m_m10 + k02_r_r3*k04_r_r3*k07_r_r3*k09_r_r3*k11_r_r3*k13_r_r3*k16_r_r3*k18_r_r3*m_m1*m_m10*m_m11 + k02_r_r3*k05_r_r3*k07_r_r3*k09_r_r3*k11_r_r3*k13_r_r3*k15_r_r3*k18_r_r3*m_m1*m_m10*m_m11 + k03_r_r3*k05_r_r3*k07_r_r3*k09_r_r3*k11_r_r3*k13_r_r3*k17_r_r3*k19_r_r3*m_m1*m_m7*m_m10 + k03_r_r3*k05_r_r3*k07_r_r3*k09_r_r3*k11_r_r3*k14_r_r3*k16_r_r3*k18_r_r3*m_m1*m_m7*m_m11 + k02_r_r3*k05_r_r3*k07_r_r3*k09_r_r3*k11_r_r3*k13_r_r3*k16_r_r3*k18_r_r3*m_m1*m_m10*m_m11 + k03_r_r3*k05_r_r3*k08_r_r3*k10_r_r3*k12_r_r3*k14_r_r3*k16_r_r3*k19_r_r3*m_m7*m_m8*m_m12 + k02_r_r3*k04_r_r3*k06_r_r3*k08_r_r3*k12_r_r3*k14_r_r3*k18_r_r3*k20_r_r3*m_m8*m_m11*m_m12 + k02_r_r3*k04_r_r3*k06_r_r3*k08_r_r3*k13_r_r3*k15_r_r3*k17_r_r3*k20_r_r3*m_m8*m_m10*m_m12 + k02_r_r3*k04_r_r3*k08_r_r3*k10_r_r3*k12_r_r3*k14_r_r3*k16_r_r3*k18_r_r3*m_m8*m_m11*m_m12 + k03_r_r3*k05_r_r3*k07_r_r3*k10_r_r3*k12_r_r3*k14_r_r3*k16_r_r3*k18_r_r3*m_m7*m_m11*m_m12 + k03_r_r3*k05_r_r3*k08_r_r3*k10_r_r3*k12_r_r3*k14_r_r3*k17_r_r3*k19_r_r3*m_m7*m_m8*m_m12 + k03_r_r3*k06_r_r3*k08_r_r3*k10_r_r3*k12_r_r3*k14_r_r3*k16_r_r3*k19_r_r3*m_m7*m_m8*m_m12 + k02_r_r3*k04_r_r3*k06_r_r3*k08_r_r3*k12_r_r3*k15_r_r3*k18_r_r3*k20_r_r3*m_m8*m_m11*m_m12 + k02_r_r3*k05_r_r3*k08_r_r3*k10_r_r3*k12_r_r3*k14_r_r3*k16_r_r3*k18_r_r3*m_m8*m_m11*m_m12 + k03_r_r3*k05_r_r3*k08_r_r3*k10_r_r3*k12_r_r3*k15_r_r3*k17_r_r3*k19_r_r3*m_m7*m_m8*m_m12 + k03_r_r3*k06_r_r3*k08_r_r3*k10_r_r3*k12_r_r3*k14_r_r3*k17_r_r3*k19_r_r3*m_m7*m_m8*m_m12 + k02_r_r3*k04_r_r3*k06_r_r3*k08_r_r3*k12_r_r3*k16_r_r3*k18_r_r3*k20_r_r3*m_m8*m_m11*m_m12 + k02_r_r3*k06_r_r3*k08_r_r3*k10_r_r3*k12_r_r3*k14_r_r3*k16_r_r3*k18_r_r3*m_m8*m_m11*m_m12 + k03_r_r3*k06_r_r3*k08_r_r3*k10_r_r3*k12_r_r3*k15_r_r3*k17_r_r3*k19_r_r3*m_m7*m_m8*m_m12 + k02_r_r3*k04_r_r3*k08_r_r3*k10_r_r3*k13_r_r3*k15_r_r3*k17_r_r3*k19_r_r3*m_m8*m_m10*m_m12 + k03_r_r3*k05_r_r3*k07_r_r3*k09_r_r3*k12_r_r3*k14_r_r3*k18_r_r3*k20_r_r3*m_m7*m_m11*m_m12 + k03_r_r3*k05_r_r3*k07_r_r3*k09_r_r3*k13_r_r3*k15_r_r3*k17_r_r3*k20_r_r3*m_m7*m_m10*m_m12 + k03_r_r3*k05_r_r3*k07_r_r3*k10_r_r3*k13_r_r3*k15_r_r3*k17_r_r3*k19_r_r3*m_m7*m_m10*m_m12 + k02_r_r3*k04_r_r3*k06_r_r3*k08_r_r3*k14_r_r3*k16_r_r3*k18_r_r3*k20_r_r3*m_m8*m_m11*m_m12 + k02_r_r3*k05_r_r3*k08_r_r3*k10_r_r3*k13_r_r3*k15_r_r3*k17_r_r3*k19_r_r3*m_m8*m_m10*m_m12 + k03_r_r3*k05_r_r3*k07_r_r3*k09_r_r3*k12_r_r3*k15_r_r3*k18_r_r3*k20_r_r3*m_m7*m_m11*m_m12 + k04_r_r3*k06_r_r3*k08_r_r3*k10_r_r3*k12_r_r3*k14_r_r3*k16_r_r3*k18_r_r3*m_m8*m_m11*m_m12 + k02_r_r3*k04_r_r3*k06_r_r3*k09_r_r3*k13_r_r3*k15_r_r3*k18_r_r3*k20_r_r3*m_m10*m_m11*m_m12 + k02_r_r3*k06_r_r3*k08_r_r3*k10_r_r3*k13_r_r3*k15_r_r3*k17_r_r3*k19_r_r3*m_m8*m_m10*m_m12 + k03_r_r3*k05_r_r3*k07_r_r3*k09_r_r3*k12_r_r3*k16_r_r3*k18_r_r3*k20_r_r3*m_m7*m_m11*m_m12 + k02_r_r3*k04_r_r3*k06_r_r3*k09_r_r3*k13_r_r3*k16_r_r3*k18_r_r3*k20_r_r3*m_m10*m_m11*m_m12 + k02_r_r3*k04_r_r3*k07_r_r3*k09_r_r3*k13_r_r3*k15_r_r3*k18_r_r3*k20_r_r3*m_m10*m_m11*m_m12 + k02_r_r3*k04_r_r3*k07_r_r3*k09_r_r3*k13_r_r3*k16_r_r3*k18_r_r3*k20_r_r3*m_m10*m_m11*m_m12 + k02_r_r3*k05_r_r3*k07_r_r3*k09_r_r3*k13_r_r3*k15_r_r3*k18_r_r3*k20_r_r3*m_m10*m_m11*m_m12 + k03_r_r3*k05_r_r3*k07_r_r3*k09_r_r3*k14_r_r3*k16_r_r3*k18_r_r3*k20_r_r3*m_m7*m_m11*m_m12 + k04_r_r3*k06_r_r3*k08_r_r3*k10_r_r3*k13_r_r3*k15_r_r3*k17_r_r3*k19_r_r3*m_m8*m_m10*m_m12 + k02_r_r3*k05_r_r3*k07_r_r3*k09_r_r3*k13_r_r3*k16_r_r3*k18_r_r3*k20_r_r3*m_m10*m_m11*m_m12 + k01_r_r3*k03_r_r3*k05_r_r3*k08_r_r3*k12_r_r3*k14_r_r3*k16_r_r3*k18_r_r3*m_m1*m_m7*m_m8*m_m11 + k01_r_r3*k03_r_r3*k06_r_r3*k08_r_r3*k12_r_r3*k14_r_r3*k16_r_r3*k18_r_r3*m_m1*m_m7*m_m8*m_m11 + k01_r_r3*k03_r_r3*k05_r_r3*k08_r_r3*k13_r_r3*k15_r_r3*k17_r_r3*k19_r_r3*m_m1*m_m7*m_m8*m_m10 + k02_r_r3*k04_r_r3*k06_r_r3*k08_r_r3*k11_r_r3*k13_r_r3*k15_r_r3*k18_r_r3*m_m1*m_m8*m_m10*m_m11 + k01_r_r3*k03_r_r3*k06_r_r3*k08_r_r3*k13_r_r3*k15_r_r3*k17_r_r3*k19_r_r3*m_m1*m_m7*m_m8*m_m10 + k02_r_r3*k04_r_r3*k06_r_r3*k08_r_r3*k11_r_r3*k13_r_r3*k16_r_r3*k18_r_r3*m_m1*m_m8*m_m10*m_m11 + k03_r_r3*k05_r_r3*k07_r_r3*k09_r_r3*k11_r_r3*k13_r_r3*k15_r_r3*k18_r_r3*m_m1*m_m7*m_m10*m_m11 + k03_r_r3*k05_r_r3*k07_r_r3*k09_r_r3*k11_r_r3*k13_r_r3*k16_r_r3*k18_r_r3*m_m1*m_m7*m_m10*m_m11 + k03_r_r3*k05_r_r3*k08_r_r3*k10_r_r3*k12_r_r3*k14_r_r3*k16_r_r3*k18_r_r3*m_m7*m_m8*m_m11*m_m12 + k03_r_r3*k06_r_r3*k08_r_r3*k10_r_r3*k12_r_r3*k14_r_r3*k16_r_r3*k18_r_r3*m_m7*m_m8*m_m11*m_m12 + k02_r_r3*k04_r_r3*k06_r_r3*k08_r_r3*k13_r_r3*k15_r_r3*k18_r_r3*k20_r_r3*m_m8*m_m10*m_m11*m_m12 + k03_r_r3*k05_r_r3*k08_r_r3*k10_r_r3*k13_r_r3*k15_r_r3*k17_r_r3*k19_r_r3*m_m7*m_m8*m_m10*m_m12 + k02_r_r3*k04_r_r3*k06_r_r3*k08_r_r3*k13_r_r3*k16_r_r3*k18_r_r3*k20_r_r3*m_m8*m_m10*m_m11*m_m12 + k03_r_r3*k06_r_r3*k08_r_r3*k10_r_r3*k13_r_r3*k15_r_r3*k17_r_r3*k19_r_r3*m_m7*m_m8*m_m10*m_m12 + k03_r_r3*k05_r_r3*k07_r_r3*k09_r_r3*k13_r_r3*k15_r_r3*k18_r_r3*k20_r_r3*m_m7*m_m10*m_m11*m_m12 + k03_r_r3*k05_r_r3*k07_r_r3*k09_r_r3*k13_r_r3*k16_r_r3*k18_r_r3*k20_r_r3*m_m7*m_m10*m_m11*m_m12));  // modifiers: m_m5, m_m9, m_m10, m_m11
  r_r4: $m_m2 + m_m8 -> m_m9 + $m_m13; n_sub_r_r4*(k01_r_r4*k03_r_r4*k05_r_r4*k07_r_r4*k09_r_r4*m_m2*m_m8 - k02_r_r4*k04_r_r4*k06_r_r4*k08_r_r4*k10_r_r4*m_m9*m_m13)/((L_0_r_r4*(1/(m_m5/Keff_m_m5_r_r4 + m_m8/Keff_m_m8_r_r4 + 1))^n_sub_r_r4*((k02_r_r4*k04_r_r4*k06_r_r4*k09_r_r4 + k02_r_r4*k04_r_r4*k07_r_r4*k09_r_r4 + k02_r_r4*k05_r_r4*k07_r_r4*k09_r_r4 + k02_r_r4*k04_r_r4*k06_r_r4*k08_r_r4*m_m9 + k03_r_r4*k05_r_r4*k07_r_r4*k09_r_r4*m_m8)/(k02_r_r4*k04_r_r4*k06_r_r4*k09_r_r4 + k02_r_r4*k04_r_r4*k07_r_r4*k09_r_r4 + k02_r_r4*k05_r_r4*k07_r_r4*k09_r_r4 + k01_r_r4*k04_r_r4*k06_r_r4*k09_r_r4*m_m2 + k01_r_r4*k04_r_r4*k07_r_r4*k09_r_r4*m_m2 + k01_r_r4*k05_r_r4*k07_r_r4*k09_r_r4*m_m2 + k02_r_r4*k04_r_r4*k06_r_r4*k08_r_r4*m_m9 + k03_r_r4*k05_r_r4*k07_r_r4*k09_r_r4*m_m8 + k02_r_r4*k04_r_r4*k06_r_r4*k10_r_r4*m_m13 + k02_r_r4*k04_r_r4*k07_r_r4*k10_r_r4*m_m13 + k02_r_r4*k05_r_r4*k07_r_r4*k10_r_r4*m_m13 + k01_r_r4*k03_r_r4*k05_r_r4*k07_r_r4*m_m2*m_m8 + k01_r_r4*k03_r_r4*k05_r_r4*k09_r_r4*m_m2*m_m8 + k01_r_r4*k03_r_r4*k06_r_r4*k09_r_r4*m_m2*m_m8 + k01_r_r4*k03_r_r4*k07_r_r4*k09_r_r4*m_m2*m_m8 + k01_r_r4*k04_r_r4*k06_r_r4*k08_r_r4*m_m2*m_m9 + k02_r_r4*k04_r_r4*k08_r_r4*k10_r_r4*m_m9*m_m13 + k03_r_r4*k05_r_r4*k07_r_r4*k10_r_r4*m_m8*m_m13 + k02_r_r4*k05_r_r4*k08_r_r4*k10_r_r4*m_m9*m_m13 + k02_r_r4*k06_r_r4*k08_r_r4*k10_r_r4*m_m9*m_m13 + k04_r_r4*k06_r_r4*k08_r_r4*k10_r_r4*m_m9*m_m13 + k01_r_r4*k03_r_r4*k05_r_r4*k08_r_r4*m_m2*m_m8*m_m9 + k01_r_r4*k03_r_r4*k06_r_r4*k08_r_r4*m_m2*m_m8*m_m9 + k03_r_r4*k05_r_r4*k08_r_r4*k10_r_r4*m_m8*m_m9*m_m13 + k03_r_r4*k06_r_r4*k08_r_r4*k10_r_r4*m_m8*m_m9*m_m13))^n_sub_r_r4 + 1)*(k02_r_r4*k04_r_r4*k06_r_r4*k09_r_r4 + k02_r_r4*k04_r_r4*k07_r_r4*k09_r_r4 + k02_r_r4*k05_r_r4*k07_r_r4*k09_r_r4 + k01_r_r4*k04_r_r4*k06_r_r4*k09_r_r4*m_m2 + k01_r_r4*k04_r_r4*k07_r_r4*k09_r_r4*m_m2 + k01_r_r4*k05_r_r4*k07_r_r4*k09_r_r4*m_m2 + k02_r_r4*k04_r_r4*k06_r_r4*k08_r_r4*m_m9 + k03_r_r4*k05_r_r4*k07_r_r4*k09_r_r4*m_m8 + k02_r_r4*k04_r_r4*k06_r_r4*k10_r_r4*m_m13 + k02_r_r4*k04_r_r4*k07_r_r4*k10_r_r4*m_m13 + k02_r_r4*k05_r_r4*k07_r_r4*k10_r_r4*m_m13 + k01_r_r4*k03_r_r4*k05_r_r4*k07_r_r4*m_m2*m_m8 + k01_r_r4*k03_r_r4*k05_r_r4*k09_r_r4*m_m2*m_m8 + k01_r_r4*k03_r_r4*k06_r_r4*k09_r_r4*m_m2*m_m8 + k01_r_r4*k03_r_r4*k07_r_r4*k09_r_r4*m_m2*m_m8 + k01_r_r4*k04_r_r4*k06_r_r4*k08_r_r4*m_m2*m_m9 + k02_r_r4*k04_r_r4*k08_r_r4*k10_r_r4*m_m9*m_m13 + k03_r_r4*k05_r_r4*k07_r_r4*k10_r_r4*m_m8*m_m13 + k02_r_r4*k05_r_r4*k08_r_r4*k10_r_r4*m_m9*m_m13 + k02_r_r4*k06_r_r4*k08_r_r4*k10_r_r4*m_m9*m_m13 + k04_r_r4*k06_r_r4*k08_r_r4*k10_r_r4*m_m9*m_m13 + k01_r_r4*k03_r_r4*k05_r_r4*k08_r_r4*m_m2*m_m8*m_m9 + k01_r_r4*k03_r_r4*k06_r_r4*k08_r_r4*m_m2*m_m8*m_m9 + k03_r_r4*k05_r_r4*k08_r_r4*k10_r_r4*m_m8*m_m9*m_m13 + k03_r_r4*k06_r_r4*k08_r_r4*k10_r_r4*m_m8*m_m9*m_m13));  // modifiers: m_m5
  r_r5: m_m6 -> m_m10; n_sub_r_r5*(k07_r_r5*k09_r_r5*k11_r_r5*m_m6 - k08_r_r5*k10_r_r5*k12_r_r5*m_m10)*(k02_r_r5*k04_r_r5 + k02_r_r5*k05_r_r5 + k03_r_r5*k05_r_r5)/((L_0_r_r5*(m_m5/Keff_m_m5_r_r5 + m_m7/Keff_m_m7_r_r5 + 1)^n_sub_r_r5*((k02_r_r5*k04_r_r5 + k02_r_r5*k05_r_r5 + k03_r_r5*k05_r_r5)*(k08_r_r5*k10_r_r5 + k08_r_r5*k11_r_r5 + k09_r_r5*k11_r_r5)/(k02_r_r5*k04_r_r5*k08_r_r5*k10_r_r5 + k02_r_r5*k04_r_r5*k08_r_r5*k11_r_r5 + k02_r_r5*k05_r_r5*k08_r_r5*k10_r_r5 + k02_r_r5*k04_r_r5*k09_r_r5*k11_r_r5 + k02_r_r5*k05_r_r5*k08_r_r5*k11_r_r5 + k03_r_r5*k05_r_r5*k08_r_r5*k10_r_r5 + k02_r_r5*k05_r_r5*k09_r_r5*k11_r_r5 + k03_r_r5*k05_r_r5*k08_r_r5*k11_r_r5 + k03_r_r5*k05_r_r5*k09_r_r5*k11_r_r5 + k01_r_r5*k03_r_r5*k08_r_r5*k10_r_r5*m_m5 + k01_r_r5*k03_r_r5*k08_r_r5*k11_r_r5*m_m5 + k01_r_r5*k04_r_r5*k08_r_r5*k10_r_r5*m_m5 + k02_r_r5*k04_r_r5*k07_r_r5*k09_r_r5*m_m6 + k01_r_r5*k03_r_r5*k09_r_r5*k11_r_r5*m_m5 + k01_r_r5*k04_r_r5*k08_r_r5*k11_r_r5*m_m5 + k01_r_r5*k05_r_r5*k08_r_r5*k10_r_r5*m_m5 + k02_r_r5*k04_r_r5*k07_r_r5*k10_r_r5*m_m6 + k02_r_r5*k05_r_r5*k07_r_r5*k09_r_r5*m_m6 + k01_r_r5*k04_r_r5*k09_r_r5*k11_r_r5*m_m5 + k01_r_r5*k05_r_r5*k08_r_r5*k11_r_r5*m_m5 + k02_r_r5*k04_r_r5*k07_r_r5*k11_r_r5*m_m6 + k02_r_r5*k05_r_r5*k07_r_r5*k10_r_r5*m_m6 + k03_r_r5*k05_r_r5*k07_r_r5*k09_r_r5*m_m6 + k01_r_r5*k05_r_r5*k09_r_r5*k11_r_r5*m_m5 + k02_r_r5*k05_r_r5*k07_r_r5*k11_r_r5*m_m6 + k03_r_r5*k05_r_r5*k07_r_r5*k10_r_r5*m_m6 + k03_r_r5*k05_r_r5*k07_r_r5*k11_r_r5*m_m6 + k02_r_r5*k06_r_r5*k08_r_r5*k10_r_r5*m_m7 + k02_r_r5*k06_r_r5*k08_r_r5*k11_r_r5*m_m7 + k03_r_r5*k06_r_r5*k08_r_r5*k10_r_r5*m_m7 + k02_r_r5*k06_r_r5*k09_r_r5*k11_r_r5*m_m7 + k03_r_r5*k06_r_r5*k08_r_r5*k11_r_r5*m_m7 + k04_r_r5*k06_r_r5*k08_r_r5*k10_r_r5*m_m7 + k02_r_r5*k04_r_r5*k08_r_r5*k12_r_r5*m_m10 + k03_r_r5*k06_r_r5*k09_r_r5*k11_r_r5*m_m7 + k04_r_r5*k06_r_r5*k08_r_r5*k11_r_r5*m_m7 + k02_r_r5*k04_r_r5*k09_r_r5*k12_r_r5*m_m10 + k02_r_r5*k05_r_r5*k08_r_r5*k12_r_r5*m_m10 + k04_r_r5*k06_r_r5*k09_r_r5*k11_r_r5*m_m7 + k02_r_r5*k04_r_r5*k10_r_r5*k12_r_r5*m_m10 + k02_r_r5*k05_r_r5*k09_r_r5*k12_r_r5*m_m10 + k03_r_r5*k05_r_r5*k08_r_r5*k12_r_r5*m_m10 + k02_r_r5*k05_r_r5*k10_r_r5*k12_r_r5*m_m10 + k03_r_r5*k05_r_r5*k09_r_r5*k12_r_r5*m_m10 + k03_r_r5*k05_r_r5*k10_r_r5*k12_r_r5*m_m10))^n_sub_r_r5 + 1)*(k02_r_r5*k04_r_r5*k08_r_r5*k10_r_r5 + k02_r_r5*k04_r_r5*k08_r_r5*k11_r_r5 + k02_r_r5*k05_r_r5*k08_r_r5*k10_r_r5 + k02_r_r5*k04_r_r5*k09_r_r5*k11_r_r5 + k02_r_r5*k05_r_r5*k08_r_r5*k11_r_r5 + k03_r_r5*k05_r_r5*k08_r_r5*k10_r_r5 + k02_r_r5*k05_r_r5*k09_r_r5*k11_r_r5 + k03_r_r5*k05_r_r5*k08_r_r5*k11_r_r5 + k03_r_r5*k05_r_r5*k09_r_r5*k11_r_r5 + k01_r_r5*k03_r_r5*k08_r_r5*k10_r_r5*m_m5 + k01_r_r5*k03_r_r5*k08_r_r5*k11_r_r5*m_m5 + k01_r_r5*k04_r_r5*k08_r_r5*k10_r_r5*m_m5 + k02_r_r5*k04_r_r5*k07_r_r5*k09_r_r5*m_m6 + k01_r_r5*k03_r_r5*k09_r_r5*k11_r_r5*m_m5 + k01_r_r5*k04_r_r5*k08_r_r5*k11_r_r5*m_m5 + k01_r_r5*k05_r_r5*k08_r_r5*k10_r_r5*m_m5 + k02_r_r5*k04_r_r5*k07_r_r5*k10_r_r5*m_m6 + k02_r_r5*k05_r_r5*k07_r_r5*k09_r_r5*m_m6 + k01_r_r5*k04_r_r5*k09_r_r5*k11_r_r5*m_m5 + k01_r_r5*k05_r_r5*k08_r_r5*k11_r_r5*m_m5 + k02_r_r5*k04_r_r5*k07_r_r5*k11_r_r5*m_m6 + k02_r_r5*k05_r_r5*k07_r_r5*k10_r_r5*m_m6 + k03_r_r5*k05_r_r5*k07_r_r5*k09_r_r5*m_m6 + k01_r_r5*k05_r_r5*k09_r_r5*k11_r_r5*m_m5 + k02_r_r5*k05_r_r5*k07_r_r5*k11_r_r5*m_m6 + k03_r_r5*k05_r_r5*k07_r_r5*k10_r_r5*m_m6 + k03_r_r5*k05_r_r5*k07_r_r5*k11_r_r5*m_m6 + k02_r_r5*k06_r_r5*k08_r_r5*k10_r_r5*m_m7 + k02_r_r5*k06_r_r5*k08_r_r5*k11_r_r5*m_m7 + k03_r_r5*k06_r_r5*k08_r_r5*k10_r_r5*m_m7 + k02_r_r5*k06_r_r5*k09_r_r5*k11_r_r5*m_m7 + k03_r_r5*k06_r_r5*k08_r_r5*k11_r_r5*m_m7 + k04_r_r5*k06_r_r5*k08_r_r5*k10_r_r5*m_m7 + k02_r_r5*k04_r_r5*k08_r_r5*k12_r_r5*m_m10 + k03_r_r5*k06_r_r5*k09_r_r5*k11_r_r5*m_m7 + k04_r_r5*k06_r_r5*k08_r_r5*k11_r_r5*m_m7 + k02_r_r5*k04_r_r5*k09_r_r5*k12_r_r5*m_m10 + k02_r_r5*k05_r_r5*k08_r_r5*k12_r_r5*m_m10 + k04_r_r5*k06_r_r5*k09_r_r5*k11_r_r5*m_m7 + k02_r_r5*k04_r_r5*k10_r_r5*k12_r_r5*m_m10 + k02_r_r5*k05_r_r5*k09_r_r5*k12_r_r5*m_m10 + k03_r_r5*k05_r_r5*k08_r_r5*k12_r_r5*m_m10 + k02_r_r5*k05_r_r5*k10_r_r5*k12_r_r5*m_m10 + k03_r_r5*k05_r_r5*k09_r_r5*k12_r_r5*m_m10 + k03_r_r5*k05_r_r5*k10_r_r5*k12_r_r5*m_m10));  // modifiers: m_m5, m_m7
  r_r6: $m_m1 + m_m10 -> m_m11 + $m_m12; n_sub_r_r6*(k11_r_r6*k13_r_r6*k15_r_r6*k17_r_r6*k19_r_r6*m_m1*m_m10 - k12_r_r6*k14_r_r6*k16_r_r6*k18_r_r6*k20_r_r6*m_m11*m_m12)*(k02_r_r6*k04_r_r6*k06_r_r6*k09_r_r6 + k02_r_r6*k04_r_r6*k07_r_r6*k09_r_r6 + k02_r_r6*k05_r_r6*k07_r_r6*k09_r_r6 + k02_r_r6*k04_r_r6*k06_r_r6*k08_r_r6*m_m8 + k03_r_r6*k05_r_r6*k07_r_r6*k09_r_r6*m_m7)/((L_0_r_r6*(m_m9/Keff_m_m9_r_r6 + 1)^n_sub_r_r6*((k02_r_r6*k04_r_r6*k06_r_r6*k09_r_r6 + k02_r_r6*k04_r_r6*k07_r_r6*k09_r_r6 + k02_r_r6*k05_r_r6*k07_r_r6*k09_r_r6 + k02_r_r6*k04_r_r6*k06_r_r6*k08_r_r6*m_m8 + k03_r_r6*k05_r_r6*k07_r_r6*k09_r_r6*m_m7)*(k12_r_r6*k14_r_r6*k16_r_r6*k19_r_r6 + k12_r_r6*k14_r_r6*k17_r_r6*k19_r_r6 + k12_r_r6*k15_r_r6*k17_r_r6*k19_r_r6 + k12_r_r6*k14_r_r6*k16_r_r6*k18_r_r6*m_m11 + k13_r_r6*k15_r_r6*k17_r_r6*k19_r_r6*m_m10)/(k02_r_r6*k04_r_r6*k06_r_r6*k09_r_r6*k12_r_r6*k14_r_r6*k16_r_r6*k19_r_r6 + k02_r_r6*k04_r_r6*k06_r_r6*k09_r_r6*k12_r_r6*k14_r_r6*k17_r_r6*k19_r_r6 + k02_r_r6*k04_r_r6*k07_r_r6*k09_r_r6*k12_r_r6*k14_r_r6*k16_r_r6*k19_r_r6 + k02_r_r6*k04_r_r6*k06_r_r6*k09_r_r6*k12_r_r6*k15_r_r6*k17_r_r6*k19_r_r6 + k02_r_r6*k04_r_r6*k07_r_r6*k09_r_r6*k12_r_r6*k14_r_r6*k17_r_r6*k19_r_r6 + k02_r_r6*k05_r_r6*k07_r_r6*k09_r_r6*k12_r_r6*k14_r_r6*k16_r_r6*k19_r_r6 + k02_r_r6*k04_r_r6*k07_r_r6*k09_r_r6*k12_r_r6*k15_r_r6*k17_r_r6*k19_r_r6 + k02_r_r6*k05_r_r6*k07_r_r6*k09_r_r6*k12_r_r6*k14_r_r6*k17_r_r6*k19_r_r6 + k02_r_r6*k05_r_r6*k07_r_r6*k09_r_r6*k12_r_r6*k15_r_r6*k17_r_r6*k19_r_r6 + k01_r_r6*k04_r_r6*k06_r_r6*k09_r_r6*k12_r_r6*k14_r_r6*k16_r_r6*k19_r_r6*m_m1 + k02_r_r6*k04_r_r6*k06_r_r6*k09_r_r6*k11_r_r6*k14_r_r6*k16_r_r6*k19_r_r6*m_m1 + k01_r_r6*k04_r_r6*k06_r_r6*k09_r_r6*k12_r_r6*k14_r_r6*k17_r_r6*k19_r_r6*m_m1 + k01_r_r6*k04_r_r6*k07_r_r6*k09_r_r6*k12_r_r6*k14_r_r6*k16_r_r6*k19_r_r6*m_m1 + k02_r_r6*k04_r_r6*k06_r_r6*k09_r_r6*k11_r_r6*k14_r_r6*k17_r_r6*k19_r_r6*m_m1 + k02_r_r6*k04_r_r6*k07_r_r6*k09_r_r6*k11_r_r6*k14_r_r6*k16_r_r6*k19_r_r6*m_m1 + k01_r_r6*k04_r_r6*k06_r_r6*k09_r_r6*k12_r_r6*k15_r_r6*k17_r_r6*k19_r_r6*m_m1 + k01_r_r6*k04_r_r6*k07_r_r6*k09_r_r6*k12_r_r6*k14_r_r6*k17_r_r6*k19_r_r6*m_m1 + k01_r_r6*k05_r_r6*k07_r_r6*k09_r_r6*k12_r_r6*k14_r_r6*k16_r_r6*k19_r_r6*m_m1 + k02_r_r6*k04_r_r6*k06_r_r6*k09_r_r6*k11_r_r6*k15_r_r6*k17_r_r6*k19_r_r6*m_m1 + k02_r_r6*k04_r_r6*k07_r_r6*k09_r_r6*k11_r_r6*k14_r_r6*k17_r_r6*k19_r_r6*m_m1 + k02_r_r6*k05_r_r6*k07_r_r6*k09_r_r6*k11_r_r6*k14_r_r6*k16_r_r6*k19_r_r6*m_m1 + k01_r_r6*k04_r_r6*k07_r_r6*k09_r_r6*k12_r_r6*k15_r_r6*k17_r_r6*k19_r_r6*m_m1 + k01_r_r6*k05_r_r6*k07_r_r6*k09_r_r6*k12_r_r6*k14_r_r6*k17_r_r6*k19_r_r6*m_m1 + k02_r_r6*k04_r_r6*k07_r_r6*k09_r_r6*k11_r_r6*k15_r_r6*k17_r_r6*k19_r_r6*m_m1 + k02_r_r6*k05_r_r6*k07_r_r6*k09_r_r6*k11_r_r6*k14_r_r6*k17_r_r6*k19_r_r6*m_m1 + k01_r_r6*k05_r_r6*k07_r_r6*k09_r_r6*k12_r_r6*k15_r_r6*k17_r_r6*k19_r_r6*m_m1 + k02_r_r6*k05_r_r6*k07_r_r6*k09_r_r6*k11_r_r6*k15_r_r6*k17_r_r6*k19_r_r6*m_m1 + k02_r_r6*k04_r_r6*k06_r_r6*k08_r_r6*k12_r_r6*k14_r_r6*k16_r_r6*k19_r_r6*m_m8 + k02_r_r6*k04_r_r6*k06_r_r6*k08_r_r6*k12_r_r6*k14_r_r6*k17_r_r6*k19_r_r6*m_m8 + k02_r_r6*k04_r_r6*k06_r_r6*k08_r_r6*k12_r_r6*k15_r_r6*k17_r_r6*k19_r_r6*m_m8 + k02_r_r6*k04_r_r6*k06_r_r6*k09_r_r6*k12_r_r6*k14_r_r6*k16_r_r6*k18_r_r6*m_m11 + k03_r_r6*k05_r_r6*k07_r_r6*k09_r_r6*k12_r_r6*k14_r_r6*k16_r_r6*k19_r_r6*m_m7 + k02_r_r6*k04_r_r6*k07_r_r6*k09_r_r6*k12_r_r6*k14_r_r6*k16_r_r6*k18_r_r6*m_m11 + k03_r_r6*k05_r_r6*k07_r_r6*k09_r_r6*k12_r_r6*k14_r_r6*k17_r_r6*k19_r_r6*m_m7 + k02_r_r6*k05_r_r6*k07_r_r6*k09_r_r6*k12_r_r6*k14_r_r6*k16_r_r6*k18_r_r6*m_m11 + k03_r_r6*k05_r_r6*k07_r_r6*k09_r_r6*k12_r_r6*k15_r_r6*k17_r_r6*k19_r_r6*m_m7 + k02_r_r6*k04_r_r6*k06_r_r6*k09_r_r6*k12_r_r6*k14_r_r6*k16_r_r6*k20_r_r6*m_m12 + k02_r_r6*k04_r_r6*k06_r_r6*k09_r_r6*k13_r_r6*k15_r_r6*k17_r_r6*k19_r_r6*m_m10 + k02_r_r6*k04_r_r6*k06_r_r6*k10_r_r6*k12_r_r6*k14_r_r6*k16_r_r6*k19_r_r6*m_m12 + k02_r_r6*k04_r_r6*k06_r_r6*k09_r_r6*k12_r_r6*k14_r_r6*k17_r_r6*k20_r_r6*m_m12 + k02_r_r6*k04_r_r6*k06_r_r6*k10_r_r6*k12_r_r6*k14_r_r6*k17_r_r6*k19_r_r6*m_m12 + k02_r_r6*k04_r_r6*k07_r_r6*k09_r_r6*k12_r_r6*k14_r_r6*k16_r_r6*k20_r_r6*m_m12 + k02_r_r6*k04_r_r6*k07_r_r6*k09_r_r6*k13_r_r6*k15_r_r6*k17_r_r6*k19_r_r6*m_m10 + k02_r_r6*k04_r_r6*k07_r_r6*k10_r_r6*k12_r_r6*k14_r_r6*k16_r_r6*k19_r_r6*m_m12 + k02_r_r6*k04_r_r6*k06_r_r6*k09_r_r6*k12_r_r6*k15_r_r6*k17_r_r6*k20_r_r6*m_m12 + k02_r_r6*k04_r_r6*k06_r_r6*k10_r_r6*k12_r_r6*k15_r_r6*k17_r_r6*k19_r_r6*m_m12 + k02_r_r6*k04_r_r6*k07_r_r6*k09_r_r6*k12_r_r6*k14_r_r6*k17_r_r6*k20_r_r6*m_m12 + k02_r_r6*k04_r_r6*k07_r_r6*k10_r_r6*k12_r_r6*k14_r_r6*k17_r_r6*k19_r_r6*m_m12 + k02_r_r6*k05_r_r6*k07_r_r6*k09_r_r6*k12_r_r6*k14_r_r6*k16_r_r6*k20_r_r6*m_m12 + k02_r_r6*k05_r_r6*k07_r_r6*k09_r_r6*k13_r_r6*k15_r_r6*k17_r_r6*k19_r_r6*m_m10 + k02_r_r6*k05_r_r6*k07_r_r6*k10_r_r6*k12_r_r6*k14_r_r6*k16_r_r6*k19_r_r6*m_m12 + k02_r_r6*k04_r_r6*k07_r_r6*k09_r_r6*k12_r_r6*k15_r_r6*k17_r_r6*k20_r_r6*m_m12 + k02_r_r6*k04_r_r6*k07_r_r6*k10_r_r6*k12_r_r6*k15_r_r6*k17_r_r6*k19_r_r6*m_m12 + k02_r_r6*k05_r_r6*k07_r_r6*k09_r_r6*k12_r_r6*k14_r_r6*k17_r_r6*k20_r_r6*m_m12 + k02_r_r6*k05_r_r6*k07_r_r6*k10_r_r6*k12_r_r6*k14_r_r6*k17_r_r6*k19_r_r6*m_m12 + k02_r_r6*k05_r_r6*k07_r_r6*k09_r_r6*k12_r_r6*k15_r_r6*k17_r_r6*k20_r_r6*m_m12 + k02_r_r6*k05_r_r6*k07_r_r6*k10_r_r6*k12_r_r6*k15_r_r6*k17_r_r6*k19_r_r6*m_m12 + k01_r_r6*k03_r_r6*k05_r_r6*k07_r_r6*k12_r_r6*k14_r_r6*k16_r_r6*k19_r_r6*m_m1*m_m7 + k01_r_r6*k03_r_r6*k05_r_r6*k07_r_r6*k12_r_r6*k14_r_r6*k17_r_r6*k19_r_r6*m_m1*m_m7 + k01_r_r6*k03_r_r6*k05_r_r6*k07_r_r6*k12_r_r6*k15_r_r6*k17_r_r6*k19_r_r6*m_m1*m_m7 + k01_r_r6*k03_r_r6*k05_r_r6*k09_r_r6*k12_r_r6*k14_r_r6*k16_r_r6*k19_r_r6*m_m1*m_m7 + k01_r_r6*k03_r_r6*k05_r_r6*k09_r_r6*k12_r_r6*k14_r_r6*k17_r_r6*k19_r_r6*m_m1*m_m7 + k01_r_r6*k03_r_r6*k06_r_r6*k09_r_r6*k12_r_r6*k14_r_r6*k16_r_r6*k19_r_r6*m_m1*m_m7 + k02_r_r6*k04_r_r6*k06_r_r6*k09_r_r6*k11_r_r6*k13_r_r6*k15_r_r6*k17_r_r6*m_m1*m_m10 + k01_r_r6*k03_r_r6*k05_r_r6*k09_r_r6*k12_r_r6*k15_r_r6*k17_r_r6*k19_r_r6*m_m1*m_m7 + k01_r_r6*k03_r_r6*k06_r_r6*k09_r_r6*k12_r_r6*k14_r_r6*k17_r_r6*k19_r_r6*m_m1*m_m7 + k01_r_r6*k03_r_r6*k07_r_r6*k09_r_r6*k12_r_r6*k14_r_r6*k16_r_r6*k19_r_r6*m_m1*m_m7 + k01_r_r6*k04_r_r6*k06_r_r6*k08_r_r6*k12_r_r6*k14_r_r6*k16_r_r6*k19_r_r6*m_m1*m_m8 + k02_r_r6*k04_r_r6*k06_r_r6*k08_r_r6*k11_r_r6*k14_r_r6*k16_r_r6*k19_r_r6*m_m1*m_m8 + k02_r_r6*k04_r_r6*k07_r_r6*k09_r_r6*k11_r_r6*k13_r_r6*k15_r_r6*k17_r_r6*m_m1*m_m10 + k01_r_r6*k03_r_r6*k06_r_r6*k09_r_r6*k12_r_r6*k15_r_r6*k17_r_r6*k19_r_r6*m_m1*m_m7 + k01_r_r6*k03_r_r6*k07_r_r6*k09_r_r6*k12_r_r6*k14_r_r6*k17_r_r6*k19_r_r6*m_m1*m_m7 + k01_r_r6*k04_r_r6*k06_r_r6*k08_r_r6*k12_r_r6*k14_r_r6*k17_r_r6*k19_r_r6*m_m1*m_m8 + k02_r_r6*k04_r_r6*k06_r_r6*k08_r_r6*k11_r_r6*k14_r_r6*k17_r_r6*k19_r_r6*m_m1*m_m8 + k02_r_r6*k04_r_r6*k06_r_r6*k09_r_r6*k11_r_r6*k13_r_r6*k15_r_r6*k19_r_r6*m_m1*m_m10 + k02_r_r6*k05_r_r6*k07_r_r6*k09_r_r6*k11_r_r6*k13_r_r6*k15_r_r6*k17_r_r6*m_m1*m_m10 + k01_r_r6*k03_r_r6*k07_r_r6*k09_r_r6*k12_r_r6*k15_r_r6*k17_r_r6*k19_r_r6*m_m1*m_m7 + k01_r_r6*k04_r_r6*k06_r_r6*k08_r_r6*k12_r_r6*k15_r_r6*k17_r_r6*k19_r_r6*m_m1*m_m8 + k02_r_r6*k04_r_r6*k06_r_r6*k08_r_r6*k11_r_r6*k15_r_r6*k17_r_r6*k19_r_r6*m_m1*m_m8 + k02_r_r6*k04_r_r6*k06_r_r6*k09_r_r6*k11_r_r6*k13_r_r6*k16_r_r6*k19_r_r6*m_m1*m_m10 + k02_r_r6*k04_r_r6*k07_r_r6*k09_r_r6*k11_r_r6*k13_r_r6*k15_r_r6*k19_r_r6*m_m1*m_m10 + k01_r_r6*k04_r_r6*k06_r_r6*k09_r_r6*k12_r_r6*k14_r_r6*k16_r_r6*k18_r_r6*m_m1*m_m11 + k02_r_r6*k04_r_r6*k06_r_r6*k09_r_r6*k11_r_r6*k13_r_r6*k17_r_r6*k19_r_r6*m_m1*m_m10 + k02_r_r6*k04_r_r6*k06_r_r6*k09_r_r6*k11_r_r6*k14_r_r6*k16_r_r6*k18_r_r6*m_m1*m_m11 + k02_r_r6*k04_r_r6*k07_r_r6*k09_r_r6*k11_r_r6*k13_r_r6*k16_r_r6*k19_r_r6*m_m1*m_m10 + k02_r_r6*k05_r_r6*k07_r_r6*k09_r_r6*k11_r_r6*k13_r_r6*k15_r_r6*k19_r_r6*m_m1*m_m10 + k03_r_r6*k05_r_r6*k07_r_r6*k09_r_r6*k11_r_r6*k14_r_r6*k16_r_r6*k19_r_r6*m_m1*m_m7 + k01_r_r6*k04_r_r6*k07_r_r6*k09_r_r6*k12_r_r6*k14_r_r6*k16_r_r6*k18_r_r6*m_m1*m_m11 + k02_r_r6*k04_r_r6*k07_r_r6*k09_r_r6*k11_r_r6*k13_r_r6*k17_r_r6*k19_r_r6*m_m1*m_m10 + k02_r_r6*k04_r_r6*k07_r_r6*k09_r_r6*k11_r_r6*k14_r_r6*k16_r_r6*k18_r_r6*m_m1*m_m11 + k02_r_r6*k05_r_r6*k07_r_r6*k09_r_r6*k11_r_r6*k13_r_r6*k16_r_r6*k19_r_r6*m_m1*m_m10 + k03_r_r6*k05_r_r6*k07_r_r6*k09_r_r6*k11_r_r6*k14_r_r6*k17_r_r6*k19_r_r6*m_m1*m_m7 + k01_r_r6*k05_r_r6*k07_r_r6*k09_r_r6*k12_r_r6*k14_r_r6*k16_r_r6*k18_r_r6*m_m1*m_m11 + k02_r_r6*k05_r_r6*k07_r_r6*k09_r_r6*k11_r_r6*k13_r_r6*k17_r_r6*k19_r_r6*m_m1*m_m10 + k02_r_r6*k05_r_r6*k07_r_r6*k09_r_r6*k11_r_r6*k14_r_r6*k16_r_r6*k18_r_r6*m_m1*m_m11 + k03_r_r6*k05_r_r6*k07_r_r6*k09_r_r6*k11_r_r6*k15_r_r6*k17_r_r6*k19_r_r6*m_m1*m_m7 + k01_r_r6*k04_r_r6*k06_r_r6*k09_r_r6*k13_r_r6*k15_r_r6*k17_r_r6*k19_r_r6*m_m1*m_m10 + k01_r_r6*k04_r_r6*k07_r_r6*k09_r_r6*k13_r_r6*k15_r_r6*k17_r_r6*k19_r_r6*m_m1*m_m10 + k01_r_r6*k05_r_r6*k07_r_r6*k09_r_r6*k13_r_r6*k15_r_r6*k17_r_r6*k19_r_r6*m_m1*m_m10 + k02_r_r6*k04_r_r6*k06_r_r6*k08_r_r6*k12_r_r6*k14_r_r6*k16_r_r6*k18_r_r6*m_m8*m_m11 + k02_r_r6*k04_r_r6*k06_r_r6*k08_r_r6*k12_r_r6*k14_r_r6*k16_r_r6*k20_r_r6*m_m8*m_m12 + k02_r_r6*k04_r_r6*k06_r_r6*k08_r_r6*k13_r_r6*k15_r_r6*k17_r_r6*k19_r_r6*m_m8*m_m10 + k03_r_r6*k05_r_r6*k07_r_r6*k09_r_r6*k12_r_r6*k14_r_r6*k16_r_r6*k18_r_r6*m_m7*m_m11 + k02_r_r6*k04_r_r6*k06_r_r6*k08_r_r6*k12_r_r6*k14_r_r6*k17_r_r6*k20_r_r6*m_m8*m_m12 + k02_r_r6*k04_r_r6*k06_r_r6*k08_r_r6*k12_r_r6*k15_r_r6*k17_r_r6*k20_r_r6*m_m8*m_m12 + k02_r_r6*k04_r_r6*k06_r_r6*k10_r_r6*k12_r_r6*k14_r_r6*k16_r_r6*k18_r_r6*m_m11*m_m12 + k02_r_r6*k04_r_r6*k08_r_r6*k10_r_r6*k12_r_r6*k14_r_r6*k16_r_r6*k19_r_r6*m_m8*m_m12 + k03_r_r6*k05_r_r6*k07_r_r6*k09_r_r6*k12_r_r6*k14_r_r6*k16_r_r6*k20_r_r6*m_m7*m_m12 + k03_r_r6*k05_r_r6*k07_r_r6*k09_r_r6*k13_r_r6*k15_r_r6*k17_r_r6*k19_r_r6*m_m7*m_m10 + k03_r_r6*k05_r_r6*k07_r_r6*k10_r_r6*k12_r_r6*k14_r_r6*k16_r_r6*k19_r_r6*m_m7*m_m12 + k02_r_r6*k04_r_r6*k07_r_r6*k10_r_r6*k12_r_r6*k14_r_r6*k16_r_r6*k18_r_r6*m_m11*m_m12 + k02_r_r6*k04_r_r6*k08_r_r6*k10_r_r6*k12_r_r6*k14_r_r6*k17_r_r6*k19_r_r6*m_m8*m_m12 + k02_r_r6*k05_r_r6*k08_r_r6*k10_r_r6*k12_r_r6*k14_r_r6*k16_r_r6*k19_r_r6*m_m8*m_m12 + k03_r_r6*k05_r_r6*k07_r_r6*k09_r_r6*k12_r_r6*k14_r_r6*k17_r_r6*k20_r_r6*m_m7*m_m12 + k03_r_r6*k05_r_r6*k07_r_r6*k10_r_r6*k12_r_r6*k14_r_r6*k17_r_r6*k19_r_r6*m_m7*m_m12 + k02_r_r6*k04_r_r6*k08_r_r6*k10_r_r6*k12_r_r6*k15_r_r6*k17_r_r6*k19_r_r6*m_m8*m_m12 + k02_r_r6*k05_r_r6*k07_r_r6*k10_r_r6*k12_r_r6*k14_r_r6*k16_r_r6*k18_r_r6*m_m11*m_m12 + k02_r_r6*k05_r_r6*k08_r_r6*k10_r_r6*k12_r_r6*k14_r_r6*k17_r_r6*k19_r_r6*m_m8*m_m12 + k02_r_r6*k06_r_r6*k08_r_r6*k10_r_r6*k12_r_r6*k14_r_r6*k16_r_r6*k19_r_r6*m_m8*m_m12 + k03_r_r6*k05_r_r6*k07_r_r6*k09_r_r6*k12_r_r6*k15_r_r6*k17_r_r6*k20_r_r6*m_m7*m_m12 + k03_r_r6*k05_r_r6*k07_r_r6*k10_r_r6*k12_r_r6*k15_r_r6*k17_r_r6*k19_r_r6*m_m7*m_m12 + k02_r_r6*k04_r_r6*k06_r_r6*k09_r_r6*k12_r_r6*k14_r_r6*k18_r_r6*k20_r_r6*m_m11*m_m12 + k02_r_r6*k04_r_r6*k06_r_r6*k09_r_r6*k13_r_r6*k15_r_r6*k17_r_r6*k20_r_r6*m_m10*m_m12 + k02_r_r6*k04_r_r6*k06_r_r6*k10_r_r6*k13_r_r6*k15_r_r6*k17_r_r6*k19_r_r6*m_m10*m_m12 + k02_r_r6*k05_r_r6*k08_r_r6*k10_r_r6*k12_r_r6*k15_r_r6*k17_r_r6*k19_r_r6*m_m8*m_m12 + k02_r_r6*k06_r_r6*k08_r_r6*k10_r_r6*k12_r_r6*k14_r_r6*k17_r_r6*k19_r_r6*m_m8*m_m12 + k02_r_r6*k04_r_r6*k06_r_r6*k09_r_r6*k12_r_r6*k15_r_r6*k18_r_r6*k20_r_r6*m_m11*m_m12 + k02_r_r6*k04_r_r6*k07_r_r6*k09_r_r6*k12_r_r6*k14_r_r6*k18_r_r6*k20_r_r6*m_m11*m_m12 + k02_r_r6*k04_r_r6*k07_r_r6*k09_r_r6*k13_r_r6*k15_r_r6*k17_r_r6*k20_r_r6*m_m10*m_m12 + k02_r_r6*k04_r_r6*k07_r_r6*k10_r_r6*k13_r_r6*k15_r_r6*k17_r_r6*k19_r_r6*m_m10*m_m12 + k02_r_r6*k06_r_r6*k08_r_r6*k10_r_r6*k12_r_r6*k15_r_r6*k17_r_r6*k19_r_r6*m_m8*m_m12 + k04_r_r6*k06_r_r6*k08_r_r6*k10_r_r6*k12_r_r6*k14_r_r6*k16_r_r6*k19_r_r6*m_m8*m_m12 + k02_r_r6*k04_r_r6*k06_r_r6*k09_r_r6*k12_r_r6*k16_r_r6*k18_r_r6*k20_r_r6*m_m11*m_m12 + k02_r_r6*k04_r_r6*k07_r_r6*k09_r_r6*k12_r_r6*k15_r_r6*k18_r_r6*k20_r_r6*m_m11*m_m12 + k02_r_r6*k05_r_r6*k07_r_r6*k09_r_r6*k12_r_r6*k14_r_r6*k18_r_r6*k20_r_r6*m_m11*m_m12 + k02_r_r6*k05_r_r6*k07_r_r6*k09_r_r6*k13_r_r6*k15_r_r6*k17_r_r6*k20_r_r6*m_m10*m_m12 + k02_r_r6*k05_r_r6*k07_r_r6*k10_r_r6*k13_r_r6*k15_r_r6*k17_r_r6*k19_r_r6*m_m10*m_m12 + k04_r_r6*k06_r_r6*k08_r_r6*k10_r_r6*k12_r_r6*k14_r_r6*k17_r_r6*k19_r_r6*m_m8*m_m12 + k02_r_r6*k04_r_r6*k07_r_r6*k09_r_r6*k12_r_r6*k16_r_r6*k18_r_r6*k20_r_r6*m_m11*m_m12 + k02_r_r6*k05_r_r6*k07_r_r6*k09_r_r6*k12_r_r6*k15_r_r6*k18_r_r6*k20_r_r6*m_m11*m_m12 + k04_r_r6*k06_r_r6*k08_r_r6*k10_r_r6*k12_r_r6*k15_r_r6*k17_r_r6*k19_r_r6*m_m8*m_m12 + k02_r_r6*k04_r_r6*k06_r_r6*k09_r_r6*k14_r_r6*k16_r_r6*k18_r_r6*k20_r_r6*m_m11*m_m12 + k02_r_r6*k05_r_r6*k07_r_r6*k09_r_r6*k12_r_r6*k16_r_r6*k18_r_r6*k20_r_r6*m_m11*m_m12 + k02_r_r6*k04_r_r6*k07_r_r6*k09_r_r6*k14_r_r6*k16_r_r6*k18_r_r6*k20_r_r6*m_m11*m_m12 + k02_r_r6*k05_r_r6*k07_r_r6*k09_r_r6*k14_r_r6*k16_r_r6*k18_r_r6*k20_r_r6*m_m11*m_m12 + k01_r_r6*k03_r_r6*k05_r_r6*k08_r_r6*k12_r_r6*k14_r_r6*k16_r_r6*k19_r_r6*m_m1*m_m7*m_m8 + k01_r_r6*k03_r_r6*k05_r_r6*k07_r_r6*k12_r_r6*k14_r_r6*k16_r_r6*k18_r_r6*m_m1*m_m7*m_m11 + k01_r_r6*k03_r_r6*k05_r_r6*k08_r_r6*k12_r_r6*k14_r_r6*k17_r_r6*k19_r_r6*m_m1*m_m7*m_m8 + k01_r_r6*k03_r_r6*k06_r_r6*k08_r_r6*k12_r_r6*k14_r_r6*k16_r_r6*k19_r_r6*m_m1*m_m7*m_m8 + k02_r_r6*k04_r_r6*k06_r_r6*k08_r_r6*k11_r_r6*k13_r_r6*k15_r_r6*k17_r_r6*m_m1*m_m8*m_m10 + k01_r_r6*k03_r_r6*k05_r_r6*k08_r_r6*k12_r_r6*k15_r_r6*k17_r_r6*k19_r_r6*m_m1*m_m7*m_m8 + k01_r_r6*k03_r_r6*k06_r_r6*k08_r_r6*k12_r_r6*k14_r_r6*k17_r_r6*k19_r_r6*m_m1*m_m7*m_m8 + k01_r_r6*k03_r_r6*k05_r_r6*k09_r_r6*k12_r_r6*k14_r_r6*k16_r_r6*k18_r_r6*m_m1*m_m7*m_m11 + k01_r_r6*k03_r_r6*k06_r_r6*k08_r_r6*k12_r_r6*k15_r_r6*k17_r_r6*k19_r_r6*m_m1*m_m7*m_m8 + k02_r_r6*k04_r_r6*k06_r_r6*k08_r_r6*k11_r_r6*k13_r_r6*k15_r_r6*k19_r_r6*m_m1*m_m8*m_m10 + k01_r_r6*k03_r_r6*k05_r_r6*k07_r_r6*k13_r_r6*k15_r_r6*k17_r_r6*k19_r_r6*m_m1*m_m7*m_m10 + k01_r_r6*k03_r_r6*k06_r_r6*k09_r_r6*k12_r_r6*k14_r_r6*k16_r_r6*k18_r_r6*m_m1*m_m7*m_m11 + k02_r_r6*k04_r_r6*k06_r_r6*k08_r_r6*k11_r_r6*k13_r_r6*k16_r_r6*k19_r_r6*m_m1*m_m8*m_m10 + k03_r_r6*k05_r_r6*k07_r_r6*k09_r_r6*k11_r_r6*k13_r_r6*k15_r_r6*k17_r_r6*m_m1*m_m7*m_m10 + k01_r_r6*k03_r_r6*k07_r_r6*k09_r_r6*k12_r_r6*k14_r_r6*k16_r_r6*k18_r_r6*m_m1*m_m7*m_m11 + k01_r_r6*k04_r_r6*k06_r_r6*k08_r_r6*k12_r_r6*k14_r_r6*k16_r_r6*k18_r_r6*m_m1*m_m8*m_m11 + k02_r_r6*k04_r_r6*k06_r_r6*k08_r_r6*k11_r_r6*k13_r_r6*k17_r_r6*k19_r_r6*m_m1*m_m8*m_m10 + k02_r_r6*k04_r_r6*k06_r_r6*k08_r_r6*k11_r_r6*k14_r_r6*k16_r_r6*k18_r_r6*m_m1*m_m8*m_m11 + k01_r_r6*k03_r_r6*k05_r_r6*k09_r_r6*k13_r_r6*k15_r_r6*k17_r_r6*k19_r_r6*m_m1*m_m7*m_m10 + k02_r_r6*k04_r_r6*k06_r_r6*k09_r_r6*k11_r_r6*k13_r_r6*k15_r_r6*k18_r_r6*m_m1*m_m10*m_m11 + k03_r_r6*k05_r_r6*k07_r_r6*k09_r_r6*k11_r_r6*k13_r_r6*k15_r_r6*k19_r_r6*m_m1*m_m7*m_m10 + k01_r_r6*k03_r_r6*k06_r_r6*k09_r_r6*k13_r_r6*k15_r_r6*k17_r_r6*k19_r_r6*m_m1*m_m7*m_m10 + k02_r_r6*k04_r_r6*k06_r_r6*k09_r_r6*k11_r_r6*k13_r_r6*k16_r_r6*k18_r_r6*m_m1*m_m10*m_m11 + k02_r_r6*k04_r_r6*k07_r_r6*k09_r_r6*k11_r_r6*k13_r_r6*k15_r_r6*k18_r_r6*m_m1*m_m10*m_m11 + k03_r_r6*k05_r_r6*k07_r_r6*k09_r_r6*k11_r_r6*k13_r_r6*k16_r_r6*k19_r_r6*m_m1*m_m7*m_m10 + k01_r_r6*k03_r_r6*k07_r_r6*k09_r_r6*k13_r_r6*k15_r_r6*k17_r_r6*k19_r_r6*m_m1*m_m7*m_m10 + k01_r_r6*k04_r_r6*k06_r_r6*k08_r_r6*k13_r_r6*k15_r_r6*k17_r_r6*k19_r_r6*m_m1*m_m8*m_m10 + k02_r_r6*k04_r_r6*k07_r_r6*k09_r_r6*k11_r_r6*k13_r_r6*k16_r_r6*k18_r_r6*m_m1*m_m10*m_m11 + k02_r_r6*k05_r_r6*k07_r_r6*k09_r_r6*k11_r_r6*k13_r_r6*k15_r_r6*k18_r_r6*m_m1*m_m10*m_m11 + k03_r_r6*k05_r_r6*k07_r_r6*k09_r_r6*k11_r_r6*k13_r_r6*k17_r_r6*k19_r_r6*m_m1*m_m7*m_m10 + k03_r_r6*k05_r_r6*k07_r_r6*k09_r_r6*k11_r_r6*k14_r_r6*k16_r_r6*k18_r_r6*m_m1*m_m7*m_m11 + k02_r_r6*k05_r_r6*k07_r_r6*k09_r_r6*k11_r_r6*k13_r_r6*k16_r_r6*k18_r_r6*m_m1*m_m10*m_m11 + k03_r_r6*k05_r_r6*k08_r_r6*k10_r_r6*k12_r_r6*k14_r_r6*k16_r_r6*k19_r_r6*m_m7*m_m8*m_m12 + k02_r_r6*k04_r_r6*k06_r_r6*k08_r_r6*k12_r_r6*k14_r_r6*k18_r_r6*k20_r_r6*m_m8*m_m11*m_m12 + k02_r_r6*k04_r_r6*k06_r_r6*k08_r_r6*k13_r_r6*k15_r_r6*k17_r_r6*k20_r_r6*m_m8*m_m10*m_m12 + k02_r_r6*k04_r_r6*k08_r_r6*k10_r_r6*k12_r_r6*k14_r_r6*k16_r_r6*k18_r_r6*m_m8*m_m11*m_m12 + k03_r_r6*k05_r_r6*k07_r_r6*k10_r_r6*k12_r_r6*k14_r_r6*k16_r_r6*k18_r_r6*m_m7*m_m11*m_m12 + k03_r_r6*k05_r_r6*k08_r_r6*k10_r_r6*k12_r_r6*k14_r_r6*k17_r_r6*k19_r_r6*m_m7*m_m8*m_m12 + k03_r_r6*k06_r_r6*k08_r_r6*k10_r_r6*k12_r_r6*k14_r_r6*k16_r_r6*k19_r_r6*m_m7*m_m8*m_m12 + k02_r_r6*k04_r_r6*k06_r_r6*k08_r_r6*k12_r_r6*k15_r_r6*k18_r_r6*k20_r_r6*m_m8*m_m11*m_m12 + k02_r_r6*k05_r_r6*k08_r_r6*k10_r_r6*k12_r_r6*k14_r_r6*k16_r_r6*k18_r_r6*m_m8*m_m11*m_m12 + k03_r_r6*k05_r_r6*k08_r_r6*k10_r_r6*k12_r_r6*k15_r_r6*k17_r_r6*k19_r_r6*m_m7*m_m8*m_m12 + k03_r_r6*k06_r_r6*k08_r_r6*k10_r_r6*k12_r_r6*k14_r_r6*k17_r_r6*k19_r_r6*m_m7*m_m8*m_m12 + k02_r_r6*k04_r_r6*k06_r_r6*k08_r_r6*k12_r_r6*k16_r_r6*k18_r_r6*k20_r_r6*m_m8*m_m11*m_m12 + k02_r_r6*k06_r_r6*k08_r_r6*k10_r_r6*k12_r_r6*k14_r_r6*k16_r_r6*k18_r_r6*m_m8*m_m11*m_m12 + k03_r_r6*k06_r_r6*k08_r_r6*k10_r_r6*k12_r_r6*k15_r_r6*k17_r_r6*k19_r_r6*m_m7*m_m8*m_m12 + k02_r_r6*k04_r_r6*k08_r_r6*k10_r_r6*k13_r_r6*k15_r_r6*k17_r_r6*k19_r_r6*m_m8*m_m10*m_m12 + k03_r_r6*k05_r_r6*k07_r_r6*k09_r_r6*k12_r_r6*k14_r_r6*k18_r_r6*k20_r_r6*m_m7*m_m11*m_m12 + k03_r_r6*k05_r_r6*k07_r_r6*k09_r_r6*k13_r_r6*k15_r_r6*k17_r_r6*k20_r_r6*m_m7*m_m10*m_m12 + k03_r_r6*k05_r_r6*k07_r_r6*k10_r_r6*k13_r_r6*k15_r_r6*k17_r_r6*k19_r_r6*m_m7*m_m10*m_m12 + k02_r_r6*k04_r_r6*k06_r_r6*k08_r_r6*k14_r_r6*k16_r_r6*k18_r_r6*k20_r_r6*m_m8*m_m11*m_m12 + k02_r_r6*k05_r_r6*k08_r_r6*k10_r_r6*k13_r_r6*k15_r_r6*k17_r_r6*k19_r_r6*m_m8*m_m10*m_m12 + k03_r_r6*k05_r_r6*k07_r_r6*k09_r_r6*k12_r_r6*k15_r_r6*k18_r_r6*k20_r_r6*m_m7*m_m11*m_m12 + k04_r_r6*k06_r_r6*k08_r_r6*k10_r_r6*k12_r_r6*k14_r_r6*k16_r_r6*k18_r_r6*m_m8*m_m11*m_m12 + k02_r_r6*k04_r_r6*k06_r_r6*k09_r_r6*k13_r_r6*k15_r_r6*k18_r_r6*k20_r_r6*m_m10*m_m11*m_m12 + k02_r_r6*k06_r_r6*k08_r_r6*k10_r_r6*k13_r_r6*k15_r_r6*k17_r_r6*k19_r_r6*m_m8*m_m10*m_m12 + k03_r_r6*k05_r_r6*k07_r_r6*k09_r_r6*k12_r_r6*k16_r_r6*k18_r_r6*k20_r_r6*m_m7*m_m11*m_m12 + k02_r_r6*k04_r_r6*k06_r_r6*k09_r_r6*k13_r_r6*k16_r_r6*k18_r_r6*k20_r_r6*m_m10*m_m11*m_m12 + k02_r_r6*k04_r_r6*k07_r_r6*k09_r_r6*k13_r_r6*k15_r_r6*k18_r_r6*k20_r_r6*m_m10*m_m11*m_m12 + k02_r_r6*k04_r_r6*k07_r_r6*k09_r_r6*k13_r_r6*k16_r_r6*k18_r_r6*k20_r_r6*m_m10*m_m11*m_m12 + k02_r_r6*k05_r_r6*k07_r_r6*k09_r_r6*k13_r_r6*k15_r_r6*k18_r_r6*k20_r_r6*m_m10*m_m11*m_m12 + k03_r_r6*k05_r_r6*k07_r_r6*k09_r_r6*k14_r_r6*k16_r_r6*k18_r_r6*k20_r_r6*m_m7*m_m11*m_m12 + k04_r_r6*k06_r_r6*k08_r_r6*k10_r_r6*k13_r_r6*k15_r_r6*k17_r_r6*k19_r_r6*m_m8*m_m10*m_m12 + k02_r_r6*k05_r_r6*k07_r_r6*k09_r_r6*k13_r_r6*k16_r_r6*k18_r_r6*k20_r_r6*m_m10*m_m11*m_m12 + k01_r_r6*k03_r_r6*k05_r_r6*k08_r_r6*k12_r_r6*k14_r_r6*k16_r_r6*k18_r_r6*m_m1*m_m7*m_m8*m_m11 + k01_r_r6*k03_r_r6*k06_r_r6*k08_r_r6*k12_r_r6*k14_r_r6*k16_r_r6*k18_r_r6*m_m1*m_m7*m_m8*m_m11 + k01_r_r6*k03_r_r6*k05_r_r6*k08_r_r6*k13_r_r6*k15_r_r6*k17_r_r6*k19_r_r6*m_m1*m_m7*m_m8*m_m10 + k02_r_r6*k04_r_r6*k06_r_r6*k08_r_r6*k11_r_r6*k13_r_r6*k15_r_r6*k18_r_r6*m_m1*m_m8*m_m10*m_m11 + k01_r_r6*k03_r_r6*k06_r_r6*k08_r_r6*k13_r_r6*k15_r_r6*k17_r_r6*k19_r_r6*m_m1*m_m7*m_m8*m_m10 + k02_r_r6*k04_r_r6*k06_r_r6*k08_r_r6*k11_r_r6*k13_r_r6*k16_r_r6*k18_r_r6*m_m1*m_m8*m_m10*m_m11 + k03_r_r6*k05_r_r6*k07_r_r6*k09_r_r6*k11_r_r6*k13_r_r6*k15_r_r6*k18_r_r6*m_m1*m_m7*m_m10*m_m11 + k03_r_r6*k05_r_r6*k07_r_r6*k09_r_r6*k11_r_r6*k13_r_r6*k16_r_r6*k18_r_r6*m_m1*m_m7*m_m10*m_m11 + k03_r_r6*k05_r_r6*k08_r_r6*k10_r_r6*k12_r_r6*k14_r_r6*k16_r_r6*k18_r_r6*m_m7*m_m8*m_m11*m_m12 + k03_r_r6*k06_r_r6*k08_r_r6*k10_r_r6*k12_r_r6*k14_r_r6*k16_r_r6*k18_r_r6*m_m7*m_m8*m_m11*m_m12 + k02_r_r6*k04_r_r6*k06_r_r6*k08_r_r6*k13_r_r6*k15_r_r6*k18_r_r6*k20_r_r6*m_m8*m_m10*m_m11*m_m12 + k03_r_r6*k05_r_r6*k08_r_r6*k10_r_r6*k13_r_r6*k15_r_r6*k17_r_r6*k19_r_r6*m_m7*m_m8*m_m10*m_m12 + k02_r_r6*k04_r_r6*k06_r_r6*k08_r_r6*k13_r_r6*k16_r_r6*k18_r_r6*k20_r_r6*m_m8*m_m10*m_m11*m_m12 + k03_r_r6*k06_r_r6*k08_r_r6*k10_r_r6*k13_r_r6*k15_r_r6*k17_r_r6*k19_r_r6*m_m7*m_m8*m_m10*m_m12 + k03_r_r6*k05_r_r6*k07_r_r6*k09_r_r6*k13_r_r6*k15_r_r6*k18_r_r6*k20_r_r6*m_m7*m_m10*m_m11*m_m12 + k03_r_r6*k05_r_r6*k07_r_r6*k09_r_r6*k13_r_r6*k16_r_r6*k18_r_r6*k20_r_r6*m_m7*m_m10*m_m11*m_m12))^n_sub_r_r6 + 1)*(k02_r_r6*k04_r_r6*k06_r_r6*k09_r_r6*k12_r_r6*k14_r_r6*k16_r_r6*k19_r_r6 + k02_r_r6*k04_r_r6*k06_r_r6*k09_r_r6*k12_r_r6*k14_r_r6*k17_r_r6*k19_r_r6 + k02_r_r6*k04_r_r6*k07_r_r6*k09_r_r6*k12_r_r6*k14_r_r6*k16_r_r6*k19_r_r6 + k02_r_r6*k04_r_r6*k06_r_r6*k09_r_r6*k12_r_r6*k15_r_r6*k17_r_r6*k19_r_r6 + k02_r_r6*k04_r_r6*k07_r_r6*k09_r_r6*k12_r_r6*k14_r_r6*k17_r_r6*k19_r_r6 + k02_r_r6*k05_r_r6*k07_r_r6*k09_r_r6*k12_r_r6*k14_r_r6*k16_r_r6*k19_r_r6 + k02_r_r6*k04_r_r6*k07_r_r6*k09_r_r6*k12_r_r6*k15_r_r6*k17_r_r6*k19_r_r6 + k02_r_r6*k05_r_r6*k07_r_r6*k09_r_r6*k12_r_r6*k14_r_r6*k17_r_r6*k19_r_r6 + k02_r_r6*k05_r_r6*k07_r_r6*k09_r_r6*k12_r_r6*k15_r_r6*k17_r_r6*k19_r_r6 + k01_r_r6*k04_r_r6*k06_r_r6*k09_r_r6*k12_r_r6*k14_r_r6*k16_r_r6*k19_r_r6*m_m1 + k02_r_r6*k04_r_r6*k06_r_r6*k09_r_r6*k11_r_r6*k14_r_r6*k16_r_r6*k19_r_r6*m_m1 + k01_r_r6*k04_r_r6*k06_r_r6*k09_r_r6*k12_r_r6*k14_r_r6*k17_r_r6*k19_r_r6*m_m1 + k01_r_r6*k04_r_r6*k07_r_r6*k09_r_r6*k12_r_r6*k14_r_r6*k16_r_r6*k19_r_r6*m_m1 + k02_r_r6*k04_r_r6*k06_r_r6*k09_r_r6*k11_r_r6*k14_r_r6*k17_r_r6*k19_r_r6*m_m1 + k02_r_r6*k04_r_r6*k07_r_r6*k09_r_r6*k11_r_r6*k14_r_r6*k16_r_r6*k19_r_r6*m_m1 + k01_r_r6*k04_r_r6*k06_r_r6*k09_r_r6*k12_r_r6*k15_r_r6*k17_r_r6*k19_r_r6*m_m1 + k01_r_r6*k04_r_r6*k07_r_r6*k09_r_r6*k12_r_r6*k14_r_r6*k17_r_r6*k19_r_r6*m_m1 + k01_r_r6*k05_r_r6*k07_r_r6*k09_r_r6*k12_r_r6*k14_r_r6*k16_r_r6*k19_r_r6*m_m1 + k02_r_r6*k04_r_r6*k06_r_r6*k09_r_r6*k11_r_r6*k15_r_r6*k17_r_r6*k19_r_r6*m_m1 + k02_r_r6*k04_r_r6*k07_r_r6*k09_r_r6*k11_r_r6*k14_r_r6*k17_r_r6*k19_r_r6*m_m1 + k02_r_r6*k05_r_r6*k07_r_r6*k09_r_r6*k11_r_r6*k14_r_r6*k16_r_r6*k19_r_r6*m_m1 + k01_r_r6*k04_r_r6*k07_r_r6*k09_r_r6*k12_r_r6*k15_r_r6*k17_r_r6*k19_r_r6*m_m1 + k01_r_r6*k05_r_r6*k07_r_r6*k09_r_r6*k12_r_r6*k14_r_r6*k17_r_r6*k19_r_r6*m_m1 + k02_r_r6*k04_r_r6*k07_r_r6*k09_r_r6*k11_r_r6*k15_r_r6*k17_r_r6*k19_r_r6*m_m1 + k02_r_r6*k05_r_r6*k07_r_r6*k09_r_r6*k11_r_r6*k14_r_r6*k17_r_r6*k19_r_r6*m_m1 + k01_r_r6*k05_r_r6*k07_r_r6*k09_r_r6*k12_r_r6*k15_r_r6*k17_r_r6*k19_r_r6*m_m1 + k02_r_r6*k05_r_r6*k07_r_r6*k09_r_r6*k11_r_r6*k15_r_r6*k17_r_r6*k19_r_r6*m_m1 + k02_r_r6*k04_r_r6*k06_r_r6*k08_r_r6*k12_r_r6*k14_r_r6*k16_r_r6*k19_r_r6*m_m8 + k02_r_r6*k04_r_r6*k06_r_r6*k08_r_r6*k12_r_r6*k14_r_r6*k17_r_r6*k19_r_r6*m_m8 + k02_r_r6*k04_r_r6*k06_r_r6*k08_r_r6*k12_r_r6*k15_r_r6*k17_r_r6*k19_r_r6*m_m8 + k02_r_r6*k04_r_r6*k06_r_r6*k09_r_r6*k12_r_r6*k14_r_r6*k16_r_r6*k18_r_r6*m_m11 + k03_r_r6*k05_r_r6*k07_r_r6*k09_r_r6*k12_r_r6*k14_r_r6*k16_r_r6*k19_r_r6*m_m7 + k02_r_r6*k04_r_r6*k07_r_r6*k09_r_r6*k12_r_r6*k14_r_r6*k16_r_r6*k18_r_r6*m_m11 + k03_r_r6*k05_r_r6*k07_r_r6*k09_r_r6*k12_r_r6*k14_r_r6*k17_r_r6*k19_r_r6*m_m7 + k02_r_r6*k05_r_r6*k07_r_r6*k09_r_r6*k12_r_r6*k14_r_r6*k16_r_r6*k18_r_r6*m_m11 + k03_r_r6*k05_r_r6*k07_r_r6*k09_r_r6*k12_r_r6*k15_r_r6*k17_r_r6*k19_r_r6*m_m7 + k02_r_r6*k04_r_r6*k06_r_r6*k09_r_r6*k12_r_r6*k14_r_r6*k16_r_r6*k20_r_r6*m_m12 + k02_r_r6*k04_r_r6*k06_r_r6*k09_r_r6*k13_r_r6*k15_r_r6*k17_r_r6*k19_r_r6*m_m10 + k02_r_r6*k04_r_r6*k06_r_r6*k10_r_r6*k12_r_r6*k14_r_r6*k16_r_r6*k19_r_r6*m_m12 + k02_r_r6*k04_r_r6*k06_r_r6*k09_r_r6*k12_r_r6*k14_r_r6*k17_r_r6*k20_r_r6*m_m12 + k02_r_r6*k04_r_r6*k06_r_r6*k10_r_r6*k12_r_r6*k14_r_r6*k17_r_r6*k19_r_r6*m_m12 + k02_r_r6*k04_r_r6*k07_r_r6*k09_r_r6*k12_r_r6*k14_r_r6*k16_r_r6*k20_r_r6*m_m12 + k02_r_r6*k04_r_r6*k07_r_r6*k09_r_r6*k13_r_r6*k15_r_r6*k17_r_r6*k19_r_r6*m_m10 + k02_r_r6*k04_r_r6*k07_r_r6*k10_r_r6*k12_r_r6*k14_r_r6*k16_r_r6*k19_r_r6*m_m12 + k02_r_r6*k04_r_r6*k06_r_r6*k09_r_r6*k12_r_r6*k15_r_r6*k17_r_r6*k20_r_r6*m_m12 + k02_r_r6*k04_r_r6*k06_r_r6*k10_r_r6*k12_r_r6*k15_r_r6*k17_r_r6*k19_r_r6*m_m12 + k02_r_r6*k04_r_r6*k07_r_r6*k09_r_r6*k12_r_r6*k14_r_r6*k17_r_r6*k20_r_r6*m_m12 + k02_r_r6*k04_r_r6*k07_r_r6*k10_r_r6*k12_r_r6*k14_r_r6*k17_r_r6*k19_r_r6*m_m12 + k02_r_r6*k05_r_r6*k07_r_r6*k09_r_r6*k12_r_r6*k14_r_r6*k16_r_r6*k20_r_r6*m_m12 + k02_r_r6*k05_r_r6*k07_r_r6*k09_r_r6*k13_r_r6*k15_r_r6*k17_r_r6*k19_r_r6*m_m10 + k02_r_r6*k05_r_r6*k07_r_r6*k10_r_r6*k12_r_r6*k14_r_r6*k16_r_r6*k19_r_r6*m_m12 + k02_r_r6*k04_r_r6*k07_r_r6*k09_r_r6*k12_r_r6*k15_r_r6*k17_r_r6*k20_r_r6*m_m12 + k02_r_r6*k04_r_r6*k07_r_r6*k10_r_r6*k12_r_r6*k15_r_r6*k17_r_r6*k19_r_r6*m_m12 + k02_r_r6*k05_r_r6*k07_r_r6*k09_r_r6*k12_r_r6*k14_r_r6*k17_r_r6*k20_r_r6*m_m12 + k02_r_r6*k05_r_r6*k07_r_r6*k10_r_r6*k12_r_r6*k14_r_r6*k17_r_r6*k19_r_r6*m_m12 + k02_r_r6*k05_r_r6*k07_r_r6*k09_r_r6*k12_r_r6*k15_r_r6*k17_r_r6*k20_r_r6*m_m12 + k02_r_r6*k05_r_r6*k07_r_r6*k10_r_r6*k12_r_r6*k15_r_r6*k17_r_r6*k19_r_r6*m_m12 + k01_r_r6*k03_r_r6*k05_r_r6*k07_r_r6*k12_r_r6*k14_r_r6*k16_r_r6*k19_r_r6*m_m1*m_m7 + k01_r_r6*k03_r_r6*k05_r_r6*k07_r_r6*k12_r_r6*k14_r_r6*k17_r_r6*k19_r_r6*m_m1*m_m7 + k01_r_r6*k03_r_r6*k05_r_r6*k07_r_r6*k12_r_r6*k15_r_r6*k17_r_r6*k19_r_r6*m_m1*m_m7 + k01_r_r6*k03_r_r6*k05_r_r6*k09_r_r6*k12_r_r6*k14_r_r6*k16_r_r6*k19_r_r6*m_m1*m_m7 + k01_r_r6*k03_r_r6*k05_r_r6*k09_r_r6*k12_r_r6*k14_r_r6*k17_r_r6*k19_r_r6*m_m1*m_m7 + k01_r_r6*k03_r_r6*k06_r_r6*k09_r_r6*k12_r_r6*k14_r_r6*k16_r_r6*k19_r_r6*m_m1*m_m7 + k02_r_r6*k04_r_r6*k06_r_r6*k09_r_r6*k11_r_r6*k13_r_r6*k15_r_r6*k17_r_r6*m_m1*m_m10 + k01_r_r6*k03_r_r6*k05_r_r6*k09_r_r6*k12_r_r6*k15_r_r6*k17_r_r6*k19_r_r6*m_m1*m_m7 + k01_r_r6*k03_r_r6*k06_r_r6*k09_r_r6*k12_r_r6*k14_r_r6*k17_r_r6*k19_r_r6*m_m1*m_m7 + k01_r_r6*k03_r_r6*k07_r_r6*k09_r_r6*k12_r_r6*k14_r_r6*k16_r_r6*k19_r_r6*m_m1*m_m7 + k01_r_r6*k04_r_r6*k06_r_r6*k08_r_r6*k12_r_r6*k14_r_r6*k16_r_r6*k19_r_r6*m_m1*m_m8 + k02_r_r6*k04_r_r6*k06_r_r6*k08_r_r6*k11_r_r6*k14_r_r6*k16_r_r6*k19_r_r6*m_m1*m_m8 + k02_r_r6*k04_r_r6*k07_r_r6*k09_r_r6*k11_r_r6*k13_r_r6*k15_r_r6*k17_r_r6*m_m1*m_m10 + k01_r_r6*k03_r_r6*k06_r_r6*k09_r_r6*k12_r_r6*k15_r_r6*k17_r_r6*k19_r_r6*m_m1*m_m7 + k01_r_r6*k03_r_r6*k07_r_r6*k09_r_r6*k12_r_r6*k14_r_r6*k17_r_r6*k19_r_r6*m_m1*m_m7 + k01_r_r6*k04_r_r6*k06_r_r6*k08_r_r6*k12_r_r6*k14_r_r6*k17_r_r6*k19_r_r6*m_m1*m_m8 + k02_r_r6*k04_r_r6*k06_r_r6*k08_r_r6*k11_r_r6*k14_r_r6*k17_r_r6*k19_r_r6*m_m1*m_m8 + k02_r_r6*k04_r_r6*k06_r_r6*k09_r_r6*k11_r_r6*k13_r_r6*k15_r_r6*k19_r_r6*m_m1*m_m10 + k02_r_r6*k05_r_r6*k07_r_r6*k09_r_r6*k11_r_r6*k13_r_r6*k15_r_r6*k17_r_r6*m_m1*m_m10 + k01_r_r6*k03_r_r6*k07_r_r6*k09_r_r6*k12_r_r6*k15_r_r6*k17_r_r6*k19_r_r6*m_m1*m_m7 + k01_r_r6*k04_r_r6*k06_r_r6*k08_r_r6*k12_r_r6*k15_r_r6*k17_r_r6*k19_r_r6*m_m1*m_m8 + k02_r_r6*k04_r_r6*k06_r_r6*k08_r_r6*k11_r_r6*k15_r_r6*k17_r_r6*k19_r_r6*m_m1*m_m8 + k02_r_r6*k04_r_r6*k06_r_r6*k09_r_r6*k11_r_r6*k13_r_r6*k16_r_r6*k19_r_r6*m_m1*m_m10 + k02_r_r6*k04_r_r6*k07_r_r6*k09_r_r6*k11_r_r6*k13_r_r6*k15_r_r6*k19_r_r6*m_m1*m_m10 + k01_r_r6*k04_r_r6*k06_r_r6*k09_r_r6*k12_r_r6*k14_r_r6*k16_r_r6*k18_r_r6*m_m1*m_m11 + k02_r_r6*k04_r_r6*k06_r_r6*k09_r_r6*k11_r_r6*k13_r_r6*k17_r_r6*k19_r_r6*m_m1*m_m10 + k02_r_r6*k04_r_r6*k06_r_r6*k09_r_r6*k11_r_r6*k14_r_r6*k16_r_r6*k18_r_r6*m_m1*m_m11 + k02_r_r6*k04_r_r6*k07_r_r6*k09_r_r6*k11_r_r6*k13_r_r6*k16_r_r6*k19_r_r6*m_m1*m_m10 + k02_r_r6*k05_r_r6*k07_r_r6*k09_r_r6*k11_r_r6*k13_r_r6*k15_r_r6*k19_r_r6*m_m1*m_m10 + k03_r_r6*k05_r_r6*k07_r_r6*k09_r_r6*k11_r_r6*k14_r_r6*k16_r_r6*k19_r_r6*m_m1*m_m7 + k01_r_r6*k04_r_r6*k07_r_r6*k09_r_r6*k12_r_r6*k14_r_r6*k16_r_r6*k18_r_r6*m_m1*m_m11 + k02_r_r6*k04_r_r6*k07_r_r6*k09_r_r6*k11_r_r6*k13_r_r6*k17_r_r6*k19_r_r6*m_m1*m_m10 + k02_r_r6*k04_r_r6*k07_r_r6*k09_r_r6*k11_r_r6*k14_r_r6*k16_r_r6*k18_r_r6*m_m1*m_m11 + k02_r_r6*k05_r_r6*k07_r_r6*k09_r_r6*k11_r_r6*k13_r_r6*k16_r_r6*k19_r_r6*m_m1*m_m10 + k03_r_r6*k05_r_r6*k07_r_r6*k09_r_r6*k11_r_r6*k14_r_r6*k17_r_r6*k19_r_r6*m_m1*m_m7 + k01_r_r6*k05_r_r6*k07_r_r6*k09_r_r6*k12_r_r6*k14_r_r6*k16_r_r6*k18_r_r6*m_m1*m_m11 + k02_r_r6*k05_r_r6*k07_r_r6*k09_r_r6*k11_r_r6*k13_r_r6*k17_r_r6*k19_r_r6*m_m1*m_m10 + k02_r_r6*k05_r_r6*k07_r_r6*k09_r_r6*k11_r_r6*k14_r_r6*k16_r_r6*k18_r_r6*m_m1*m_m11 + k03_r_r6*k05_r_r6*k07_r_r6*k09_r_r6*k11_r_r6*k15_r_r6*k17_r_r6*k19_r_r6*m_m1*m_m7 + k01_r_r6*k04_r_r6*k06_r_r6*k09_r_r6*k13_r_r6*k15_r_r6*k17_r_r6*k19_r_r6*m_m1*m_m10 + k01_r_r6*k04_r_r6*k07_r_r6*k09_r_r6*k13_r_r6*k15_r_r6*k17_r_r6*k19_r_r6*m_m1*m_m10 + k01_r_r6*k05_r_r6*k07_r_r6*k09_r_r6*k13_r_r6*k15_r_r6*k17_r_r6*k19_r_r6*m_m1*m_m10 + k02_r_r6*k04_r_r6*k06_r_r6*k08_r_r6*k12_r_r6*k14_r_r6*k16_r_r6*k18_r_r6*m_m8*m_m11 + k02_r_r6*k04_r_r6*k06_r_r6*k08_r_r6*k12_r_r6*k14_r_r6*k16_r_r6*k20_r_r6*m_m8*m_m12 + k02_r_r6*k04_r_r6*k06_r_r6*k08_r_r6*k13_r_r6*k15_r_r6*k17_r_r6*k19_r_r6*m_m8*m_m10 + k03_r_r6*k05_r_r6*k07_r_r6*k09_r_r6*k12_r_r6*k14_r_r6*k16_r_r6*k18_r_r6*m_m7*m_m11 + k02_r_r6*k04_r_r6*k06_r_r6*k08_r_r6*k12_r_r6*k14_r_r6*k17_r_r6*k20_r_r6*m_m8*m_m12 + k02_r_r6*k04_r_r6*k06_r_r6*k08_r_r6*k12_r_r6*k15_r_r6*k17_r_r6*k20_r_r6*m_m8*m_m12 + k02_r_r6*k04_r_r6*k06_r_r6*k10_r_r6*k12_r_r6*k14_r_r6*k16_r_r6*k18_r_r6*m_m11*m_m12 + k02_r_r6*k04_r_r6*k08_r_r6*k10_r_r6*k12_r_r6*k14_r_r6*k16_r_r6*k19_r_r6*m_m8*m_m12 + k03_r_r6*k05_r_r6*k07_r_r6*k09_r_r6*k12_r_r6*k14_r_r6*k16_r_r6*k20_r_r6*m_m7*m_m12 + k03_r_r6*k05_r_r6*k07_r_r6*k09_r_r6*k13_r_r6*k15_r_r6*k17_r_r6*k19_r_r6*m_m7*m_m10 + k03_r_r6*k05_r_r6*k07_r_r6*k10_r_r6*k12_r_r6*k14_r_r6*k16_r_r6*k19_r_r6*m_m7*m_m12 + k02_r_r6*k04_r_r6*k07_r_r6*k10_r_r6*k12_r_r6*k14_r_r6*k16_r_r6*k18_r_r6*m_m11*m_m12 + k02_r_r6*k04_r_r6*k08_r_r6*k10_r_r6*k12_r_r6*k14_r_r6*k17_r_r6*k19_r_r6*m_m8*m_m12 + k02_r_r6*k05_r_r6*k08_r_r6*k10_r_r6*k12_r_r6*k14_r_r6*k16_r_r6*k19_r_r6*m_m8*m_m12 + k03_r_r6*k05_r_r6*k07_r_r6*k09_r_r6*k12_r_r6*k14_r_r6*k17_r_r6*k20_r_r6*m_m7*m_m12 + k03_r_r6*k05_r_r6*k07_r_r6*k10_r_r6*k12_r_r6*k14_r_r6*k17_r_r6*k19_r_r6*m_m7*m_m12 + k02_r_r6*k04_r_r6*k08_r_r6*k10_r_r6*k12_r_r6*k15_r_r6*k17_r_r6*k19_r_r6*m_m8*m_m12 + k02_r_r6*k05_r_r6*k07_r_r6*k10_r_r6*k12_r_r6*k14_r_r6*k16_r_r6*k18_r_r6*m_m11*m_m12 + k02_r_r6*k05_r_r6*k08_r_r6*k10_r_r6*k12_r_r6*k14_r_r6*k17_r_r6*k19_r_r6*m_m8*m_m12 + k02_r_r6*k06_r_r6*k08_r_r6*k10_r_r6*k12_r_r6*k14_r_r6*k16_r_r6*k19_r_r6*m_m8*m_m12 + k03_r_r6*k05_r_r6*k07_r_r6*k09_r_r6*k12_r_r6*k15_r_r6*k17_r_r6*k20_r_r6*m_m7*m_m12 + k03_r_r6*k05_r_r6*k07_r_r6*k10_r_r6*k12_r_r6*k15_r_r6*k17_r_r6*k19_r_r6*m_m7*m_m12 + k02_r_r6*k04_r_r6*k06_r_r6*k09_r_r6*k12_r_r6*k14_r_r6*k18_r_r6*k20_r_r6*m_m11*m_m12 + k02_r_r6*k04_r_r6*k06_r_r6*k09_r_r6*k13_r_r6*k15_r_r6*k17_r_r6*k20_r_r6*m_m10*m_m12 + k02_r_r6*k04_r_r6*k06_r_r6*k10_r_r6*k13_r_r6*k15_r_r6*k17_r_r6*k19_r_r6*m_m10*m_m12 + k02_r_r6*k05_r_r6*k08_r_r6*k10_r_r6*k12_r_r6*k15_r_r6*k17_r_r6*k19_r_r6*m_m8*m_m12 + k02_r_r6*k06_r_r6*k08_r_r6*k10_r_r6*k12_r_r6*k14_r_r6*k17_r_r6*k19_r_r6*m_m8*m_m12 + k02_r_r6*k04_r_r6*k06_r_r6*k09_r_r6*k12_r_r6*k15_r_r6*k18_r_r6*k20_r_r6*m_m11*m_m12 + k02_r_r6*k04_r_r6*k07_r_r6*k09_r_r6*k12_r_r6*k14_r_r6*k18_r_r6*k20_r_r6*m_m11*m_m12 + k02_r_r6*k04_r_r6*k07_r_r6*k09_r_r6*k13_r_r6*k15_r_r6*k17_r_r6*k20_r_r6*m_m10*m_m12 + k02_r_r6*k04_r_r6*k07_r_r6*k10_r_r6*k13_r_r6*k15_r_r6*k17_r_r6*k19_r_r6*m_m10*m_m12 + k02_r_r6*k06_r_r6*k08_r_r6*k10_r_r6*k12_r_r6*k15_r_r6*k17_r_r6*k19_r_r6*m_m8*m_m12 + k04_r_r6*k06_r_r6*k08_r_r6*k10_r_r6*k12_r_r6*k14_r_r6*k16_r_r6*k19_r_r6*m_m8*m_m12 + k02_r_r6*k04_r_r6*k06_r_r6*k09_r_r6*k12_r_r6*k16_r_r6*k18_r_r6*k20_r_r6*m_m11*m_m12 + k02_r_r6*k04_r_r6*k07_r_r6*k09_r_r6*k12_r_r6*k15_r_r6*k18_r_r6*k20_r_r6*m_m11*m_m12 + k02_r_r6*k05_r_r6*k07_r_r6*k09_r_r6*k12_r_r6*k14_r_r6*k18_r_r6*k20_r_r6*m_m11*m_m12 + k02_r_r6*k05_r_r6*k07_r_r6*k09_r_r6*k13_r_r6*k15_r_r6*k17_r_r6*k20_r_r6*m_m10*m_m12 + k02_r_r6*k05_r_r6*k07_r_r6*k10_r_r6*k13_r_r6*k15_r_r6*k17_r_r6*k19_r_r6*m_m10*m_m12 + k04_r_r6*k06_r_r6*k08_r_r6*k10_r_r6*k12_r_r6*k14_r_r6*k17_r_r6*k19_r_r6*m_m8*m_m12 + k02_r_r6*k04_r_r6*k07_r_r6*k09_r_r6*k12_r_r6*k16_r_r6*k18_r_r6*k20_r_r6*m_m11*m_m12 + k02_r_r6*k05_r_r6*k07_r_r6*k09_r_r6*k12_r_r6*k15_r_r6*k18_r_r6*k20_r_r6*m_m11*m_m12 + k04_r_r6*k06_r_r6*k08_r_r6*k10_r_r6*k12_r_r6*k15_r_r6*k17_r_r6*k19_r_r6*m_m8*m_m12 + k02_r_r6*k04_r_r6*k06_r_r6*k09_r_r6*k14_r_r6*k16_r_r6*k18_r_r6*k20_r_r6*m_m11*m_m12 + k02_r_r6*k05_r_r6*k07_r_r6*k09_r_r6*k12_r_r6*k16_r_r6*k18_r_r6*k20_r_r6*m_m11*m_m12 + k02_r_r6*k04_r_r6*k07_r_r6*k09_r_r6*k14_r_r6*k16_r_r6*k18_r_r6*k20_r_r6*m_m11*m_m12 + k02_r_r6*k05_r_r6*k07_r_r6*k09_r_r6*k14_r_r6*k16_r_r6*k18_r_r6*k20_r_r6*m_m11*m_m12 + k01_r_r6*k03_r_r6*k05_r_r6*k08_r_r6*k12_r_r6*k14_r_r6*k16_r_r6*k19_r_r6*m_m1*m_m7*m_m8 + k01_r_r6*k03_r_r6*k05_r_r6*k07_r_r6*k12_r_r6*k14_r_r6*k16_r_r6*k18_r_r6*m_m1*m_m7*m_m11 + k01_r_r6*k03_r_r6*k05_r_r6*k08_r_r6*k12_r_r6*k14_r_r6*k17_r_r6*k19_r_r6*m_m1*m_m7*m_m8 + k01_r_r6*k03_r_r6*k06_r_r6*k08_r_r6*k12_r_r6*k14_r_r6*k16_r_r6*k19_r_r6*m_m1*m_m7*m_m8 + k02_r_r6*k04_r_r6*k06_r_r6*k08_r_r6*k11_r_r6*k13_r_r6*k15_r_r6*k17_r_r6*m_m1*m_m8*m_m10 + k01_r_r6*k03_r_r6*k05_r_r6*k08_r_r6*k12_r_r6*k15_r_r6*k17_r_r6*k19_r_r6*m_m1*m_m7*m_m8 + k01_r_r6*k03_r_r6*k06_r_r6*k08_r_r6*k12_r_r6*k14_r_r6*k17_r_r6*k19_r_r6*m_m1*m_m7*m_m8 + k01_r_r6*k03_r_r6*k05_r_r6*k09_r_r6*k12_r_r6*k14_r_r6*k16_r_r6*k18_r_r6*m_m1*m_m7*m_m11 + k01_r_r6*k03_r_r6*k06_r_r6*k08_r_r6*k12_r_r6*k15_r_r6*k17_r_r6*k19_r_r6*m_m1*m_m7*m_m8 + k02_r_r6*k04_r_r6*k06_r_r6*k08_r_r6*k11_r_r6*k13_r_r6*k15_r_r6*k19_r_r6*m_m1*m_m8*m_m10 + k01_r_r6*k03_r_r6*k05_r_r6*k07_r_r6*k13_r_r6*k15_r_r6*k17_r_r6*k19_r_r6*m_m1*m_m7*m_m10 + k01_r_r6*k03_r_r6*k06_r_r6*k09_r_r6*k12_r_r6*k14_r_r6*k16_r_r6*k18_r_r6*m_m1*m_m7*m_m11 + k02_r_r6*k04_r_r6*k06_r_r6*k08_r_r6*k11_r_r6*k13_r_r6*k16_r_r6*k19_r_r6*m_m1*m_m8*m_m10 + k03_r_r6*k05_r_r6*k07_r_r6*k09_r_r6*k11_r_r6*k13_r_r6*k15_r_r6*k17_r_r6*m_m1*m_m7*m_m10 + k01_r_r6*k03_r_r6*k07_r_r6*k09_r_r6*k12_r_r6*k14_r_r6*k16_r_r6*k18_r_r6*m_m1*m_m7*m_m11 + k01_r_r6*k04_r_r6*k06_r_r6*k08_r_r6*k12_r_r6*k14_r_r6*k16_r_r6*k18_r_r6*m_m1*m_m8*m_m11 + k02_r_r6*k04_r_r6*k06_r_r6*k08_r_r6*k11_r_r6*k13_r_r6*k17_r_r6*k19_r_r6*m_m1*m_m8*m_m10 + k02_r_r6*k04_r_r6*k06_r_r6*k08_r_r6*k11_r_r6*k14_r_r6*k16_r_r6*k18_r_r6*m_m1*m_m8*m_m11 + k01_r_r6*k03_r_r6*k05_r_r6*k09_r_r6*k13_r_r6*k15_r_r6*k17_r_r6*k19_r_r6*m_m1*m_m7*m_m10 + k02_r_r6*k04_r_r6*k06_r_r6*k09_r_r6*k11_r_r6*k13_r_r6*k15_r_r6*k18_r_r6*m_m1*m_m10*m_m11 + k03_r_r6*k05_r_r6*k07_r_r6*k09_r_r6*k11_r_r6*k13_r_r6*k15_r_r6*k19_r_r6*m_m1*m_m7*m_m10 + k01_r_r6*k03_r_r6*k06_r_r6*k09_r_r6*k13_r_r6*k15_r_r6*k17_r_r6*k19_r_r6*m_m1*m_m7*m_m10 + k02_r_r6*k04_r_r6*k06_r_r6*k09_r_r6*k11_r_r6*k13_r_r6*k16_r_r6*k18_r_r6*m_m1*m_m10*m_m11 + k02_r_r6*k04_r_r6*k07_r_r6*k09_r_r6*k11_r_r6*k13_r_r6*k15_r_r6*k18_r_r6*m_m1*m_m10*m_m11 + k03_r_r6*k05_r_r6*k07_r_r6*k09_r_r6*k11_r_r6*k13_r_r6*k16_r_r6*k19_r_r6*m_m1*m_m7*m_m10 + k01_r_r6*k03_r_r6*k07_r_r6*k09_r_r6*k13_r_r6*k15_r_r6*k17_r_r6*k19_r_r6*m_m1*m_m7*m_m10 + k01_r_r6*k04_r_r6*k06_r_r6*k08_r_r6*k13_r_r6*k15_r_r6*k17_r_r6*k19_r_r6*m_m1*m_m8*m_m10 + k02_r_r6*k04_r_r6*k07_r_r6*k09_r_r6*k11_r_r6*k13_r_r6*k16_r_r6*k18_r_r6*m_m1*m_m10*m_m11 + k02_r_r6*k05_r_r6*k07_r_r6*k09_r_r6*k11_r_r6*k13_r_r6*k15_r_r6*k18_r_r6*m_m1*m_m10*m_m11 + k03_r_r6*k05_r_r6*k07_r_r6*k09_r_r6*k11_r_r6*k13_r_r6*k17_r_r6*k19_r_r6*m_m1*m_m7*m_m10 + k03_r_r6*k05_r_r6*k07_r_r6*k09_r_r6*k11_r_r6*k14_r_r6*k16_r_r6*k18_r_r6*m_m1*m_m7*m_m11 + k02_r_r6*k05_r_r6*k07_r_r6*k09_r_r6*k11_r_r6*k13_r_r6*k16_r_r6*k18_r_r6*m_m1*m_m10*m_m11 + k03_r_r6*k05_r_r6*k08_r_r6*k10_r_r6*k12_r_r6*k14_r_r6*k16_r_r6*k19_r_r6*m_m7*m_m8*m_m12 + k02_r_r6*k04_r_r6*k06_r_r6*k08_r_r6*k12_r_r6*k14_r_r6*k18_r_r6*k20_r_r6*m_m8*m_m11*m_m12 + k02_r_r6*k04_r_r6*k06_r_r6*k08_r_r6*k13_r_r6*k15_r_r6*k17_r_r6*k20_r_r6*m_m8*m_m10*m_m12 + k02_r_r6*k04_r_r6*k08_r_r6*k10_r_r6*k12_r_r6*k14_r_r6*k16_r_r6*k18_r_r6*m_m8*m_m11*m_m12 + k03_r_r6*k05_r_r6*k07_r_r6*k10_r_r6*k12_r_r6*k14_r_r6*k16_r_r6*k18_r_r6*m_m7*m_m11*m_m12 + k03_r_r6*k05_r_r6*k08_r_r6*k10_r_r6*k12_r_r6*k14_r_r6*k17_r_r6*k19_r_r6*m_m7*m_m8*m_m12 + k03_r_r6*k06_r_r6*k08_r_r6*k10_r_r6*k12_r_r6*k14_r_r6*k16_r_r6*k19_r_r6*m_m7*m_m8*m_m12 + k02_r_r6*k04_r_r6*k06_r_r6*k08_r_r6*k12_r_r6*k15_r_r6*k18_r_r6*k20_r_r6*m_m8*m_m11*m_m12 + k02_r_r6*k05_r_r6*k08_r_r6*k10_r_r6*k12_r_r6*k14_r_r6*k16_r_r6*k18_r_r6*m_m8*m_m11*m_m12 + k03_r_r6*k05_r_r6*k08_r_r6*k10_r_r6*k12_r_r6*k15_r_r6*k17_r_r6*k19_r_r6*m_m7*m_m8*m_m12 + k03_r_r6*k06_r_r6*k08_r_r6*k10_r_r6*k12_r_r6*k14_r_r6*k17_r_r6*k19_r_r6*m_m7*m_m8*m_m12 + k02_r_r6*k04_r_r6*k06_r_r6*k08_r_r6*k12_r_r6*k16_r_r6*k18_r_r6*k20_r_r6*m_m8*m_m11*m_m12 + k02_r_r6*k06_r_r6*k08_r_r6*k10_r_r6*k12_r_r6*k14_r_r6*k16_r_r6*k18_r_r6*m_m8*m_m11*m_m12 + k03_r_r6*k06_r_r6*k08_r_r6*k10_r_r6*k12_r_r6*k15_r_r6*k17_r_r6*k19_r_r6*m_m7*m_m8*m_m12 + k02_r_r6*k04_r_r6*k08_r_r6*k10_r_r6*k13_r_r6*k15_r_r6*k17_r_r6*k19_r_r6*m_m8*m_m10*m_m12 + k03_r_r6*k05_r_r6*k07_r_r6*k09_r_r6*k12_r_r6*k14_r_r6*k18_r_r6*k20_r_r6*m_m7*m_m11*m_m12 + k03_r_r6*k05_r_r6*k07_r_r6*k09_r_r6*k13_r_r6*k15_r_r6*k17_r_r6*k20_r_r6*m_m7*m_m10*m_m12 + k03_r_r6*k05_r_r6*k07_r_r6*k10_r_r6*k13_r_r6*k15_r_r6*k17_r_r6*k19_r_r6*m_m7*m_m10*m_m12 + k02_r_r6*k04_r_r6*k06_r_r6*k08_r_r6*k14_r_r6*k16_r_r6*k18_r_r6*k20_r_r6*m_m8*m_m11*m_m12 + k02_r_r6*k05_r_r6*k08_r_r6*k10_r_r6*k13_r_r6*k15_r_r6*k17_r_r6*k19_r_r6*m_m8*m_m10*m_m12 + k03_r_r6*k05_r_r6*k07_r_r6*k09_r_r6*k12_r_r6*k15_r_r6*k18_r_r6*k20_r_r6*m_m7*m_m11*m_m12 + k04_r_r6*k06_r_r6*k08_r_r6*k10_r_r6*k12_r_r6*k14_r_r6*k16_r_r6*k18_r_r6*m_m8*m_m11*m_m12 + k02_r_r6*k04_r_r6*k06_r_r6*k09_r_r6*k13_r_r6*k15_r_r6*k18_r_r6*k20_r_r6*m_m10*m_m11*m_m12 + k02_r_r6*k06_r_r6*k08_r_r6*k10_r_r6*k13_r_r6*k15_r_r6*k17_r_r6*k19_r_r6*m_m8*m_m10*m_m12 + k03_r_r6*k05_r_r6*k07_r_r6*k09_r_r6*k12_r_r6*k16_r_r6*k18_r_r6*k20_r_r6*m_m7*m_m11*m_m12 + k02_r_r6*k04_r_r6*k06_r_r6*k09_r_r6*k13_r_r6*k16_r_r6*k18_r_r6*k20_r_r6*m_m10*m_m11*m_m12 + k02_r_r6*k04_r_r6*k07_r_r6*k09_r_r6*k13_r_r6*k15_r_r6*k18_r_r6*k20_r_r6*m_m10*m_m11*m_m12 + k02_r_r6*k04_r_r6*k07_r_r6*k09_r_r6*k13_r_r6*k16_r_r6*k18_r_r6*k20_r_r6*m_m10*m_m11*m_m12 + k02_r_r6*k05_r_r6*k07_r_r6*k09_r_r6*k13_r_r6*k15_r_r6*k18_r_r6*k20_r_r6*m_m10*m_m11*m_m12 + k03_r_r6*k05_r_r6*k07_r_r6*k09_r_r6*k14_r_r6*k16_r_r6*k18_r_r6*k20_r_r6*m_m7*m_m11*m_m12 + k04_r_r6*k06_r_r6*k08_r_r6*k10_r_r6*k13_r_r6*k15_r_r6*k17_r_r6*k19_r_r6*m_m8*m_m10*m_m12 + k02_r_r6*k05_r_r6*k07_r_r6*k09_r_r6*k13_r_r6*k16_r_r6*k18_r_r6*k20_r_r6*m_m10*m_m11*m_m12 + k01_r_r6*k03_r_r6*k05_r_r6*k08_r_r6*k12_r_r6*k14_r_r6*k16_r_r6*k18_r_r6*m_m1*m_m7*m_m8*m_m11 + k01_r_r6*k03_r_r6*k06_r_r6*k08_r_r6*k12_r_r6*k14_r_r6*k16_r_r6*k18_r_r6*m_m1*m_m7*m_m8*m_m11 + k01_r_r6*k03_r_r6*k05_r_r6*k08_r_r6*k13_r_r6*k15_r_r6*k17_r_r6*k19_r_r6*m_m1*m_m7*m_m8*m_m10 + k02_r_r6*k04_r_r6*k06_r_r6*k08_r_r6*k11_r_r6*k13_r_r6*k15_r_r6*k18_r_r6*m_m1*m_m8*m_m10*m_m11 + k01_r_r6*k03_r_r6*k06_r_r6*k08_r_r6*k13_r_r6*k15_r_r6*k17_r_r6*k19_r_r6*m_m1*m_m7*m_m8*m_m10 + k02_r_r6*k04_r_r6*k06_r_r6*k08_r_r6*k11_r_r6*k13_r_r6*k16_r_r6*k18_r_r6*m_m1*m_m8*m_m10*m_m11 + k03_r_r6*k05_r_r6*k07_r_r6*k09_r_r6*k11_r_r6*k13_r_r6*k15_r_r6*k18_r_r6*m_m1*m_m7*m_m10*m_m11 + k03_r_r6*k05_r_r6*k07_r_r6*k09_r_r6*k11_r_r6*k13_r_r6*k16_r_r6*k18_r_r6*m_m1*m_m7*m_m10*m_m11 + k03_r_r6*k05_r_r6*k08_r_r6*k10_r_r6*k12_r_r6*k14_r_r6*k16_r_r6*k18_r_r6*m_m7*m_m8*m_m11*m_m12 + k03_r_r6*k06_r_r6*k08_r_r6*k10_r_r6*k12_r_r6*k14_r_r6*k16_r_r6*k18_r_r6*m_m7*m_m8*m_m11*m_m12 + k02_r_r6*k04_r_r6*k06_r_r6*k08_r_r6*k13_r_r6*k15_r_r6*k18_r_r6*k20_r_r6*m_m8*m_m10*m_m11*m_m12 + k03_r_r6*k05_r_r6*k08_r_r6*k10_r_r6*k13_r_r6*k15_r_r6*k17_r_r6*k19_r_r6*m_m7*m_m8*m_m10*m_m12 + k02_r_r6*k04_r_r6*k06_r_r6*k08_r_r6*k13_r_r6*k16_r_r6*k18_r_r6*k20_r_r6*m_m8*m_m10*m_m11*m_m12 + k03_r_r6*k06_r_r6*k08_r_r6*k10_r_r6*k13_r_r6*k15_r_r6*k17_r_r6*k19_r_r6*m_m7*m_m8*m_m10*m_m12 + k03_r_r6*k05_r_r6*k07_r_r6*k09_r_r6*k13_r_r6*k15_r_r6*k18_r_r6*k20_r_r6*m_m7*m_m10*m_m11*m_m12 + k03_r_r6*k05_r_r6*k07_r_r6*k09_r_r6*k13_r_r6*k16_r_r6*k18_r_r6*k20_r_r6*m_m7*m_m10*m_m11*m_m12));  // modifiers: m_m9, m_m7, m_m8
  r_r7: $m_m4 -> m_m6; k01_r_r7*m_m4 - k02_r_r7*m_m6;
  r_r8: m_m6 -> $m_m16; k01_r_r8*m_m6 - k02_r_r8*m_m16;
  r_r9: m_m7 -> $m_m20; k01_r_r9*m_m7 - k02_r_r9*m_m20;
  r_r10: m_m5 -> $m_m15; k01_r_r10*m_m5 - k02_r_r10*m_m15;
  r_r11: m_m8 -> $m_m17; k01_r_r11*m_m8;
  r_r12: m_m9 -> $m_m19; k01_r_r12*m_m9 - k02_r_r12*m_m19;
  r_r13: m_m11 -> $m_m18; -0.0024268;
end
