// SBML level 2 version 4

model toy_model1_no_promiscuous2()

  // Compartments:
  compartment unnamed = 1;

  // Species:
  species $m_m3 in unnamed = 1;
  species m_m6 in unnamed = 1;
  species m_m5 in unnamed = 1;
  species $m_m14 in unnamed = 1;
  species m_m7 in unnamed = 1;
  species $m_m1 in unnamed = 1;
  species m_m8 in unnamed = 1;
  species $m_m12 in unnamed = 1;
  species $m_m2 in unnamed = 1;
  species m_m9 in unnamed = 1;
  species $m_m13 in unnamed = 1;
  species m_m10 in unnamed = 1;
  species m_m11 in unnamed = 1;
  species $m_m4 in unnamed = 1;
  species $m_m16 in unnamed = 1;
  species $m_m20 in unnamed = 1;
  species $m_m15 in unnamed = 1;
  species $m_m17 in unnamed = 1;
  species $m_m19 in unnamed = 1;
  species $m_m18 in unnamed = 1;

  // Parameters:
  m_m1_ref = 0.01935526;
  m_m2_ref = 6.364611e-8;
  m_m3_ref = 3.717012e-7;
  m_m4_ref = 1.570901e-8;
  m_m5_ref = 0.005629735;
  m_m6_ref = 1.618774;
  m_m7_ref = 2.218498;
  m_m8_ref = 1.028684;
  m_m9_ref = 19.6614;
  m_m10_ref = 2.853528;
  m_m11_ref = 0.006141874;
  m_m12_ref = 1.512457;
  m_m13_ref = 7.099428e-7;
  m_m14_ref = 5.328019e-8;
  m_m15_ref = 0.01640424;
  m_m16_ref = 6.629742e-6;
  m_m17_ref = 9.317303e-6;
  m_m18_ref = 0.006726697;
  m_m19_ref = 3.546114;
  m_m20_ref = 0.5951634;
  k01_r_r1 = 34.43053;
  k02_r_r1 = 31.28974;
  k03_r_r1 = 18.08862;
  k04_r_r1 = 96.79873;
  k05_r_r1 = 104.3357;
  k06_r_r1 = 0.2787003;
  k07_r_r1 = 24.91359;
  k08_r_r1 = 1.263713;
  k09_r_r1 = 225.1569;
  k10_r_r1 = 11.23519;
  k11_r_r1 = 26.50446;
  k12_r_r1 = 4.290234e-5;
  k01_r_r2 = 37.16875;
  k02_r_r2 = 97.89639;
  k03_r_r2 = 555.2336;
  k04_r_r2 = 0.5567683;
  k05_r_r2 = 10.25522;
  k06_r_r2 = 2.862279;
  k01_r_r3 = 245.4169;
  k02_r_r3 = 28.77744;
  k03_r_r3 = 16.86286;
  k04_r_r3 = 20.90868;
  k05_r_r3 = 246.3644;
  k06_r_r3 = 35.80052;
  k07_r_r3 = 500.0445;
  k08_r_r3 = 0.8534396;
  k09_r_r3 = 24.18448;
  k10_r_r3 = 6.406246;
  k11_r_r3 = 108.5237;
  k12_r_r3 = 26.78157;
  k01_r_r4 = 245.3545;
  k02_r_r4 = 235.5321;
  k03_r_r4 = 93.37967;
  k04_r_r4 = 46.4794;
  k05_r_r4 = 66.68039;
  k06_r_r4 = 2706.133;
  k07_r_r4 = 135.5116;
  k08_r_r4 = 10606.58;
  k09_r_r4 = 204021.2;
  k10_r_r4 = 3182.699;
  k11_r_r4 = 80.23901;
  k12_r_r4 = 53.4613;
  k13_r_r4 = 332.4438;
  k14_r_r4 = 591.0998;
  k15_r_r4 = 20.09564;
  k16_r_r4 = 20.93818;
  k17_r_r4 = 269.7567;
  k18_r_r4 = 105.3224;
  k01_r_r5 = 0.04415573;
  k02_r_r5 = 0.1357118;
  k03_r_r5 = 0.2006281;
  k04_r_r5 = 0.04410829;
  k05_r_r5 = 0.1959689;
  k06_r_r5 = 0.3867042;
  k01_r_r6 = 3.978299;
  k02_r_r6 = 5.246472;
  k03_r_r6 = 6.013118;
  k04_r_r6 = 7.444981;
  k05_r_r6 = 0.01824961;
  k06_r_r6 = 0.03533278;
  k07_r_r6 = 4.190642;
  k08_r_r6 = 5.184211;
  k09_r_r6 = 3.722443;
  k10_r_r6 = 0.7754364;
  k11_r_r6 = 0.5516096;
  k12_r_r6 = 1.349638;
  k01_r_r7 = 0.001666778;
  k02_r_r7 = 14.83157;
  k01_r_r8 = 2.113677;
  k02_r_r8 = 24.12861;
  k01_r_r9 = 0.2923169;
  k02_r_r9 = 0.006947812;
  k01_r_r10 = 0.07468727;
  k02_r_r10 = 0.0168675;
  k01_r_r11 = 0.008674283;
  k02_r_r11 = 0.01306837;
  k01_r_r12 = 7.96209;
  k02_r_r12 = 1.113434;
  k01_r_r13 = 0.004506833;
  k02_r_r13 = 0.006933683;

  // Rate rules:
  m_m5' = (-((k01_r_r2*k03_r_r2*k05_r_r2*m_m5 - k02_r_r2*k04_r_r2*k06_r_r2*m_m7)/(k02_r_r2*k04_r_r2 + k02_r_r2*k05_r_r2 + k03_r_r2*k05_r_r2 + k01_r_r2*k03_r_r2*m_m5 + k01_r_r2*k04_r_r2*m_m5 + k01_r_r2*k05_r_r2*m_m5 + k02_r_r2*k06_r_r2*m_m7 + k03_r_r2*k06_r_r2*m_m7 + k04_r_r2*k06_r_r2*m_m7)) - (k01_r_r10*m_m5 - k02_r_r10*m_m15) + k04_r_r1*(k01_r_r1*k05_r_r1*k07_r_r1*k09_r_r1*k11_r_r1*m_m3*m_m6 - k02_r_r1*k06_r_r1*k08_r_r1*k10_r_r1*k12_r_r1*m_m5*m_m14)/(k02_r_r1*k04_r_r1*k06_r_r1*k08_r_r1*k11_r_r1 + k02_r_r1*k04_r_r1*k06_r_r1*k09_r_r1*k11_r_r1 + k02_r_r1*k04_r_r1*k07_r_r1*k09_r_r1*k11_r_r1 + k03_r_r1*k05_r_r1*k07_r_r1*k09_r_r1*k11_r_r1*m_m6^2 + k01_r_r1*k04_r_r1*k06_r_r1*k08_r_r1*k11_r_r1*m_m3 + k01_r_r1*k04_r_r1*k06_r_r1*k09_r_r1*k11_r_r1*m_m3 + k01_r_r1*k04_r_r1*k07_r_r1*k09_r_r1*k11_r_r1*m_m3 + k02_r_r1*k04_r_r1*k06_r_r1*k08_r_r1*k10_r_r1*m_m5 + k02_r_r1*k03_r_r1*k06_r_r1*k08_r_r1*k11_r_r1*m_m6 + k02_r_r1*k03_r_r1*k06_r_r1*k09_r_r1*k11_r_r1*m_m6 + k02_r_r1*k03_r_r1*k07_r_r1*k09_r_r1*k11_r_r1*m_m6 + k04_r_r1*k05_r_r1*k07_r_r1*k09_r_r1*k11_r_r1*m_m6 + k02_r_r1*k04_r_r1*k06_r_r1*k08_r_r1*k12_r_r1*m_m14 + k02_r_r1*k04_r_r1*k06_r_r1*k09_r_r1*k12_r_r1*m_m14 + k02_r_r1*k04_r_r1*k07_r_r1*k09_r_r1*k12_r_r1*m_m14 + k01_r_r1*k04_r_r1*k05_r_r1*k07_r_r1*k09_r_r1*m_m3*m_m6 + k01_r_r1*k04_r_r1*k05_r_r1*k07_r_r1*k11_r_r1*m_m3*m_m6 + k01_r_r1*k04_r_r1*k06_r_r1*k08_r_r1*k10_r_r1*m_m3*m_m5 + k01_r_r1*k04_r_r1*k05_r_r1*k08_r_r1*k11_r_r1*m_m3*m_m6 + k01_r_r1*k04_r_r1*k05_r_r1*k09_r_r1*k11_r_r1*m_m3*m_m6 + k02_r_r1*k03_r_r1*k06_r_r1*k08_r_r1*k10_r_r1*m_m5*m_m6 + k02_r_r1*k04_r_r1*k06_r_r1*k10_r_r1*k12_r_r1*m_m5*m_m14 + k02_r_r1*k04_r_r1*k07_r_r1*k10_r_r1*k12_r_r1*m_m5*m_m14 + k02_r_r1*k04_r_r1*k08_r_r1*k10_r_r1*k12_r_r1*m_m5*m_m14 + k04_r_r1*k05_r_r1*k07_r_r1*k09_r_r1*k12_r_r1*m_m6*m_m14 + k04_r_r1*k06_r_r1*k08_r_r1*k10_r_r1*k12_r_r1*m_m5*m_m14 + k01_r_r1*k04_r_r1*k05_r_r1*k07_r_r1*k10_r_r1*m_m3*m_m5*m_m6 + k01_r_r1*k04_r_r1*k05_r_r1*k08_r_r1*k10_r_r1*m_m3*m_m5*m_m6 + k04_r_r1*k05_r_r1*k07_r_r1*k10_r_r1*k12_r_r1*m_m5*m_m6*m_m14 + k04_r_r1*k05_r_r1*k08_r_r1*k10_r_r1*k12_r_r1*m_m5*m_m6*m_m14))*(1/m_m5_ref);
  m_m6' = (-(k04_r_r1*(k01_r_r1*k05_r_r1*k07_r_r1*k09_r_r1*k11_r_r1*m_m3*m_m6 - k02_r_r1*k06_r_r1*k08_r_r1*k10_r_r1*k12_r_r1*m_m5*m_m14)/(k02_r_r1*k04_r_r1*k06_r_r1*k08_r_r1*k11_r_r1 + k02_r_r1*k04_r_r1*k06_r_r1*k09_r_r1*k11_r_r1 + k02_r_r1*k04_r_r1*k07_r_r1*k09_r_r1*k11_r_r1 + k03_r_r1*k05_r_r1*k07_r_r1*k09_r_r1*k11_r_r1*m_m6^2 + k01_r_r1*k04_r_r1*k06_r_r1*k08_r_r1*k11_r_r1*m_m3 + k01_r_r1*k04_r_r1*k06_r_r1*k09_r_r1*k11_r_r1*m_m3 + k01_r_r1*k04_r_r1*k07_r_r1*k09_r_r1*k11_r_r1*m_m3 + k02_r_r1*k04_r_r1*k06_r_r1*k08_r_r1*k10_r_r1*m_m5 + k02_r_r1*k03_r_r1*k06_r_r1*k08_r_r1*k11_r_r1*m_m6 + k02_r_r1*k03_r_r1*k06_r_r1*k09_r_r1*k11_r_r1*m_m6 + k02_r_r1*k03_r_r1*k07_r_r1*k09_r_r1*k11_r_r1*m_m6 + k04_r_r1*k05_r_r1*k07_r_r1*k09_r_r1*k11_r_r1*m_m6 + k02_r_r1*k04_r_r1*k06_r_r1*k08_r_r1*k12_r_r1*m_m14 + k02_r_r1*k04_r_r1*k06_r_r1*k09_r_r1*k12_r_r1*m_m14 + k02_r_r1*k04_r_r1*k07_r_r1*k09_r_r1*k12_r_r1*m_m14 + k01_r_r1*k04_r_r1*k05_r_r1*k07_r_r1*k09_r_r1*m_m3*m_m6 + k01_r_r1*k04_r_r1*k05_r_r1*k07_r_r1*k11_r_r1*m_m3*m_m6 + k01_r_r1*k04_r_r1*k06_r_r1*k08_r_r1*k10_r_r1*m_m3*m_m5 + k01_r_r1*k04_r_r1*k05_r_r1*k08_r_r1*k11_r_r1*m_m3*m_m6 + k01_r_r1*k04_r_r1*k05_r_r1*k09_r_r1*k11_r_r1*m_m3*m_m6 + k02_r_r1*k03_r_r1*k06_r_r1*k08_r_r1*k10_r_r1*m_m5*m_m6 + k02_r_r1*k04_r_r1*k06_r_r1*k10_r_r1*k12_r_r1*m_m5*m_m14 + k02_r_r1*k04_r_r1*k07_r_r1*k10_r_r1*k12_r_r1*m_m5*m_m14 + k02_r_r1*k04_r_r1*k08_r_r1*k10_r_r1*k12_r_r1*m_m5*m_m14 + k04_r_r1*k05_r_r1*k07_r_r1*k09_r_r1*k12_r_r1*m_m6*m_m14 + k04_r_r1*k06_r_r1*k08_r_r1*k10_r_r1*k12_r_r1*m_m5*m_m14 + k01_r_r1*k04_r_r1*k05_r_r1*k07_r_r1*k10_r_r1*m_m3*m_m5*m_m6 + k01_r_r1*k04_r_r1*k05_r_r1*k08_r_r1*k10_r_r1*m_m3*m_m5*m_m6 + k04_r_r1*k05_r_r1*k07_r_r1*k10_r_r1*k12_r_r1*m_m5*m_m6*m_m14 + k04_r_r1*k05_r_r1*k08_r_r1*k10_r_r1*k12_r_r1*m_m5*m_m6*m_m14)) - (k01_r_r5*k03_r_r5*k05_r_r5*m_m6 - k02_r_r5*k04_r_r5*k06_r_r5*m_m10)/(k02_r_r5*k04_r_r5 + k02_r_r5*k05_r_r5 + k03_r_r5*k05_r_r5 + k01_r_r5*k03_r_r5*m_m6 + k01_r_r5*k04_r_r5*m_m6 + k01_r_r5*k05_r_r5*m_m6 + k02_r_r5*k06_r_r5*m_m10 + k03_r_r5*k06_r_r5*m_m10 + k04_r_r5*k06_r_r5*m_m10) - (k01_r_r8*m_m6 - k02_r_r8*m_m16) + (k01_r_r7*m_m4 - k02_r_r7*m_m6))*(1/m_m6_ref);
  m_m7' = (-(k06_r_r3*(k01_r_r3*k03_r_r3*k07_r_r3*k09_r_r3*k11_r_r3*m_m1*m_m7 - k02_r_r3*k04_r_r3*k08_r_r3*k10_r_r3*k12_r_r3*m_m8*m_m12)/(k02_r_r3*k04_r_r3*k06_r_r3*k08_r_r3*k11_r_r3 + k02_r_r3*k04_r_r3*k06_r_r3*k09_r_r3*k11_r_r3 + k02_r_r3*k06_r_r3*k07_r_r3*k09_r_r3*k11_r_r3 + k01_r_r3*k04_r_r3*k06_r_r3*k08_r_r3*k11_r_r3*m_m1 + k01_r_r3*k04_r_r3*k06_r_r3*k09_r_r3*k11_r_r3*m_m1 + k01_r_r3*k06_r_r3*k07_r_r3*k09_r_r3*k11_r_r3*m_m1 + k02_r_r3*k04_r_r3*k06_r_r3*k08_r_r3*k10_r_r3*m_m8 + k03_r_r3*k06_r_r3*k07_r_r3*k09_r_r3*k11_r_r3*m_m7 + k02_r_r3*k04_r_r3*k06_r_r3*k08_r_r3*k12_r_r3*m_m12 + k02_r_r3*k04_r_r3*k06_r_r3*k09_r_r3*k12_r_r3*m_m12 + k02_r_r3*k06_r_r3*k07_r_r3*k09_r_r3*k12_r_r3*m_m12 + k01_r_r3*k03_r_r3*k06_r_r3*k07_r_r3*k09_r_r3*m_m1*m_m7 + k01_r_r3*k03_r_r3*k06_r_r3*k07_r_r3*k11_r_r3*m_m1*m_m7 + k01_r_r3*k03_r_r3*k06_r_r3*k08_r_r3*k11_r_r3*m_m1*m_m7 + k01_r_r3*k03_r_r3*k06_r_r3*k09_r_r3*k11_r_r3*m_m1*m_m7 + k01_r_r3*k04_r_r3*k06_r_r3*k08_r_r3*k10_r_r3*m_m1*m_m8 + k02_r_r3*k04_r_r3*k06_r_r3*k10_r_r3*k12_r_r3*m_m8*m_m12 + k03_r_r3*k06_r_r3*k07_r_r3*k09_r_r3*k12_r_r3*m_m7*m_m12 + k02_r_r3*k06_r_r3*k07_r_r3*k10_r_r3*k12_r_r3*m_m8*m_m12 + k02_r_r3*k06_r_r3*k08_r_r3*k10_r_r3*k12_r_r3*m_m8*m_m12 + k04_r_r3*k06_r_r3*k08_r_r3*k10_r_r3*k12_r_r3*m_m8*m_m12 + k01_r_r3*k03_r_r3*k06_r_r3*k07_r_r3*k10_r_r3*m_m1*m_m7*m_m8 + k01_r_r3*k03_r_r3*k06_r_r3*k08_r_r3*k10_r_r3*m_m1*m_m7*m_m8 + k01_r_r3*k03_r_r3*k05_r_r3*k08_r_r3*k11_r_r3*m_m1*m_m7*m_m9 + k01_r_r3*k03_r_r3*k05_r_r3*k09_r_r3*k11_r_r3*m_m1*m_m7*m_m9 + k03_r_r3*k06_r_r3*k07_r_r3*k10_r_r3*k12_r_r3*m_m7*m_m8*m_m12 + k02_r_r3*k05_r_r3*k08_r_r3*k10_r_r3*k12_r_r3*m_m8*m_m9*m_m12 + k03_r_r3*k06_r_r3*k08_r_r3*k10_r_r3*k12_r_r3*m_m7*m_m8*m_m12 + k01_r_r3*k03_r_r3*k05_r_r3*k08_r_r3*k10_r_r3*m_m1*m_m7*m_m8*m_m9 + k03_r_r3*k05_r_r3*k08_r_r3*k10_r_r3*k12_r_r3*m_m7*m_m8*m_m9*m_m12)) - (k01_r_r9*m_m7 - k02_r_r9*m_m20) + (k01_r_r2*k03_r_r2*k05_r_r2*m_m5 - k02_r_r2*k04_r_r2*k06_r_r2*m_m7)/(k02_r_r2*k04_r_r2 + k02_r_r2*k05_r_r2 + k03_r_r2*k05_r_r2 + k01_r_r2*k03_r_r2*m_m5 + k01_r_r2*k04_r_r2*m_m5 + k01_r_r2*k05_r_r2*m_m5 + k02_r_r2*k06_r_r2*m_m7 + k03_r_r2*k06_r_r2*m_m7 + k04_r_r2*k06_r_r2*m_m7))*(1/m_m7_ref);
  m_m8' = (-((k01_r_r4*k04_r_r4*k05_r_r4*k09_r_r4*k11_r_r4*k15_r_r4*k17_r_r4*m_m2*m_m8 + k01_r_r4*k04_r_r4*k05_r_r4*k09_r_r4*k13_r_r4*k15_r_r4*k17_r_r4*m_m2*m_m8 + k02_r_r4*k03_r_r4*k07_r_r4*k09_r_r4*k11_r_r4*k15_r_r4*k17_r_r4*m_m2*m_m8 + k02_r_r4*k03_r_r4*k07_r_r4*k09_r_r4*k13_r_r4*k15_r_r4*k17_r_r4*m_m2*m_m8 - k02_r_r4*k04_r_r4*k06_r_r4*k10_r_r4*k12_r_r4*k16_r_r4*k17_r_r4*m_m9*m_m13 - k02_r_r4*k04_r_r4*k06_r_r4*k10_r_r4*k14_r_r4*k15_r_r4*k18_r_r4*m_m9*m_m13 - k02_r_r4*k04_r_r4*k08_r_r4*k10_r_r4*k12_r_r4*k16_r_r4*k17_r_r4*m_m9*m_m13 - k02_r_r4*k04_r_r4*k08_r_r4*k10_r_r4*k14_r_r4*k15_r_r4*k18_r_r4*m_m9*m_m13 + k01_r_r4*k05_r_r4*k07_r_r4*k09_r_r4*k11_r_r4*k15_r_r4*k17_r_r4*m_m2^2*m_m8 + k01_r_r4*k05_r_r4*k07_r_r4*k09_r_r4*k13_r_r4*k15_r_r4*k17_r_r4*m_m2^2*m_m8 + k03_r_r4*k05_r_r4*k07_r_r4*k09_r_r4*k11_r_r4*k15_r_r4*k17_r_r4*m_m2*m_m8^2 + k03_r_r4*k05_r_r4*k07_r_r4*k09_r_r4*k13_r_r4*k15_r_r4*k17_r_r4*m_m2*m_m8^2 - k02_r_r4*k04_r_r4*k06_r_r4*k10_r_r4*k12_r_r4*k14_r_r4*k16_r_r4*m_m9*m_m13^2 - k02_r_r4*k04_r_r4*k06_r_r4*k10_r_r4*k12_r_r4*k14_r_r4*k18_r_r4*m_m9^2*m_m13 - k02_r_r4*k04_r_r4*k08_r_r4*k10_r_r4*k12_r_r4*k14_r_r4*k16_r_r4*m_m9*m_m13^2 - k02_r_r4*k04_r_r4*k08_r_r4*k10_r_r4*k12_r_r4*k14_r_r4*k18_r_r4*m_m9^2*m_m13 + k01_r_r4*k04_r_r4*k05_r_r4*k09_r_r4*k12_r_r4*k13_r_r4*k17_r_r4*m_m2*m_m8*m_m9 + k01_r_r4*k04_r_r4*k05_r_r4*k09_r_r4*k11_r_r4*k14_r_r4*k15_r_r4*m_m2*m_m8*m_m13 + k02_r_r4*k03_r_r4*k07_r_r4*k09_r_r4*k12_r_r4*k13_r_r4*k17_r_r4*m_m2*m_m8*m_m9 + k02_r_r4*k03_r_r4*k07_r_r4*k09_r_r4*k11_r_r4*k14_r_r4*k15_r_r4*m_m2*m_m8*m_m13 - k02_r_r4*k06_r_r4*k07_r_r4*k10_r_r4*k12_r_r4*k16_r_r4*k17_r_r4*m_m2*m_m9*m_m13 - k02_r_r4*k06_r_r4*k07_r_r4*k10_r_r4*k14_r_r4*k15_r_r4*k18_r_r4*m_m2*m_m9*m_m13 - k04_r_r4*k05_r_r4*k08_r_r4*k10_r_r4*k12_r_r4*k16_r_r4*k17_r_r4*m_m8*m_m9*m_m13 - k04_r_r4*k05_r_r4*k08_r_r4*k10_r_r4*k14_r_r4*k15_r_r4*k18_r_r4*m_m8*m_m9*m_m13 + k01_r_r4*k05_r_r4*k07_r_r4*k09_r_r4*k12_r_r4*k13_r_r4*k17_r_r4*m_m2^2*m_m8*m_m9 + k01_r_r4*k05_r_r4*k07_r_r4*k09_r_r4*k11_r_r4*k14_r_r4*k15_r_r4*m_m2^2*m_m8*m_m13 + k03_r_r4*k05_r_r4*k07_r_r4*k09_r_r4*k12_r_r4*k13_r_r4*k17_r_r4*m_m2*m_m8^2*m_m9 + k03_r_r4*k05_r_r4*k07_r_r4*k09_r_r4*k11_r_r4*k14_r_r4*k15_r_r4*m_m2*m_m8^2*m_m13 - k02_r_r4*k06_r_r4*k07_r_r4*k10_r_r4*k12_r_r4*k14_r_r4*k16_r_r4*m_m2*m_m9*m_m13^2 - k02_r_r4*k06_r_r4*k07_r_r4*k10_r_r4*k12_r_r4*k14_r_r4*k18_r_r4*m_m2*m_m9^2*m_m13 - k04_r_r4*k05_r_r4*k08_r_r4*k10_r_r4*k12_r_r4*k14_r_r4*k16_r_r4*m_m8*m_m9*m_m13^2 - k04_r_r4*k05_r_r4*k08_r_r4*k10_r_r4*k12_r_r4*k14_r_r4*k18_r_r4*m_m8*m_m9^2*m_m13)/(k02_r_r4*k04_r_r4*k06_r_r4*k10_r_r4*k15_r_r4*k17_r_r4 + k02_r_r4*k04_r_r4*k06_r_r4*k11_r_r4*k15_r_r4*k17_r_r4 + k02_r_r4*k04_r_r4*k08_r_r4*k10_r_r4*k15_r_r4*k17_r_r4 + k02_r_r4*k04_r_r4*k06_r_r4*k13_r_r4*k15_r_r4*k17_r_r4 + k02_r_r4*k04_r_r4*k08_r_r4*k11_r_r4*k15_r_r4*k17_r_r4 + k02_r_r4*k04_r_r4*k09_r_r4*k11_r_r4*k15_r_r4*k17_r_r4 + k02_r_r4*k04_r_r4*k08_r_r4*k13_r_r4*k15_r_r4*k17_r_r4 + k02_r_r4*k04_r_r4*k09_r_r4*k13_r_r4*k15_r_r4*k17_r_r4 + k01_r_r4*k04_r_r4*k06_r_r4*k10_r_r4*k15_r_r4*k17_r_r4*m_m2 + k01_r_r4*k04_r_r4*k06_r_r4*k11_r_r4*k15_r_r4*k17_r_r4*m_m2 + k01_r_r4*k04_r_r4*k08_r_r4*k10_r_r4*k15_r_r4*k17_r_r4*m_m2 + k01_r_r4*k04_r_r4*k06_r_r4*k13_r_r4*k15_r_r4*k17_r_r4*m_m2 + k01_r_r4*k04_r_r4*k08_r_r4*k11_r_r4*k15_r_r4*k17_r_r4*m_m2 + k01_r_r4*k04_r_r4*k09_r_r4*k11_r_r4*k15_r_r4*k17_r_r4*m_m2 + k02_r_r4*k06_r_r4*k07_r_r4*k10_r_r4*k15_r_r4*k17_r_r4*m_m2 + k01_r_r4*k04_r_r4*k08_r_r4*k13_r_r4*k15_r_r4*k17_r_r4*m_m2 + k02_r_r4*k04_r_r4*k06_r_r4*k10_r_r4*k12_r_r4*k17_r_r4*m_m9 + k02_r_r4*k06_r_r4*k07_r_r4*k11_r_r4*k15_r_r4*k17_r_r4*m_m2 + k01_r_r4*k04_r_r4*k09_r_r4*k13_r_r4*k15_r_r4*k17_r_r4*m_m2 + k02_r_r4*k03_r_r4*k06_r_r4*k10_r_r4*k15_r_r4*k17_r_r4*m_m8 + k02_r_r4*k03_r_r4*k06_r_r4*k11_r_r4*k15_r_r4*k17_r_r4*m_m8 + k02_r_r4*k04_r_r4*k08_r_r4*k10_r_r4*k12_r_r4*k17_r_r4*m_m9 + k02_r_r4*k06_r_r4*k07_r_r4*k13_r_r4*k15_r_r4*k17_r_r4*m_m2 + k02_r_r4*k03_r_r4*k08_r_r4*k10_r_r4*k15_r_r4*k17_r_r4*m_m8 + k02_r_r4*k04_r_r4*k06_r_r4*k12_r_r4*k13_r_r4*k17_r_r4*m_m9 + k02_r_r4*k07_r_r4*k09_r_r4*k11_r_r4*k15_r_r4*k17_r_r4*m_m2 + k02_r_r4*k03_r_r4*k06_r_r4*k13_r_r4*k15_r_r4*k17_r_r4*m_m8 + k02_r_r4*k03_r_r4*k08_r_r4*k11_r_r4*k15_r_r4*k17_r_r4*m_m8 + k02_r_r4*k04_r_r4*k06_r_r4*k10_r_r4*k14_r_r4*k15_r_r4*m_m13 + k02_r_r4*k04_r_r4*k06_r_r4*k10_r_r4*k15_r_r4*k18_r_r4*m_m9 + k02_r_r4*k03_r_r4*k09_r_r4*k11_r_r4*k15_r_r4*k17_r_r4*m_m8 + k02_r_r4*k04_r_r4*k06_r_r4*k11_r_r4*k14_r_r4*k15_r_r4*m_m13 + k02_r_r4*k04_r_r4*k06_r_r4*k11_r_r4*k15_r_r4*k18_r_r4*m_m9 + k02_r_r4*k04_r_r4*k08_r_r4*k12_r_r4*k13_r_r4*k17_r_r4*m_m9 + k02_r_r4*k07_r_r4*k09_r_r4*k13_r_r4*k15_r_r4*k17_r_r4*m_m2 + k02_r_r4*k03_r_r4*k08_r_r4*k13_r_r4*k15_r_r4*k17_r_r4*m_m8 + k02_r_r4*k04_r_r4*k08_r_r4*k10_r_r4*k14_r_r4*k15_r_r4*m_m13 + k02_r_r4*k04_r_r4*k08_r_r4*k10_r_r4*k15_r_r4*k18_r_r4*m_m9 + k02_r_r4*k04_r_r4*k09_r_r4*k12_r_r4*k13_r_r4*k17_r_r4*m_m9 + k02_r_r4*k03_r_r4*k09_r_r4*k13_r_r4*k15_r_r4*k17_r_r4*m_m8 + k02_r_r4*k04_r_r4*k06_r_r4*k13_r_r4*k15_r_r4*k18_r_r4*m_m9 + k02_r_r4*k04_r_r4*k08_r_r4*k11_r_r4*k14_r_r4*k15_r_r4*m_m13 + k02_r_r4*k04_r_r4*k08_r_r4*k11_r_r4*k15_r_r4*k18_r_r4*m_m9 + k04_r_r4*k05_r_r4*k08_r_r4*k10_r_r4*k15_r_r4*k17_r_r4*m_m8 + k02_r_r4*k04_r_r4*k06_r_r4*k10_r_r4*k16_r_r4*k17_r_r4*m_m13 + k02_r_r4*k04_r_r4*k09_r_r4*k11_r_r4*k14_r_r4*k15_r_r4*m_m13 + k02_r_r4*k04_r_r4*k09_r_r4*k11_r_r4*k15_r_r4*k18_r_r4*m_m9 + k04_r_r4*k05_r_r4*k08_r_r4*k11_r_r4*k15_r_r4*k17_r_r4*m_m8 + k02_r_r4*k04_r_r4*k06_r_r4*k11_r_r4*k16_r_r4*k17_r_r4*m_m13 + k02_r_r4*k04_r_r4*k08_r_r4*k13_r_r4*k15_r_r4*k18_r_r4*m_m9 + k04_r_r4*k05_r_r4*k09_r_r4*k11_r_r4*k15_r_r4*k17_r_r4*m_m8 + k02_r_r4*k04_r_r4*k08_r_r4*k10_r_r4*k16_r_r4*k17_r_r4*m_m13 + k02_r_r4*k04_r_r4*k09_r_r4*k13_r_r4*k15_r_r4*k18_r_r4*m_m9 + k04_r_r4*k05_r_r4*k08_r_r4*k13_r_r4*k15_r_r4*k17_r_r4*m_m8 + k02_r_r4*k04_r_r4*k06_r_r4*k13_r_r4*k16_r_r4*k17_r_r4*m_m13 + k02_r_r4*k04_r_r4*k08_r_r4*k11_r_r4*k16_r_r4*k17_r_r4*m_m13 + k04_r_r4*k05_r_r4*k09_r_r4*k13_r_r4*k15_r_r4*k17_r_r4*m_m8 + k02_r_r4*k04_r_r4*k09_r_r4*k11_r_r4*k16_r_r4*k17_r_r4*m_m13 + k02_r_r4*k04_r_r4*k08_r_r4*k13_r_r4*k16_r_r4*k17_r_r4*m_m13 + k02_r_r4*k04_r_r4*k09_r_r4*k13_r_r4*k16_r_r4*k17_r_r4*m_m13 + k01_r_r4*k06_r_r4*k07_r_r4*k10_r_r4*k15_r_r4*k17_r_r4*m_m2^2 + k01_r_r4*k06_r_r4*k07_r_r4*k11_r_r4*k15_r_r4*k17_r_r4*m_m2^2 + k01_r_r4*k06_r_r4*k07_r_r4*k13_r_r4*k15_r_r4*k17_r_r4*m_m2^2 + k02_r_r4*k04_r_r4*k06_r_r4*k10_r_r4*k12_r_r4*k18_r_r4*m_m9^2 + k01_r_r4*k07_r_r4*k09_r_r4*k11_r_r4*k15_r_r4*k17_r_r4*m_m2^2 + k02_r_r4*k04_r_r4*k08_r_r4*k10_r_r4*k12_r_r4*k18_r_r4*m_m9^2 + k01_r_r4*k07_r_r4*k09_r_r4*k13_r_r4*k15_r_r4*k17_r_r4*m_m2^2 + k02_r_r4*k04_r_r4*k06_r_r4*k12_r_r4*k13_r_r4*k18_r_r4*m_m9^2 + k02_r_r4*k04_r_r4*k06_r_r4*k10_r_r4*k14_r_r4*k16_r_r4*m_m13^2 + k02_r_r4*k04_r_r4*k06_r_r4*k11_r_r4*k14_r_r4*k16_r_r4*m_m13^2 + k02_r_r4*k04_r_r4*k08_r_r4*k12_r_r4*k13_r_r4*k18_r_r4*m_m9^2 + k03_r_r4*k05_r_r4*k08_r_r4*k10_r_r4*k15_r_r4*k17_r_r4*m_m8^2 + k02_r_r4*k04_r_r4*k08_r_r4*k10_r_r4*k14_r_r4*k16_r_r4*m_m13^2 + k02_r_r4*k04_r_r4*k09_r_r4*k12_r_r4*k13_r_r4*k18_r_r4*m_m9^2 + k03_r_r4*k05_r_r4*k08_r_r4*k11_r_r4*k15_r_r4*k17_r_r4*m_m8^2 + k02_r_r4*k04_r_r4*k08_r_r4*k11_r_r4*k14_r_r4*k16_r_r4*m_m13^2 + k03_r_r4*k05_r_r4*k09_r_r4*k11_r_r4*k15_r_r4*k17_r_r4*m_m8^2 + k02_r_r4*k04_r_r4*k09_r_r4*k11_r_r4*k14_r_r4*k16_r_r4*m_m13^2 + k03_r_r4*k05_r_r4*k08_r_r4*k13_r_r4*k15_r_r4*k17_r_r4*m_m8^2 + k03_r_r4*k05_r_r4*k09_r_r4*k13_r_r4*k15_r_r4*k17_r_r4*m_m8^2 + k01_r_r4*k05_r_r4*k07_r_r4*k09_r_r4*k11_r_r4*k17_r_r4*m_m2^2*m_m8 + k01_r_r4*k05_r_r4*k07_r_r4*k09_r_r4*k13_r_r4*k15_r_r4*m_m2^2*m_m8 + k03_r_r4*k05_r_r4*k07_r_r4*k09_r_r4*k11_r_r4*k17_r_r4*m_m2*m_m8^2 + k03_r_r4*k05_r_r4*k07_r_r4*k09_r_r4*k13_r_r4*k15_r_r4*m_m2*m_m8^2 + k01_r_r4*k05_r_r4*k07_r_r4*k09_r_r4*k15_r_r4*k17_r_r4*m_m2^2*m_m8 + k01_r_r4*k06_r_r4*k07_r_r4*k10_r_r4*k12_r_r4*k17_r_r4*m_m2^2*m_m9 + k01_r_r4*k05_r_r4*k07_r_r4*k10_r_r4*k15_r_r4*k17_r_r4*m_m2^2*m_m8 + k01_r_r4*k05_r_r4*k07_r_r4*k11_r_r4*k15_r_r4*k17_r_r4*m_m2^2*m_m8 + k02_r_r4*k06_r_r4*k07_r_r4*k10_r_r4*k12_r_r4*k18_r_r4*m_m2*m_m9^2 + k03_r_r4*k05_r_r4*k07_r_r4*k09_r_r4*k15_r_r4*k17_r_r4*m_m2*m_m8^2 + k01_r_r4*k06_r_r4*k07_r_r4*k12_r_r4*k13_r_r4*k17_r_r4*m_m2^2*m_m9 + k03_r_r4*k05_r_r4*k07_r_r4*k10_r_r4*k15_r_r4*k17_r_r4*m_m2*m_m8^2 + k01_r_r4*k05_r_r4*k07_r_r4*k13_r_r4*k15_r_r4*k17_r_r4*m_m2^2*m_m8 + k01_r_r4*k06_r_r4*k07_r_r4*k10_r_r4*k14_r_r4*k15_r_r4*m_m2^2*m_m13 + k03_r_r4*k05_r_r4*k07_r_r4*k11_r_r4*k15_r_r4*k17_r_r4*m_m2*m_m8^2 + k01_r_r4*k06_r_r4*k07_r_r4*k11_r_r4*k14_r_r4*k15_r_r4*m_m2^2*m_m13 + k02_r_r4*k06_r_r4*k07_r_r4*k12_r_r4*k13_r_r4*k18_r_r4*m_m2*m_m9^2 + k01_r_r4*k07_r_r4*k09_r_r4*k12_r_r4*k13_r_r4*k17_r_r4*m_m2^2*m_m9 + k02_r_r4*k06_r_r4*k07_r_r4*k10_r_r4*k14_r_r4*k16_r_r4*m_m2*m_m13^2 + k03_r_r4*k05_r_r4*k07_r_r4*k13_r_r4*k15_r_r4*k17_r_r4*m_m2*m_m8^2 + k02_r_r4*k06_r_r4*k07_r_r4*k11_r_r4*k14_r_r4*k16_r_r4*m_m2*m_m13^2 + k01_r_r4*k07_r_r4*k09_r_r4*k11_r_r4*k14_r_r4*k15_r_r4*m_m2^2*m_m13 + k02_r_r4*k07_r_r4*k09_r_r4*k12_r_r4*k13_r_r4*k18_r_r4*m_m2*m_m9^2 + k03_r_r4*k05_r_r4*k08_r_r4*k10_r_r4*k12_r_r4*k17_r_r4*m_m8^2*m_m9 + k02_r_r4*k07_r_r4*k09_r_r4*k11_r_r4*k14_r_r4*k16_r_r4*m_m2*m_m13^2 + k04_r_r4*k05_r_r4*k08_r_r4*k10_r_r4*k12_r_r4*k18_r_r4*m_m8*m_m9^2 + k03_r_r4*k05_r_r4*k08_r_r4*k12_r_r4*k13_r_r4*k17_r_r4*m_m8^2*m_m9 + k02_r_r4*k04_r_r4*k06_r_r4*k12_r_r4*k14_r_r4*k16_r_r4*m_m9*m_m13^2 + k03_r_r4*k05_r_r4*k08_r_r4*k10_r_r4*k14_r_r4*k15_r_r4*m_m8^2*m_m13 + k03_r_r4*k05_r_r4*k09_r_r4*k12_r_r4*k13_r_r4*k17_r_r4*m_m8^2*m_m9 + k03_r_r4*k05_r_r4*k08_r_r4*k11_r_r4*k14_r_r4*k15_r_r4*m_m8^2*m_m13 + k04_r_r4*k05_r_r4*k08_r_r4*k12_r_r4*k13_r_r4*k18_r_r4*m_m8*m_m9^2 + k02_r_r4*k04_r_r4*k06_r_r4*k12_r_r4*k14_r_r4*k18_r_r4*m_m9^2*m_m13 + k02_r_r4*k04_r_r4*k08_r_r4*k12_r_r4*k14_r_r4*k16_r_r4*m_m9*m_m13^2 + k03_r_r4*k05_r_r4*k09_r_r4*k11_r_r4*k14_r_r4*k15_r_r4*m_m8^2*m_m13 + k04_r_r4*k05_r_r4*k08_r_r4*k10_r_r4*k14_r_r4*k16_r_r4*m_m8*m_m13^2 + k04_r_r4*k05_r_r4*k09_r_r4*k12_r_r4*k13_r_r4*k18_r_r4*m_m8*m_m9^2 + k02_r_r4*k04_r_r4*k09_r_r4*k12_r_r4*k14_r_r4*k16_r_r4*m_m9*m_m13^2 + k04_r_r4*k05_r_r4*k08_r_r4*k11_r_r4*k14_r_r4*k16_r_r4*m_m8*m_m13^2 + k02_r_r4*k04_r_r4*k08_r_r4*k12_r_r4*k14_r_r4*k18_r_r4*m_m9^2*m_m13 + k02_r_r4*k04_r_r4*k10_r_r4*k12_r_r4*k14_r_r4*k16_r_r4*m_m9*m_m13^2 + k04_r_r4*k05_r_r4*k09_r_r4*k11_r_r4*k14_r_r4*k16_r_r4*m_m8*m_m13^2 + k02_r_r4*k04_r_r4*k09_r_r4*k12_r_r4*k14_r_r4*k18_r_r4*m_m9^2*m_m13 + k02_r_r4*k04_r_r4*k10_r_r4*k12_r_r4*k14_r_r4*k18_r_r4*m_m9^2*m_m13 + k02_r_r4*k08_r_r4*k10_r_r4*k12_r_r4*k14_r_r4*k16_r_r4*m_m9*m_m13^2 + k04_r_r4*k06_r_r4*k10_r_r4*k12_r_r4*k14_r_r4*k16_r_r4*m_m9*m_m13^2 + k02_r_r4*k08_r_r4*k10_r_r4*k12_r_r4*k14_r_r4*k18_r_r4*m_m9^2*m_m13 + k04_r_r4*k06_r_r4*k10_r_r4*k12_r_r4*k14_r_r4*k18_r_r4*m_m9^2*m_m13 + k01_r_r4*k04_r_r4*k05_r_r4*k09_r_r4*k11_r_r4*k17_r_r4*m_m2*m_m8 + k01_r_r4*k04_r_r4*k05_r_r4*k09_r_r4*k13_r_r4*k15_r_r4*m_m2*m_m8 + k02_r_r4*k03_r_r4*k07_r_r4*k09_r_r4*k11_r_r4*k17_r_r4*m_m2*m_m8 + k02_r_r4*k03_r_r4*k07_r_r4*k09_r_r4*k13_r_r4*k15_r_r4*m_m2*m_m8 + k01_r_r4*k04_r_r4*k05_r_r4*k09_r_r4*k15_r_r4*k17_r_r4*m_m2*m_m8 + k01_r_r4*k04_r_r4*k06_r_r4*k10_r_r4*k12_r_r4*k17_r_r4*m_m2*m_m9 + k01_r_r4*k04_r_r4*k05_r_r4*k10_r_r4*k15_r_r4*k17_r_r4*m_m2*m_m8 + k01_r_r4*k04_r_r4*k05_r_r4*k11_r_r4*k15_r_r4*k17_r_r4*m_m2*m_m8 + k01_r_r4*k04_r_r4*k08_r_r4*k10_r_r4*k12_r_r4*k17_r_r4*m_m2*m_m9 + k02_r_r4*k03_r_r4*k07_r_r4*k09_r_r4*k15_r_r4*k17_r_r4*m_m2*m_m8 + k01_r_r4*k04_r_r4*k06_r_r4*k12_r_r4*k13_r_r4*k17_r_r4*m_m2*m_m9 + k02_r_r4*k03_r_r4*k07_r_r4*k10_r_r4*k15_r_r4*k17_r_r4*m_m2*m_m8 + k01_r_r4*k04_r_r4*k05_r_r4*k13_r_r4*k15_r_r4*k17_r_r4*m_m2*m_m8 + k01_r_r4*k04_r_r4*k06_r_r4*k10_r_r4*k14_r_r4*k15_r_r4*m_m2*m_m13 + k02_r_r4*k03_r_r4*k07_r_r4*k11_r_r4*k15_r_r4*k17_r_r4*m_m2*m_m8 + k02_r_r4*k06_r_r4*k07_r_r4*k10_r_r4*k12_r_r4*k17_r_r4*m_m2*m_m9 + k01_r_r4*k04_r_r4*k06_r_r4*k11_r_r4*k14_r_r4*k15_r_r4*m_m2*m_m13 + k01_r_r4*k04_r_r4*k08_r_r4*k12_r_r4*k13_r_r4*k17_r_r4*m_m2*m_m9 + k01_r_r4*k05_r_r4*k08_r_r4*k10_r_r4*k15_r_r4*k17_r_r4*m_m2*m_m8 + k01_r_r4*k04_r_r4*k08_r_r4*k10_r_r4*k14_r_r4*k15_r_r4*m_m2*m_m13 + k01_r_r4*k04_r_r4*k09_r_r4*k12_r_r4*k13_r_r4*k17_r_r4*m_m2*m_m9 + k01_r_r4*k05_r_r4*k08_r_r4*k11_r_r4*k15_r_r4*k17_r_r4*m_m2*m_m8 + k02_r_r4*k03_r_r4*k06_r_r4*k10_r_r4*k12_r_r4*k17_r_r4*m_m8*m_m9 + k02_r_r4*k03_r_r4*k07_r_r4*k13_r_r4*k15_r_r4*k17_r_r4*m_m2*m_m8 + k01_r_r4*k04_r_r4*k08_r_r4*k11_r_r4*k14_r_r4*k15_r_r4*m_m2*m_m13 + k02_r_r4*k06_r_r4*k07_r_r4*k12_r_r4*k13_r_r4*k17_r_r4*m_m2*m_m9 + k03_r_r4*k06_r_r4*k07_r_r4*k10_r_r4*k15_r_r4*k17_r_r4*m_m2*m_m8 + k01_r_r4*k04_r_r4*k09_r_r4*k11_r_r4*k14_r_r4*k15_r_r4*m_m2*m_m13 + k01_r_r4*k05_r_r4*k08_r_r4*k13_r_r4*k15_r_r4*k17_r_r4*m_m2*m_m8 + k02_r_r4*k03_r_r4*k08_r_r4*k10_r_r4*k12_r_r4*k17_r_r4*m_m8*m_m9 + k02_r_r4*k06_r_r4*k07_r_r4*k10_r_r4*k14_r_r4*k15_r_r4*m_m2*m_m13 + k02_r_r4*k06_r_r4*k07_r_r4*k10_r_r4*k15_r_r4*k18_r_r4*m_m2*m_m9 + k03_r_r4*k06_r_r4*k07_r_r4*k11_r_r4*k15_r_r4*k17_r_r4*m_m2*m_m8 + k02_r_r4*k03_r_r4*k06_r_r4*k12_r_r4*k13_r_r4*k17_r_r4*m_m8*m_m9 + k02_r_r4*k04_r_r4*k06_r_r4*k10_r_r4*k12_r_r4*k14_r_r4*m_m9*m_m13 + k02_r_r4*k06_r_r4*k07_r_r4*k11_r_r4*k14_r_r4*k15_r_r4*m_m2*m_m13 + k02_r_r4*k06_r_r4*k07_r_r4*k11_r_r4*k15_r_r4*k18_r_r4*m_m2*m_m9 + k02_r_r4*k03_r_r4*k06_r_r4*k10_r_r4*k14_r_r4*k15_r_r4*m_m8*m_m13 + k02_r_r4*k07_r_r4*k09_r_r4*k12_r_r4*k13_r_r4*k17_r_r4*m_m2*m_m9 + k03_r_r4*k06_r_r4*k07_r_r4*k13_r_r4*k15_r_r4*k17_r_r4*m_m2*m_m8 + k02_r_r4*k03_r_r4*k06_r_r4*k11_r_r4*k14_r_r4*k15_r_r4*m_m8*m_m13 + k02_r_r4*k03_r_r4*k08_r_r4*k12_r_r4*k13_r_r4*k17_r_r4*m_m8*m_m9 + k02_r_r4*k04_r_r4*k08_r_r4*k10_r_r4*k12_r_r4*k14_r_r4*m_m9*m_m13 + k02_r_r4*k06_r_r4*k07_r_r4*k13_r_r4*k15_r_r4*k18_r_r4*m_m2*m_m9 + k02_r_r4*k03_r_r4*k08_r_r4*k10_r_r4*k14_r_r4*k15_r_r4*m_m8*m_m13 + k02_r_r4*k03_r_r4*k09_r_r4*k12_r_r4*k13_r_r4*k17_r_r4*m_m8*m_m9 + k02_r_r4*k06_r_r4*k07_r_r4*k10_r_r4*k16_r_r4*k17_r_r4*m_m2*m_m13 + k02_r_r4*k07_r_r4*k09_r_r4*k11_r_r4*k14_r_r4*k15_r_r4*m_m2*m_m13 + k02_r_r4*k07_r_r4*k09_r_r4*k11_r_r4*k15_r_r4*k18_r_r4*m_m2*m_m9 + k04_r_r4*k05_r_r4*k08_r_r4*k10_r_r4*k12_r_r4*k17_r_r4*m_m8*m_m9 + k02_r_r4*k03_r_r4*k08_r_r4*k11_r_r4*k14_r_r4*k15_r_r4*m_m8*m_m13 + k02_r_r4*k06_r_r4*k07_r_r4*k11_r_r4*k16_r_r4*k17_r_r4*m_m2*m_m13 + k05_r_r4*k07_r_r4*k09_r_r4*k11_r_r4*k15_r_r4*k17_r_r4*m_m2*m_m8 + k02_r_r4*k03_r_r4*k09_r_r4*k11_r_r4*k14_r_r4*k15_r_r4*m_m8*m_m13 + k02_r_r4*k04_r_r4*k06_r_r4*k12_r_r4*k13_r_r4*k16_r_r4*m_m9*m_m13 + k02_r_r4*k07_r_r4*k09_r_r4*k13_r_r4*k15_r_r4*k18_r_r4*m_m2*m_m9 + k02_r_r4*k06_r_r4*k07_r_r4*k13_r_r4*k16_r_r4*k17_r_r4*m_m2*m_m13 + k04_r_r4*k05_r_r4*k08_r_r4*k12_r_r4*k13_r_r4*k17_r_r4*m_m8*m_m9 + k05_r_r4*k07_r_r4*k09_r_r4*k13_r_r4*k15_r_r4*k17_r_r4*m_m2*m_m8 + k02_r_r4*k04_r_r4*k06_r_r4*k11_r_r4*k14_r_r4*k18_r_r4*m_m9*m_m13 + k02_r_r4*k04_r_r4*k08_r_r4*k12_r_r4*k13_r_r4*k16_r_r4*m_m9*m_m13 + k02_r_r4*k07_r_r4*k09_r_r4*k11_r_r4*k16_r_r4*k17_r_r4*m_m2*m_m13 + k04_r_r4*k05_r_r4*k08_r_r4*k10_r_r4*k14_r_r4*k15_r_r4*m_m8*m_m13 + k04_r_r4*k05_r_r4*k08_r_r4*k10_r_r4*k15_r_r4*k18_r_r4*m_m8*m_m9 + k04_r_r4*k05_r_r4*k09_r_r4*k12_r_r4*k13_r_r4*k17_r_r4*m_m8*m_m9 + k02_r_r4*k04_r_r4*k09_r_r4*k12_r_r4*k13_r_r4*k16_r_r4*m_m9*m_m13 + k04_r_r4*k05_r_r4*k08_r_r4*k11_r_r4*k14_r_r4*k15_r_r4*m_m8*m_m13 + k04_r_r4*k05_r_r4*k08_r_r4*k11_r_r4*k15_r_r4*k18_r_r4*m_m8*m_m9 + k02_r_r4*k04_r_r4*k06_r_r4*k12_r_r4*k16_r_r4*k17_r_r4*m_m9*m_m13 + k02_r_r4*k04_r_r4*k08_r_r4*k11_r_r4*k14_r_r4*k18_r_r4*m_m9*m_m13 + k02_r_r4*k07_r_r4*k09_r_r4*k13_r_r4*k16_r_r4*k17_r_r4*m_m2*m_m13 + k04_r_r4*k05_r_r4*k09_r_r4*k11_r_r4*k14_r_r4*k15_r_r4*m_m8*m_m13 + k04_r_r4*k05_r_r4*k09_r_r4*k11_r_r4*k15_r_r4*k18_r_r4*m_m8*m_m9 + k02_r_r4*k04_r_r4*k09_r_r4*k11_r_r4*k14_r_r4*k18_r_r4*m_m9*m_m13 + k04_r_r4*k05_r_r4*k08_r_r4*k13_r_r4*k15_r_r4*k18_r_r4*m_m8*m_m9 + k02_r_r4*k04_r_r4*k06_r_r4*k14_r_r4*k15_r_r4*k18_r_r4*m_m9*m_m13 + k02_r_r4*k04_r_r4*k08_r_r4*k12_r_r4*k16_r_r4*k17_r_r4*m_m9*m_m13 + k04_r_r4*k05_r_r4*k08_r_r4*k10_r_r4*k16_r_r4*k17_r_r4*m_m8*m_m13 + k04_r_r4*k05_r_r4*k09_r_r4*k13_r_r4*k15_r_r4*k18_r_r4*m_m8*m_m9 + k02_r_r4*k04_r_r4*k09_r_r4*k12_r_r4*k16_r_r4*k17_r_r4*m_m9*m_m13 + k04_r_r4*k05_r_r4*k08_r_r4*k11_r_r4*k16_r_r4*k17_r_r4*m_m8*m_m13 + k02_r_r4*k04_r_r4*k08_r_r4*k14_r_r4*k15_r_r4*k18_r_r4*m_m9*m_m13 + k02_r_r4*k04_r_r4*k10_r_r4*k12_r_r4*k16_r_r4*k17_r_r4*m_m9*m_m13 + k04_r_r4*k05_r_r4*k09_r_r4*k11_r_r4*k16_r_r4*k17_r_r4*m_m8*m_m13 + k02_r_r4*k04_r_r4*k09_r_r4*k14_r_r4*k15_r_r4*k18_r_r4*m_m9*m_m13 + k04_r_r4*k05_r_r4*k08_r_r4*k13_r_r4*k16_r_r4*k17_r_r4*m_m8*m_m13 + k02_r_r4*k04_r_r4*k10_r_r4*k14_r_r4*k15_r_r4*k18_r_r4*m_m9*m_m13 + k04_r_r4*k05_r_r4*k09_r_r4*k13_r_r4*k16_r_r4*k17_r_r4*m_m8*m_m13 + k02_r_r4*k08_r_r4*k10_r_r4*k12_r_r4*k16_r_r4*k17_r_r4*m_m9*m_m13 + k04_r_r4*k06_r_r4*k10_r_r4*k12_r_r4*k16_r_r4*k17_r_r4*m_m9*m_m13 + k02_r_r4*k08_r_r4*k10_r_r4*k14_r_r4*k15_r_r4*k18_r_r4*m_m9*m_m13 + k04_r_r4*k06_r_r4*k10_r_r4*k14_r_r4*k15_r_r4*k18_r_r4*m_m9*m_m13 + k01_r_r4*k04_r_r4*k05_r_r4*k09_r_r4*k12_r_r4*k13_r_r4*m_m2*m_m8*m_m9 + k02_r_r4*k03_r_r4*k07_r_r4*k09_r_r4*k12_r_r4*k13_r_r4*m_m2*m_m8*m_m9 + k01_r_r4*k04_r_r4*k05_r_r4*k09_r_r4*k11_r_r4*k14_r_r4*m_m2*m_m8*m_m13 + k01_r_r4*k04_r_r4*k05_r_r4*k09_r_r4*k12_r_r4*k17_r_r4*m_m2*m_m8*m_m9 + k01_r_r4*k04_r_r4*k05_r_r4*k10_r_r4*k12_r_r4*k17_r_r4*m_m2*m_m8*m_m9 + k02_r_r4*k03_r_r4*k07_r_r4*k09_r_r4*k11_r_r4*k14_r_r4*m_m2*m_m8*m_m13 + k02_r_r4*k03_r_r4*k07_r_r4*k09_r_r4*k12_r_r4*k17_r_r4*m_m2*m_m8*m_m9 + k02_r_r4*k03_r_r4*k07_r_r4*k10_r_r4*k12_r_r4*k17_r_r4*m_m2*m_m8*m_m9 + k01_r_r4*k04_r_r4*k05_r_r4*k09_r_r4*k14_r_r4*k15_r_r4*m_m2*m_m8*m_m13 + k01_r_r4*k04_r_r4*k05_r_r4*k12_r_r4*k13_r_r4*k17_r_r4*m_m2*m_m8*m_m9 + k01_r_r4*k04_r_r4*k06_r_r4*k10_r_r4*k12_r_r4*k14_r_r4*m_m2*m_m9*m_m13 + k01_r_r4*k04_r_r4*k05_r_r4*k10_r_r4*k14_r_r4*k15_r_r4*m_m2*m_m8*m_m13 + k01_r_r4*k05_r_r4*k08_r_r4*k10_r_r4*k12_r_r4*k17_r_r4*m_m2*m_m8*m_m9 + k01_r_r4*k04_r_r4*k05_r_r4*k11_r_r4*k14_r_r4*k15_r_r4*m_m2*m_m8*m_m13 + k01_r_r4*k04_r_r4*k08_r_r4*k10_r_r4*k12_r_r4*k14_r_r4*m_m2*m_m9*m_m13 + k02_r_r4*k03_r_r4*k07_r_r4*k09_r_r4*k14_r_r4*k15_r_r4*m_m2*m_m8*m_m13 + k02_r_r4*k03_r_r4*k07_r_r4*k12_r_r4*k13_r_r4*k17_r_r4*m_m2*m_m8*m_m9 + k02_r_r4*k03_r_r4*k07_r_r4*k10_r_r4*k14_r_r4*k15_r_r4*m_m2*m_m8*m_m13 + k03_r_r4*k06_r_r4*k07_r_r4*k10_r_r4*k12_r_r4*k17_r_r4*m_m2*m_m8*m_m9 + k01_r_r4*k05_r_r4*k08_r_r4*k12_r_r4*k13_r_r4*k17_r_r4*m_m2*m_m8*m_m9 + k02_r_r4*k03_r_r4*k07_r_r4*k11_r_r4*k14_r_r4*k15_r_r4*m_m2*m_m8*m_m13 + k02_r_r4*k06_r_r4*k07_r_r4*k10_r_r4*k12_r_r4*k14_r_r4*m_m2*m_m9*m_m13 + k01_r_r4*k05_r_r4*k08_r_r4*k10_r_r4*k14_r_r4*k15_r_r4*m_m2*m_m8*m_m13 + k01_r_r4*k05_r_r4*k08_r_r4*k11_r_r4*k14_r_r4*k15_r_r4*m_m2*m_m8*m_m13 + k02_r_r4*k03_r_r4*k06_r_r4*k10_r_r4*k12_r_r4*k14_r_r4*m_m8*m_m9*m_m13 + k03_r_r4*k06_r_r4*k07_r_r4*k12_r_r4*k13_r_r4*k17_r_r4*m_m2*m_m8*m_m9 + k03_r_r4*k06_r_r4*k07_r_r4*k10_r_r4*k14_r_r4*k15_r_r4*m_m2*m_m8*m_m13 + k02_r_r4*k03_r_r4*k08_r_r4*k10_r_r4*k12_r_r4*k14_r_r4*m_m8*m_m9*m_m13 + k03_r_r4*k06_r_r4*k07_r_r4*k11_r_r4*k14_r_r4*k15_r_r4*m_m2*m_m8*m_m13 + k02_r_r4*k06_r_r4*k07_r_r4*k12_r_r4*k13_r_r4*k16_r_r4*m_m2*m_m9*m_m13 + k02_r_r4*k06_r_r4*k07_r_r4*k11_r_r4*k14_r_r4*k18_r_r4*m_m2*m_m9*m_m13 + k05_r_r4*k07_r_r4*k09_r_r4*k12_r_r4*k13_r_r4*k17_r_r4*m_m2*m_m8*m_m9 + k02_r_r4*k07_r_r4*k09_r_r4*k12_r_r4*k13_r_r4*k16_r_r4*m_m2*m_m9*m_m13 + k04_r_r4*k05_r_r4*k08_r_r4*k10_r_r4*k12_r_r4*k14_r_r4*m_m8*m_m9*m_m13 + k02_r_r4*k06_r_r4*k07_r_r4*k12_r_r4*k16_r_r4*k17_r_r4*m_m2*m_m9*m_m13 + k05_r_r4*k07_r_r4*k09_r_r4*k11_r_r4*k14_r_r4*k15_r_r4*m_m2*m_m8*m_m13 + k05_r_r4*k07_r_r4*k09_r_r4*k11_r_r4*k15_r_r4*k18_r_r4*m_m2*m_m8*m_m9 + k02_r_r4*k07_r_r4*k09_r_r4*k11_r_r4*k14_r_r4*k18_r_r4*m_m2*m_m9*m_m13 + k02_r_r4*k06_r_r4*k07_r_r4*k14_r_r4*k15_r_r4*k18_r_r4*m_m2*m_m9*m_m13 + k05_r_r4*k07_r_r4*k09_r_r4*k13_r_r4*k15_r_r4*k18_r_r4*m_m2*m_m8*m_m9 + k02_r_r4*k07_r_r4*k09_r_r4*k12_r_r4*k16_r_r4*k17_r_r4*m_m2*m_m9*m_m13 + k02_r_r4*k07_r_r4*k10_r_r4*k12_r_r4*k16_r_r4*k17_r_r4*m_m2*m_m9*m_m13 + k04_r_r4*k05_r_r4*k08_r_r4*k12_r_r4*k13_r_r4*k16_r_r4*m_m8*m_m9*m_m13 + k05_r_r4*k07_r_r4*k09_r_r4*k11_r_r4*k16_r_r4*k17_r_r4*m_m2*m_m8*m_m13 + k02_r_r4*k07_r_r4*k09_r_r4*k14_r_r4*k15_r_r4*k18_r_r4*m_m2*m_m9*m_m13 + k04_r_r4*k05_r_r4*k09_r_r4*k12_r_r4*k13_r_r4*k16_r_r4*m_m8*m_m9*m_m13 + k02_r_r4*k07_r_r4*k10_r_r4*k14_r_r4*k15_r_r4*k18_r_r4*m_m2*m_m9*m_m13 + k04_r_r4*k05_r_r4*k08_r_r4*k11_r_r4*k14_r_r4*k18_r_r4*m_m8*m_m9*m_m13 + k05_r_r4*k07_r_r4*k09_r_r4*k13_r_r4*k16_r_r4*k17_r_r4*m_m2*m_m8*m_m13 + k04_r_r4*k05_r_r4*k09_r_r4*k11_r_r4*k14_r_r4*k18_r_r4*m_m8*m_m9*m_m13 + k04_r_r4*k05_r_r4*k08_r_r4*k12_r_r4*k16_r_r4*k17_r_r4*m_m8*m_m9*m_m13 + k06_r_r4*k07_r_r4*k10_r_r4*k12_r_r4*k16_r_r4*k17_r_r4*m_m2*m_m9*m_m13 + k04_r_r4*k05_r_r4*k09_r_r4*k12_r_r4*k16_r_r4*k17_r_r4*m_m8*m_m9*m_m13 + k04_r_r4*k05_r_r4*k08_r_r4*k14_r_r4*k15_r_r4*k18_r_r4*m_m8*m_m9*m_m13 + k04_r_r4*k05_r_r4*k10_r_r4*k12_r_r4*k16_r_r4*k17_r_r4*m_m8*m_m9*m_m13 + k06_r_r4*k07_r_r4*k10_r_r4*k14_r_r4*k15_r_r4*k18_r_r4*m_m2*m_m9*m_m13 + k04_r_r4*k05_r_r4*k09_r_r4*k14_r_r4*k15_r_r4*k18_r_r4*m_m8*m_m9*m_m13 + k04_r_r4*k05_r_r4*k10_r_r4*k14_r_r4*k15_r_r4*k18_r_r4*m_m8*m_m9*m_m13 + k05_r_r4*k08_r_r4*k10_r_r4*k12_r_r4*k16_r_r4*k17_r_r4*m_m8*m_m9*m_m13 + k05_r_r4*k08_r_r4*k10_r_r4*k14_r_r4*k15_r_r4*k18_r_r4*m_m8*m_m9*m_m13 + k01_r_r4*k05_r_r4*k07_r_r4*k09_r_r4*k12_r_r4*k13_r_r4*m_m2^2*m_m8*m_m9 + k03_r_r4*k05_r_r4*k07_r_r4*k09_r_r4*k12_r_r4*k13_r_r4*m_m2*m_m8^2*m_m9 + k01_r_r4*k05_r_r4*k07_r_r4*k09_r_r4*k11_r_r4*k14_r_r4*m_m2^2*m_m8*m_m13 + k01_r_r4*k05_r_r4*k07_r_r4*k09_r_r4*k12_r_r4*k17_r_r4*m_m2^2*m_m8*m_m9 + k01_r_r4*k05_r_r4*k07_r_r4*k10_r_r4*k12_r_r4*k17_r_r4*m_m2^2*m_m8*m_m9 + k03_r_r4*k05_r_r4*k07_r_r4*k09_r_r4*k11_r_r4*k14_r_r4*m_m2*m_m8^2*m_m13 + k03_r_r4*k05_r_r4*k07_r_r4*k09_r_r4*k12_r_r4*k17_r_r4*m_m2*m_m8^2*m_m9 + k03_r_r4*k05_r_r4*k07_r_r4*k10_r_r4*k12_r_r4*k17_r_r4*m_m2*m_m8^2*m_m9 + k01_r_r4*k05_r_r4*k07_r_r4*k09_r_r4*k14_r_r4*k15_r_r4*m_m2^2*m_m8*m_m13 + k01_r_r4*k05_r_r4*k07_r_r4*k12_r_r4*k13_r_r4*k17_r_r4*m_m2^2*m_m8*m_m9 + k01_r_r4*k06_r_r4*k07_r_r4*k10_r_r4*k12_r_r4*k14_r_r4*m_m2^2*m_m9*m_m13 + k01_r_r4*k05_r_r4*k07_r_r4*k10_r_r4*k14_r_r4*k15_r_r4*m_m2^2*m_m8*m_m13 + k01_r_r4*k05_r_r4*k07_r_r4*k11_r_r4*k14_r_r4*k15_r_r4*m_m2^2*m_m8*m_m13 + k03_r_r4*k05_r_r4*k07_r_r4*k09_r_r4*k14_r_r4*k15_r_r4*m_m2*m_m8^2*m_m13 + k03_r_r4*k05_r_r4*k07_r_r4*k12_r_r4*k13_r_r4*k17_r_r4*m_m2*m_m8^2*m_m9 + k03_r_r4*k05_r_r4*k07_r_r4*k10_r_r4*k14_r_r4*k15_r_r4*m_m2*m_m8^2*m_m13 + k03_r_r4*k05_r_r4*k07_r_r4*k11_r_r4*k14_r_r4*k15_r_r4*m_m2*m_m8^2*m_m13 + k02_r_r4*k06_r_r4*k07_r_r4*k12_r_r4*k14_r_r4*k16_r_r4*m_m2*m_m9*m_m13^2 + k03_r_r4*k05_r_r4*k08_r_r4*k10_r_r4*k12_r_r4*k14_r_r4*m_m8^2*m_m9*m_m13 + k02_r_r4*k06_r_r4*k07_r_r4*k12_r_r4*k14_r_r4*k18_r_r4*m_m2*m_m9^2*m_m13 + k05_r_r4*k07_r_r4*k09_r_r4*k12_r_r4*k13_r_r4*k18_r_r4*m_m2*m_m8*m_m9^2 + k02_r_r4*k07_r_r4*k09_r_r4*k12_r_r4*k14_r_r4*k16_r_r4*m_m2*m_m9*m_m13^2 + k02_r_r4*k07_r_r4*k10_r_r4*k12_r_r4*k14_r_r4*k16_r_r4*m_m2*m_m9*m_m13^2 + k05_r_r4*k07_r_r4*k09_r_r4*k11_r_r4*k14_r_r4*k16_r_r4*m_m2*m_m8*m_m13^2 + k02_r_r4*k07_r_r4*k09_r_r4*k12_r_r4*k14_r_r4*k18_r_r4*m_m2*m_m9^2*m_m13 + k02_r_r4*k07_r_r4*k10_r_r4*k12_r_r4*k14_r_r4*k18_r_r4*m_m2*m_m9^2*m_m13 + k04_r_r4*k05_r_r4*k08_r_r4*k12_r_r4*k14_r_r4*k16_r_r4*m_m8*m_m9*m_m13^2 + k06_r_r4*k07_r_r4*k10_r_r4*k12_r_r4*k14_r_r4*k16_r_r4*m_m2*m_m9*m_m13^2 + k04_r_r4*k05_r_r4*k09_r_r4*k12_r_r4*k14_r_r4*k16_r_r4*m_m8*m_m9*m_m13^2 + k04_r_r4*k05_r_r4*k08_r_r4*k12_r_r4*k14_r_r4*k18_r_r4*m_m8*m_m9^2*m_m13 + k04_r_r4*k05_r_r4*k10_r_r4*k12_r_r4*k14_r_r4*k16_r_r4*m_m8*m_m9*m_m13^2 + k06_r_r4*k07_r_r4*k10_r_r4*k12_r_r4*k14_r_r4*k18_r_r4*m_m2*m_m9^2*m_m13 + k04_r_r4*k05_r_r4*k09_r_r4*k12_r_r4*k14_r_r4*k18_r_r4*m_m8*m_m9^2*m_m13 + k04_r_r4*k05_r_r4*k10_r_r4*k12_r_r4*k14_r_r4*k18_r_r4*m_m8*m_m9^2*m_m13 + k05_r_r4*k08_r_r4*k10_r_r4*k12_r_r4*k14_r_r4*k16_r_r4*m_m8*m_m9*m_m13^2 + k05_r_r4*k08_r_r4*k10_r_r4*k12_r_r4*k14_r_r4*k18_r_r4*m_m8*m_m9^2*m_m13 + k01_r_r4*k04_r_r4*k05_r_r4*k09_r_r4*k12_r_r4*k14_r_r4*m_m2*m_m8*m_m9*m_m13 + k01_r_r4*k04_r_r4*k05_r_r4*k10_r_r4*k12_r_r4*k14_r_r4*m_m2*m_m8*m_m9*m_m13 + k02_r_r4*k03_r_r4*k07_r_r4*k09_r_r4*k12_r_r4*k14_r_r4*m_m2*m_m8*m_m9*m_m13 + k02_r_r4*k03_r_r4*k07_r_r4*k10_r_r4*k12_r_r4*k14_r_r4*m_m2*m_m8*m_m9*m_m13 + k01_r_r4*k05_r_r4*k08_r_r4*k10_r_r4*k12_r_r4*k14_r_r4*m_m2*m_m8*m_m9*m_m13 + k03_r_r4*k06_r_r4*k07_r_r4*k10_r_r4*k12_r_r4*k14_r_r4*m_m2*m_m8*m_m9*m_m13 + k05_r_r4*k07_r_r4*k09_r_r4*k12_r_r4*k13_r_r4*k16_r_r4*m_m2*m_m8*m_m9*m_m13 + k05_r_r4*k07_r_r4*k09_r_r4*k11_r_r4*k14_r_r4*k18_r_r4*m_m2*m_m8*m_m9*m_m13 + k05_r_r4*k07_r_r4*k09_r_r4*k12_r_r4*k16_r_r4*k17_r_r4*m_m2*m_m8*m_m9*m_m13 + k05_r_r4*k07_r_r4*k10_r_r4*k12_r_r4*k16_r_r4*k17_r_r4*m_m2*m_m8*m_m9*m_m13 + k05_r_r4*k07_r_r4*k09_r_r4*k14_r_r4*k15_r_r4*k18_r_r4*m_m2*m_m8*m_m9*m_m13 + k05_r_r4*k07_r_r4*k10_r_r4*k14_r_r4*k15_r_r4*k18_r_r4*m_m2*m_m8*m_m9*m_m13 + k01_r_r4*k05_r_r4*k07_r_r4*k09_r_r4*k12_r_r4*k14_r_r4*m_m2^2*m_m8*m_m9*m_m13 + k01_r_r4*k05_r_r4*k07_r_r4*k10_r_r4*k12_r_r4*k14_r_r4*m_m2^2*m_m8*m_m9*m_m13 + k03_r_r4*k05_r_r4*k07_r_r4*k09_r_r4*k12_r_r4*k14_r_r4*m_m2*m_m8^2*m_m9*m_m13 + k03_r_r4*k05_r_r4*k07_r_r4*k10_r_r4*k12_r_r4*k14_r_r4*m_m2*m_m8^2*m_m9*m_m13 + k05_r_r4*k07_r_r4*k09_r_r4*k12_r_r4*k14_r_r4*k16_r_r4*m_m2*m_m8*m_m9*m_m13^2 + k05_r_r4*k07_r_r4*k10_r_r4*k12_r_r4*k14_r_r4*k16_r_r4*m_m2*m_m8*m_m9*m_m13^2 + k05_r_r4*k07_r_r4*k09_r_r4*k12_r_r4*k14_r_r4*k18_r_r4*m_m2*m_m8*m_m9^2*m_m13 + k05_r_r4*k07_r_r4*k10_r_r4*k12_r_r4*k14_r_r4*k18_r_r4*m_m2*m_m8*m_m9^2*m_m13)) - (k01_r_r11*m_m8 - k02_r_r11*m_m17) + k06_r_r3*(k01_r_r3*k03_r_r3*k07_r_r3*k09_r_r3*k11_r_r3*m_m1*m_m7 - k02_r_r3*k04_r_r3*k08_r_r3*k10_r_r3*k12_r_r3*m_m8*m_m12)/(k02_r_r3*k04_r_r3*k06_r_r3*k08_r_r3*k11_r_r3 + k02_r_r3*k04_r_r3*k06_r_r3*k09_r_r3*k11_r_r3 + k02_r_r3*k06_r_r3*k07_r_r3*k09_r_r3*k11_r_r3 + k01_r_r3*k04_r_r3*k06_r_r3*k08_r_r3*k11_r_r3*m_m1 + k01_r_r3*k04_r_r3*k06_r_r3*k09_r_r3*k11_r_r3*m_m1 + k01_r_r3*k06_r_r3*k07_r_r3*k09_r_r3*k11_r_r3*m_m1 + k02_r_r3*k04_r_r3*k06_r_r3*k08_r_r3*k10_r_r3*m_m8 + k03_r_r3*k06_r_r3*k07_r_r3*k09_r_r3*k11_r_r3*m_m7 + k02_r_r3*k04_r_r3*k06_r_r3*k08_r_r3*k12_r_r3*m_m12 + k02_r_r3*k04_r_r3*k06_r_r3*k09_r_r3*k12_r_r3*m_m12 + k02_r_r3*k06_r_r3*k07_r_r3*k09_r_r3*k12_r_r3*m_m12 + k01_r_r3*k03_r_r3*k06_r_r3*k07_r_r3*k09_r_r3*m_m1*m_m7 + k01_r_r3*k03_r_r3*k06_r_r3*k07_r_r3*k11_r_r3*m_m1*m_m7 + k01_r_r3*k03_r_r3*k06_r_r3*k08_r_r3*k11_r_r3*m_m1*m_m7 + k01_r_r3*k03_r_r3*k06_r_r3*k09_r_r3*k11_r_r3*m_m1*m_m7 + k01_r_r3*k04_r_r3*k06_r_r3*k08_r_r3*k10_r_r3*m_m1*m_m8 + k02_r_r3*k04_r_r3*k06_r_r3*k10_r_r3*k12_r_r3*m_m8*m_m12 + k03_r_r3*k06_r_r3*k07_r_r3*k09_r_r3*k12_r_r3*m_m7*m_m12 + k02_r_r3*k06_r_r3*k07_r_r3*k10_r_r3*k12_r_r3*m_m8*m_m12 + k02_r_r3*k06_r_r3*k08_r_r3*k10_r_r3*k12_r_r3*m_m8*m_m12 + k04_r_r3*k06_r_r3*k08_r_r3*k10_r_r3*k12_r_r3*m_m8*m_m12 + k01_r_r3*k03_r_r3*k06_r_r3*k07_r_r3*k10_r_r3*m_m1*m_m7*m_m8 + k01_r_r3*k03_r_r3*k06_r_r3*k08_r_r3*k10_r_r3*m_m1*m_m7*m_m8 + k01_r_r3*k03_r_r3*k05_r_r3*k08_r_r3*k11_r_r3*m_m1*m_m7*m_m9 + k01_r_r3*k03_r_r3*k05_r_r3*k09_r_r3*k11_r_r3*m_m1*m_m7*m_m9 + k03_r_r3*k06_r_r3*k07_r_r3*k10_r_r3*k12_r_r3*m_m7*m_m8*m_m12 + k02_r_r3*k05_r_r3*k08_r_r3*k10_r_r3*k12_r_r3*m_m8*m_m9*m_m12 + k03_r_r3*k06_r_r3*k08_r_r3*k10_r_r3*k12_r_r3*m_m7*m_m8*m_m12 + k01_r_r3*k03_r_r3*k05_r_r3*k08_r_r3*k10_r_r3*m_m1*m_m7*m_m8*m_m9 + k03_r_r3*k05_r_r3*k08_r_r3*k10_r_r3*k12_r_r3*m_m7*m_m8*m_m9*m_m12))*(1/m_m8_ref);
  m_m9' = (-(k01_r_r12*m_m9 - k02_r_r12*m_m19) + (k01_r_r4*k04_r_r4*k05_r_r4*k09_r_r4*k11_r_r4*k15_r_r4*k17_r_r4*m_m2*m_m8 + k01_r_r4*k04_r_r4*k05_r_r4*k09_r_r4*k13_r_r4*k15_r_r4*k17_r_r4*m_m2*m_m8 + k02_r_r4*k03_r_r4*k07_r_r4*k09_r_r4*k11_r_r4*k15_r_r4*k17_r_r4*m_m2*m_m8 + k02_r_r4*k03_r_r4*k07_r_r4*k09_r_r4*k13_r_r4*k15_r_r4*k17_r_r4*m_m2*m_m8 - k02_r_r4*k04_r_r4*k06_r_r4*k10_r_r4*k12_r_r4*k16_r_r4*k17_r_r4*m_m9*m_m13 - k02_r_r4*k04_r_r4*k06_r_r4*k10_r_r4*k14_r_r4*k15_r_r4*k18_r_r4*m_m9*m_m13 - k02_r_r4*k04_r_r4*k08_r_r4*k10_r_r4*k12_r_r4*k16_r_r4*k17_r_r4*m_m9*m_m13 - k02_r_r4*k04_r_r4*k08_r_r4*k10_r_r4*k14_r_r4*k15_r_r4*k18_r_r4*m_m9*m_m13 + k01_r_r4*k05_r_r4*k07_r_r4*k09_r_r4*k11_r_r4*k15_r_r4*k17_r_r4*m_m2^2*m_m8 + k01_r_r4*k05_r_r4*k07_r_r4*k09_r_r4*k13_r_r4*k15_r_r4*k17_r_r4*m_m2^2*m_m8 + k03_r_r4*k05_r_r4*k07_r_r4*k09_r_r4*k11_r_r4*k15_r_r4*k17_r_r4*m_m2*m_m8^2 + k03_r_r4*k05_r_r4*k07_r_r4*k09_r_r4*k13_r_r4*k15_r_r4*k17_r_r4*m_m2*m_m8^2 - k02_r_r4*k04_r_r4*k06_r_r4*k10_r_r4*k12_r_r4*k14_r_r4*k16_r_r4*m_m9*m_m13^2 - k02_r_r4*k04_r_r4*k06_r_r4*k10_r_r4*k12_r_r4*k14_r_r4*k18_r_r4*m_m9^2*m_m13 - k02_r_r4*k04_r_r4*k08_r_r4*k10_r_r4*k12_r_r4*k14_r_r4*k16_r_r4*m_m9*m_m13^2 - k02_r_r4*k04_r_r4*k08_r_r4*k10_r_r4*k12_r_r4*k14_r_r4*k18_r_r4*m_m9^2*m_m13 + k01_r_r4*k04_r_r4*k05_r_r4*k09_r_r4*k12_r_r4*k13_r_r4*k17_r_r4*m_m2*m_m8*m_m9 + k01_r_r4*k04_r_r4*k05_r_r4*k09_r_r4*k11_r_r4*k14_r_r4*k15_r_r4*m_m2*m_m8*m_m13 + k02_r_r4*k03_r_r4*k07_r_r4*k09_r_r4*k12_r_r4*k13_r_r4*k17_r_r4*m_m2*m_m8*m_m9 + k02_r_r4*k03_r_r4*k07_r_r4*k09_r_r4*k11_r_r4*k14_r_r4*k15_r_r4*m_m2*m_m8*m_m13 - k02_r_r4*k06_r_r4*k07_r_r4*k10_r_r4*k12_r_r4*k16_r_r4*k17_r_r4*m_m2*m_m9*m_m13 - k02_r_r4*k06_r_r4*k07_r_r4*k10_r_r4*k14_r_r4*k15_r_r4*k18_r_r4*m_m2*m_m9*m_m13 - k04_r_r4*k05_r_r4*k08_r_r4*k10_r_r4*k12_r_r4*k16_r_r4*k17_r_r4*m_m8*m_m9*m_m13 - k04_r_r4*k05_r_r4*k08_r_r4*k10_r_r4*k14_r_r4*k15_r_r4*k18_r_r4*m_m8*m_m9*m_m13 + k01_r_r4*k05_r_r4*k07_r_r4*k09_r_r4*k12_r_r4*k13_r_r4*k17_r_r4*m_m2^2*m_m8*m_m9 + k01_r_r4*k05_r_r4*k07_r_r4*k09_r_r4*k11_r_r4*k14_r_r4*k15_r_r4*m_m2^2*m_m8*m_m13 + k03_r_r4*k05_r_r4*k07_r_r4*k09_r_r4*k12_r_r4*k13_r_r4*k17_r_r4*m_m2*m_m8^2*m_m9 + k03_r_r4*k05_r_r4*k07_r_r4*k09_r_r4*k11_r_r4*k14_r_r4*k15_r_r4*m_m2*m_m8^2*m_m13 - k02_r_r4*k06_r_r4*k07_r_r4*k10_r_r4*k12_r_r4*k14_r_r4*k16_r_r4*m_m2*m_m9*m_m13^2 - k02_r_r4*k06_r_r4*k07_r_r4*k10_r_r4*k12_r_r4*k14_r_r4*k18_r_r4*m_m2*m_m9^2*m_m13 - k04_r_r4*k05_r_r4*k08_r_r4*k10_r_r4*k12_r_r4*k14_r_r4*k16_r_r4*m_m8*m_m9*m_m13^2 - k04_r_r4*k05_r_r4*k08_r_r4*k10_r_r4*k12_r_r4*k14_r_r4*k18_r_r4*m_m8*m_m9^2*m_m13)/(k02_r_r4*k04_r_r4*k06_r_r4*k10_r_r4*k15_r_r4*k17_r_r4 + k02_r_r4*k04_r_r4*k06_r_r4*k11_r_r4*k15_r_r4*k17_r_r4 + k02_r_r4*k04_r_r4*k08_r_r4*k10_r_r4*k15_r_r4*k17_r_r4 + k02_r_r4*k04_r_r4*k06_r_r4*k13_r_r4*k15_r_r4*k17_r_r4 + k02_r_r4*k04_r_r4*k08_r_r4*k11_r_r4*k15_r_r4*k17_r_r4 + k02_r_r4*k04_r_r4*k09_r_r4*k11_r_r4*k15_r_r4*k17_r_r4 + k02_r_r4*k04_r_r4*k08_r_r4*k13_r_r4*k15_r_r4*k17_r_r4 + k02_r_r4*k04_r_r4*k09_r_r4*k13_r_r4*k15_r_r4*k17_r_r4 + k01_r_r4*k04_r_r4*k06_r_r4*k10_r_r4*k15_r_r4*k17_r_r4*m_m2 + k01_r_r4*k04_r_r4*k06_r_r4*k11_r_r4*k15_r_r4*k17_r_r4*m_m2 + k01_r_r4*k04_r_r4*k08_r_r4*k10_r_r4*k15_r_r4*k17_r_r4*m_m2 + k01_r_r4*k04_r_r4*k06_r_r4*k13_r_r4*k15_r_r4*k17_r_r4*m_m2 + k01_r_r4*k04_r_r4*k08_r_r4*k11_r_r4*k15_r_r4*k17_r_r4*m_m2 + k01_r_r4*k04_r_r4*k09_r_r4*k11_r_r4*k15_r_r4*k17_r_r4*m_m2 + k02_r_r4*k06_r_r4*k07_r_r4*k10_r_r4*k15_r_r4*k17_r_r4*m_m2 + k01_r_r4*k04_r_r4*k08_r_r4*k13_r_r4*k15_r_r4*k17_r_r4*m_m2 + k02_r_r4*k04_r_r4*k06_r_r4*k10_r_r4*k12_r_r4*k17_r_r4*m_m9 + k02_r_r4*k06_r_r4*k07_r_r4*k11_r_r4*k15_r_r4*k17_r_r4*m_m2 + k01_r_r4*k04_r_r4*k09_r_r4*k13_r_r4*k15_r_r4*k17_r_r4*m_m2 + k02_r_r4*k03_r_r4*k06_r_r4*k10_r_r4*k15_r_r4*k17_r_r4*m_m8 + k02_r_r4*k03_r_r4*k06_r_r4*k11_r_r4*k15_r_r4*k17_r_r4*m_m8 + k02_r_r4*k04_r_r4*k08_r_r4*k10_r_r4*k12_r_r4*k17_r_r4*m_m9 + k02_r_r4*k06_r_r4*k07_r_r4*k13_r_r4*k15_r_r4*k17_r_r4*m_m2 + k02_r_r4*k03_r_r4*k08_r_r4*k10_r_r4*k15_r_r4*k17_r_r4*m_m8 + k02_r_r4*k04_r_r4*k06_r_r4*k12_r_r4*k13_r_r4*k17_r_r4*m_m9 + k02_r_r4*k07_r_r4*k09_r_r4*k11_r_r4*k15_r_r4*k17_r_r4*m_m2 + k02_r_r4*k03_r_r4*k06_r_r4*k13_r_r4*k15_r_r4*k17_r_r4*m_m8 + k02_r_r4*k03_r_r4*k08_r_r4*k11_r_r4*k15_r_r4*k17_r_r4*m_m8 + k02_r_r4*k04_r_r4*k06_r_r4*k10_r_r4*k14_r_r4*k15_r_r4*m_m13 + k02_r_r4*k04_r_r4*k06_r_r4*k10_r_r4*k15_r_r4*k18_r_r4*m_m9 + k02_r_r4*k03_r_r4*k09_r_r4*k11_r_r4*k15_r_r4*k17_r_r4*m_m8 + k02_r_r4*k04_r_r4*k06_r_r4*k11_r_r4*k14_r_r4*k15_r_r4*m_m13 + k02_r_r4*k04_r_r4*k06_r_r4*k11_r_r4*k15_r_r4*k18_r_r4*m_m9 + k02_r_r4*k04_r_r4*k08_r_r4*k12_r_r4*k13_r_r4*k17_r_r4*m_m9 + k02_r_r4*k07_r_r4*k09_r_r4*k13_r_r4*k15_r_r4*k17_r_r4*m_m2 + k02_r_r4*k03_r_r4*k08_r_r4*k13_r_r4*k15_r_r4*k17_r_r4*m_m8 + k02_r_r4*k04_r_r4*k08_r_r4*k10_r_r4*k14_r_r4*k15_r_r4*m_m13 + k02_r_r4*k04_r_r4*k08_r_r4*k10_r_r4*k15_r_r4*k18_r_r4*m_m9 + k02_r_r4*k04_r_r4*k09_r_r4*k12_r_r4*k13_r_r4*k17_r_r4*m_m9 + k02_r_r4*k03_r_r4*k09_r_r4*k13_r_r4*k15_r_r4*k17_r_r4*m_m8 + k02_r_r4*k04_r_r4*k06_r_r4*k13_r_r4*k15_r_r4*k18_r_r4*m_m9 + k02_r_r4*k04_r_r4*k08_r_r4*k11_r_r4*k14_r_r4*k15_r_r4*m_m13 + k02_r_r4*k04_r_r4*k08_r_r4*k11_r_r4*k15_r_r4*k18_r_r4*m_m9 + k04_r_r4*k05_r_r4*k08_r_r4*k10_r_r4*k15_r_r4*k17_r_r4*m_m8 + k02_r_r4*k04_r_r4*k06_r_r4*k10_r_r4*k16_r_r4*k17_r_r4*m_m13 + k02_r_r4*k04_r_r4*k09_r_r4*k11_r_r4*k14_r_r4*k15_r_r4*m_m13 + k02_r_r4*k04_r_r4*k09_r_r4*k11_r_r4*k15_r_r4*k18_r_r4*m_m9 + k04_r_r4*k05_r_r4*k08_r_r4*k11_r_r4*k15_r_r4*k17_r_r4*m_m8 + k02_r_r4*k04_r_r4*k06_r_r4*k11_r_r4*k16_r_r4*k17_r_r4*m_m13 + k02_r_r4*k04_r_r4*k08_r_r4*k13_r_r4*k15_r_r4*k18_r_r4*m_m9 + k04_r_r4*k05_r_r4*k09_r_r4*k11_r_r4*k15_r_r4*k17_r_r4*m_m8 + k02_r_r4*k04_r_r4*k08_r_r4*k10_r_r4*k16_r_r4*k17_r_r4*m_m13 + k02_r_r4*k04_r_r4*k09_r_r4*k13_r_r4*k15_r_r4*k18_r_r4*m_m9 + k04_r_r4*k05_r_r4*k08_r_r4*k13_r_r4*k15_r_r4*k17_r_r4*m_m8 + k02_r_r4*k04_r_r4*k06_r_r4*k13_r_r4*k16_r_r4*k17_r_r4*m_m13 + k02_r_r4*k04_r_r4*k08_r_r4*k11_r_r4*k16_r_r4*k17_r_r4*m_m13 + k04_r_r4*k05_r_r4*k09_r_r4*k13_r_r4*k15_r_r4*k17_r_r4*m_m8 + k02_r_r4*k04_r_r4*k09_r_r4*k11_r_r4*k16_r_r4*k17_r_r4*m_m13 + k02_r_r4*k04_r_r4*k08_r_r4*k13_r_r4*k16_r_r4*k17_r_r4*m_m13 + k02_r_r4*k04_r_r4*k09_r_r4*k13_r_r4*k16_r_r4*k17_r_r4*m_m13 + k01_r_r4*k06_r_r4*k07_r_r4*k10_r_r4*k15_r_r4*k17_r_r4*m_m2^2 + k01_r_r4*k06_r_r4*k07_r_r4*k11_r_r4*k15_r_r4*k17_r_r4*m_m2^2 + k01_r_r4*k06_r_r4*k07_r_r4*k13_r_r4*k15_r_r4*k17_r_r4*m_m2^2 + k02_r_r4*k04_r_r4*k06_r_r4*k10_r_r4*k12_r_r4*k18_r_r4*m_m9^2 + k01_r_r4*k07_r_r4*k09_r_r4*k11_r_r4*k15_r_r4*k17_r_r4*m_m2^2 + k02_r_r4*k04_r_r4*k08_r_r4*k10_r_r4*k12_r_r4*k18_r_r4*m_m9^2 + k01_r_r4*k07_r_r4*k09_r_r4*k13_r_r4*k15_r_r4*k17_r_r4*m_m2^2 + k02_r_r4*k04_r_r4*k06_r_r4*k12_r_r4*k13_r_r4*k18_r_r4*m_m9^2 + k02_r_r4*k04_r_r4*k06_r_r4*k10_r_r4*k14_r_r4*k16_r_r4*m_m13^2 + k02_r_r4*k04_r_r4*k06_r_r4*k11_r_r4*k14_r_r4*k16_r_r4*m_m13^2 + k02_r_r4*k04_r_r4*k08_r_r4*k12_r_r4*k13_r_r4*k18_r_r4*m_m9^2 + k03_r_r4*k05_r_r4*k08_r_r4*k10_r_r4*k15_r_r4*k17_r_r4*m_m8^2 + k02_r_r4*k04_r_r4*k08_r_r4*k10_r_r4*k14_r_r4*k16_r_r4*m_m13^2 + k02_r_r4*k04_r_r4*k09_r_r4*k12_r_r4*k13_r_r4*k18_r_r4*m_m9^2 + k03_r_r4*k05_r_r4*k08_r_r4*k11_r_r4*k15_r_r4*k17_r_r4*m_m8^2 + k02_r_r4*k04_r_r4*k08_r_r4*k11_r_r4*k14_r_r4*k16_r_r4*m_m13^2 + k03_r_r4*k05_r_r4*k09_r_r4*k11_r_r4*k15_r_r4*k17_r_r4*m_m8^2 + k02_r_r4*k04_r_r4*k09_r_r4*k11_r_r4*k14_r_r4*k16_r_r4*m_m13^2 + k03_r_r4*k05_r_r4*k08_r_r4*k13_r_r4*k15_r_r4*k17_r_r4*m_m8^2 + k03_r_r4*k05_r_r4*k09_r_r4*k13_r_r4*k15_r_r4*k17_r_r4*m_m8^2 + k01_r_r4*k05_r_r4*k07_r_r4*k09_r_r4*k11_r_r4*k17_r_r4*m_m2^2*m_m8 + k01_r_r4*k05_r_r4*k07_r_r4*k09_r_r4*k13_r_r4*k15_r_r4*m_m2^2*m_m8 + k03_r_r4*k05_r_r4*k07_r_r4*k09_r_r4*k11_r_r4*k17_r_r4*m_m2*m_m8^2 + k03_r_r4*k05_r_r4*k07_r_r4*k09_r_r4*k13_r_r4*k15_r_r4*m_m2*m_m8^2 + k01_r_r4*k05_r_r4*k07_r_r4*k09_r_r4*k15_r_r4*k17_r_r4*m_m2^2*m_m8 + k01_r_r4*k06_r_r4*k07_r_r4*k10_r_r4*k12_r_r4*k17_r_r4*m_m2^2*m_m9 + k01_r_r4*k05_r_r4*k07_r_r4*k10_r_r4*k15_r_r4*k17_r_r4*m_m2^2*m_m8 + k01_r_r4*k05_r_r4*k07_r_r4*k11_r_r4*k15_r_r4*k17_r_r4*m_m2^2*m_m8 + k02_r_r4*k06_r_r4*k07_r_r4*k10_r_r4*k12_r_r4*k18_r_r4*m_m2*m_m9^2 + k03_r_r4*k05_r_r4*k07_r_r4*k09_r_r4*k15_r_r4*k17_r_r4*m_m2*m_m8^2 + k01_r_r4*k06_r_r4*k07_r_r4*k12_r_r4*k13_r_r4*k17_r_r4*m_m2^2*m_m9 + k03_r_r4*k05_r_r4*k07_r_r4*k10_r_r4*k15_r_r4*k17_r_r4*m_m2*m_m8^2 + k01_r_r4*k05_r_r4*k07_r_r4*k13_r_r4*k15_r_r4*k17_r_r4*m_m2^2*m_m8 + k01_r_r4*k06_r_r4*k07_r_r4*k10_r_r4*k14_r_r4*k15_r_r4*m_m2^2*m_m13 + k03_r_r4*k05_r_r4*k07_r_r4*k11_r_r4*k15_r_r4*k17_r_r4*m_m2*m_m8^2 + k01_r_r4*k06_r_r4*k07_r_r4*k11_r_r4*k14_r_r4*k15_r_r4*m_m2^2*m_m13 + k02_r_r4*k06_r_r4*k07_r_r4*k12_r_r4*k13_r_r4*k18_r_r4*m_m2*m_m9^2 + k01_r_r4*k07_r_r4*k09_r_r4*k12_r_r4*k13_r_r4*k17_r_r4*m_m2^2*m_m9 + k02_r_r4*k06_r_r4*k07_r_r4*k10_r_r4*k14_r_r4*k16_r_r4*m_m2*m_m13^2 + k03_r_r4*k05_r_r4*k07_r_r4*k13_r_r4*k15_r_r4*k17_r_r4*m_m2*m_m8^2 + k02_r_r4*k06_r_r4*k07_r_r4*k11_r_r4*k14_r_r4*k16_r_r4*m_m2*m_m13^2 + k01_r_r4*k07_r_r4*k09_r_r4*k11_r_r4*k14_r_r4*k15_r_r4*m_m2^2*m_m13 + k02_r_r4*k07_r_r4*k09_r_r4*k12_r_r4*k13_r_r4*k18_r_r4*m_m2*m_m9^2 + k03_r_r4*k05_r_r4*k08_r_r4*k10_r_r4*k12_r_r4*k17_r_r4*m_m8^2*m_m9 + k02_r_r4*k07_r_r4*k09_r_r4*k11_r_r4*k14_r_r4*k16_r_r4*m_m2*m_m13^2 + k04_r_r4*k05_r_r4*k08_r_r4*k10_r_r4*k12_r_r4*k18_r_r4*m_m8*m_m9^2 + k03_r_r4*k05_r_r4*k08_r_r4*k12_r_r4*k13_r_r4*k17_r_r4*m_m8^2*m_m9 + k02_r_r4*k04_r_r4*k06_r_r4*k12_r_r4*k14_r_r4*k16_r_r4*m_m9*m_m13^2 + k03_r_r4*k05_r_r4*k08_r_r4*k10_r_r4*k14_r_r4*k15_r_r4*m_m8^2*m_m13 + k03_r_r4*k05_r_r4*k09_r_r4*k12_r_r4*k13_r_r4*k17_r_r4*m_m8^2*m_m9 + k03_r_r4*k05_r_r4*k08_r_r4*k11_r_r4*k14_r_r4*k15_r_r4*m_m8^2*m_m13 + k04_r_r4*k05_r_r4*k08_r_r4*k12_r_r4*k13_r_r4*k18_r_r4*m_m8*m_m9^2 + k02_r_r4*k04_r_r4*k06_r_r4*k12_r_r4*k14_r_r4*k18_r_r4*m_m9^2*m_m13 + k02_r_r4*k04_r_r4*k08_r_r4*k12_r_r4*k14_r_r4*k16_r_r4*m_m9*m_m13^2 + k03_r_r4*k05_r_r4*k09_r_r4*k11_r_r4*k14_r_r4*k15_r_r4*m_m8^2*m_m13 + k04_r_r4*k05_r_r4*k08_r_r4*k10_r_r4*k14_r_r4*k16_r_r4*m_m8*m_m13^2 + k04_r_r4*k05_r_r4*k09_r_r4*k12_r_r4*k13_r_r4*k18_r_r4*m_m8*m_m9^2 + k02_r_r4*k04_r_r4*k09_r_r4*k12_r_r4*k14_r_r4*k16_r_r4*m_m9*m_m13^2 + k04_r_r4*k05_r_r4*k08_r_r4*k11_r_r4*k14_r_r4*k16_r_r4*m_m8*m_m13^2 + k02_r_r4*k04_r_r4*k08_r_r4*k12_r_r4*k14_r_r4*k18_r_r4*m_m9^2*m_m13 + k02_r_r4*k04_r_r4*k10_r_r4*k12_r_r4*k14_r_r4*k16_r_r4*m_m9*m_m13^2 + k04_r_r4*k05_r_r4*k09_r_r4*k11_r_r4*k14_r_r4*k16_r_r4*m_m8*m_m13^2 + k02_r_r4*k04_r_r4*k09_r_r4*k12_r_r4*k14_r_r4*k18_r_r4*m_m9^2*m_m13 + k02_r_r4*k04_r_r4*k10_r_r4*k12_r_r4*k14_r_r4*k18_r_r4*m_m9^2*m_m13 + k02_r_r4*k08_r_r4*k10_r_r4*k12_r_r4*k14_r_r4*k16_r_r4*m_m9*m_m13^2 + k04_r_r4*k06_r_r4*k10_r_r4*k12_r_r4*k14_r_r4*k16_r_r4*m_m9*m_m13^2 + k02_r_r4*k08_r_r4*k10_r_r4*k12_r_r4*k14_r_r4*k18_r_r4*m_m9^2*m_m13 + k04_r_r4*k06_r_r4*k10_r_r4*k12_r_r4*k14_r_r4*k18_r_r4*m_m9^2*m_m13 + k01_r_r4*k04_r_r4*k05_r_r4*k09_r_r4*k11_r_r4*k17_r_r4*m_m2*m_m8 + k01_r_r4*k04_r_r4*k05_r_r4*k09_r_r4*k13_r_r4*k15_r_r4*m_m2*m_m8 + k02_r_r4*k03_r_r4*k07_r_r4*k09_r_r4*k11_r_r4*k17_r_r4*m_m2*m_m8 + k02_r_r4*k03_r_r4*k07_r_r4*k09_r_r4*k13_r_r4*k15_r_r4*m_m2*m_m8 + k01_r_r4*k04_r_r4*k05_r_r4*k09_r_r4*k15_r_r4*k17_r_r4*m_m2*m_m8 + k01_r_r4*k04_r_r4*k06_r_r4*k10_r_r4*k12_r_r4*k17_r_r4*m_m2*m_m9 + k01_r_r4*k04_r_r4*k05_r_r4*k10_r_r4*k15_r_r4*k17_r_r4*m_m2*m_m8 + k01_r_r4*k04_r_r4*k05_r_r4*k11_r_r4*k15_r_r4*k17_r_r4*m_m2*m_m8 + k01_r_r4*k04_r_r4*k08_r_r4*k10_r_r4*k12_r_r4*k17_r_r4*m_m2*m_m9 + k02_r_r4*k03_r_r4*k07_r_r4*k09_r_r4*k15_r_r4*k17_r_r4*m_m2*m_m8 + k01_r_r4*k04_r_r4*k06_r_r4*k12_r_r4*k13_r_r4*k17_r_r4*m_m2*m_m9 + k02_r_r4*k03_r_r4*k07_r_r4*k10_r_r4*k15_r_r4*k17_r_r4*m_m2*m_m8 + k01_r_r4*k04_r_r4*k05_r_r4*k13_r_r4*k15_r_r4*k17_r_r4*m_m2*m_m8 + k01_r_r4*k04_r_r4*k06_r_r4*k10_r_r4*k14_r_r4*k15_r_r4*m_m2*m_m13 + k02_r_r4*k03_r_r4*k07_r_r4*k11_r_r4*k15_r_r4*k17_r_r4*m_m2*m_m8 + k02_r_r4*k06_r_r4*k07_r_r4*k10_r_r4*k12_r_r4*k17_r_r4*m_m2*m_m9 + k01_r_r4*k04_r_r4*k06_r_r4*k11_r_r4*k14_r_r4*k15_r_r4*m_m2*m_m13 + k01_r_r4*k04_r_r4*k08_r_r4*k12_r_r4*k13_r_r4*k17_r_r4*m_m2*m_m9 + k01_r_r4*k05_r_r4*k08_r_r4*k10_r_r4*k15_r_r4*k17_r_r4*m_m2*m_m8 + k01_r_r4*k04_r_r4*k08_r_r4*k10_r_r4*k14_r_r4*k15_r_r4*m_m2*m_m13 + k01_r_r4*k04_r_r4*k09_r_r4*k12_r_r4*k13_r_r4*k17_r_r4*m_m2*m_m9 + k01_r_r4*k05_r_r4*k08_r_r4*k11_r_r4*k15_r_r4*k17_r_r4*m_m2*m_m8 + k02_r_r4*k03_r_r4*k06_r_r4*k10_r_r4*k12_r_r4*k17_r_r4*m_m8*m_m9 + k02_r_r4*k03_r_r4*k07_r_r4*k13_r_r4*k15_r_r4*k17_r_r4*m_m2*m_m8 + k01_r_r4*k04_r_r4*k08_r_r4*k11_r_r4*k14_r_r4*k15_r_r4*m_m2*m_m13 + k02_r_r4*k06_r_r4*k07_r_r4*k12_r_r4*k13_r_r4*k17_r_r4*m_m2*m_m9 + k03_r_r4*k06_r_r4*k07_r_r4*k10_r_r4*k15_r_r4*k17_r_r4*m_m2*m_m8 + k01_r_r4*k04_r_r4*k09_r_r4*k11_r_r4*k14_r_r4*k15_r_r4*m_m2*m_m13 + k01_r_r4*k05_r_r4*k08_r_r4*k13_r_r4*k15_r_r4*k17_r_r4*m_m2*m_m8 + k02_r_r4*k03_r_r4*k08_r_r4*k10_r_r4*k12_r_r4*k17_r_r4*m_m8*m_m9 + k02_r_r4*k06_r_r4*k07_r_r4*k10_r_r4*k14_r_r4*k15_r_r4*m_m2*m_m13 + k02_r_r4*k06_r_r4*k07_r_r4*k10_r_r4*k15_r_r4*k18_r_r4*m_m2*m_m9 + k03_r_r4*k06_r_r4*k07_r_r4*k11_r_r4*k15_r_r4*k17_r_r4*m_m2*m_m8 + k02_r_r4*k03_r_r4*k06_r_r4*k12_r_r4*k13_r_r4*k17_r_r4*m_m8*m_m9 + k02_r_r4*k04_r_r4*k06_r_r4*k10_r_r4*k12_r_r4*k14_r_r4*m_m9*m_m13 + k02_r_r4*k06_r_r4*k07_r_r4*k11_r_r4*k14_r_r4*k15_r_r4*m_m2*m_m13 + k02_r_r4*k06_r_r4*k07_r_r4*k11_r_r4*k15_r_r4*k18_r_r4*m_m2*m_m9 + k02_r_r4*k03_r_r4*k06_r_r4*k10_r_r4*k14_r_r4*k15_r_r4*m_m8*m_m13 + k02_r_r4*k07_r_r4*k09_r_r4*k12_r_r4*k13_r_r4*k17_r_r4*m_m2*m_m9 + k03_r_r4*k06_r_r4*k07_r_r4*k13_r_r4*k15_r_r4*k17_r_r4*m_m2*m_m8 + k02_r_r4*k03_r_r4*k06_r_r4*k11_r_r4*k14_r_r4*k15_r_r4*m_m8*m_m13 + k02_r_r4*k03_r_r4*k08_r_r4*k12_r_r4*k13_r_r4*k17_r_r4*m_m8*m_m9 + k02_r_r4*k04_r_r4*k08_r_r4*k10_r_r4*k12_r_r4*k14_r_r4*m_m9*m_m13 + k02_r_r4*k06_r_r4*k07_r_r4*k13_r_r4*k15_r_r4*k18_r_r4*m_m2*m_m9 + k02_r_r4*k03_r_r4*k08_r_r4*k10_r_r4*k14_r_r4*k15_r_r4*m_m8*m_m13 + k02_r_r4*k03_r_r4*k09_r_r4*k12_r_r4*k13_r_r4*k17_r_r4*m_m8*m_m9 + k02_r_r4*k06_r_r4*k07_r_r4*k10_r_r4*k16_r_r4*k17_r_r4*m_m2*m_m13 + k02_r_r4*k07_r_r4*k09_r_r4*k11_r_r4*k14_r_r4*k15_r_r4*m_m2*m_m13 + k02_r_r4*k07_r_r4*k09_r_r4*k11_r_r4*k15_r_r4*k18_r_r4*m_m2*m_m9 + k04_r_r4*k05_r_r4*k08_r_r4*k10_r_r4*k12_r_r4*k17_r_r4*m_m8*m_m9 + k02_r_r4*k03_r_r4*k08_r_r4*k11_r_r4*k14_r_r4*k15_r_r4*m_m8*m_m13 + k02_r_r4*k06_r_r4*k07_r_r4*k11_r_r4*k16_r_r4*k17_r_r4*m_m2*m_m13 + k05_r_r4*k07_r_r4*k09_r_r4*k11_r_r4*k15_r_r4*k17_r_r4*m_m2*m_m8 + k02_r_r4*k03_r_r4*k09_r_r4*k11_r_r4*k14_r_r4*k15_r_r4*m_m8*m_m13 + k02_r_r4*k04_r_r4*k06_r_r4*k12_r_r4*k13_r_r4*k16_r_r4*m_m9*m_m13 + k02_r_r4*k07_r_r4*k09_r_r4*k13_r_r4*k15_r_r4*k18_r_r4*m_m2*m_m9 + k02_r_r4*k06_r_r4*k07_r_r4*k13_r_r4*k16_r_r4*k17_r_r4*m_m2*m_m13 + k04_r_r4*k05_r_r4*k08_r_r4*k12_r_r4*k13_r_r4*k17_r_r4*m_m8*m_m9 + k05_r_r4*k07_r_r4*k09_r_r4*k13_r_r4*k15_r_r4*k17_r_r4*m_m2*m_m8 + k02_r_r4*k04_r_r4*k06_r_r4*k11_r_r4*k14_r_r4*k18_r_r4*m_m9*m_m13 + k02_r_r4*k04_r_r4*k08_r_r4*k12_r_r4*k13_r_r4*k16_r_r4*m_m9*m_m13 + k02_r_r4*k07_r_r4*k09_r_r4*k11_r_r4*k16_r_r4*k17_r_r4*m_m2*m_m13 + k04_r_r4*k05_r_r4*k08_r_r4*k10_r_r4*k14_r_r4*k15_r_r4*m_m8*m_m13 + k04_r_r4*k05_r_r4*k08_r_r4*k10_r_r4*k15_r_r4*k18_r_r4*m_m8*m_m9 + k04_r_r4*k05_r_r4*k09_r_r4*k12_r_r4*k13_r_r4*k17_r_r4*m_m8*m_m9 + k02_r_r4*k04_r_r4*k09_r_r4*k12_r_r4*k13_r_r4*k16_r_r4*m_m9*m_m13 + k04_r_r4*k05_r_r4*k08_r_r4*k11_r_r4*k14_r_r4*k15_r_r4*m_m8*m_m13 + k04_r_r4*k05_r_r4*k08_r_r4*k11_r_r4*k15_r_r4*k18_r_r4*m_m8*m_m9 + k02_r_r4*k04_r_r4*k06_r_r4*k12_r_r4*k16_r_r4*k17_r_r4*m_m9*m_m13 + k02_r_r4*k04_r_r4*k08_r_r4*k11_r_r4*k14_r_r4*k18_r_r4*m_m9*m_m13 + k02_r_r4*k07_r_r4*k09_r_r4*k13_r_r4*k16_r_r4*k17_r_r4*m_m2*m_m13 + k04_r_r4*k05_r_r4*k09_r_r4*k11_r_r4*k14_r_r4*k15_r_r4*m_m8*m_m13 + k04_r_r4*k05_r_r4*k09_r_r4*k11_r_r4*k15_r_r4*k18_r_r4*m_m8*m_m9 + k02_r_r4*k04_r_r4*k09_r_r4*k11_r_r4*k14_r_r4*k18_r_r4*m_m9*m_m13 + k04_r_r4*k05_r_r4*k08_r_r4*k13_r_r4*k15_r_r4*k18_r_r4*m_m8*m_m9 + k02_r_r4*k04_r_r4*k06_r_r4*k14_r_r4*k15_r_r4*k18_r_r4*m_m9*m_m13 + k02_r_r4*k04_r_r4*k08_r_r4*k12_r_r4*k16_r_r4*k17_r_r4*m_m9*m_m13 + k04_r_r4*k05_r_r4*k08_r_r4*k10_r_r4*k16_r_r4*k17_r_r4*m_m8*m_m13 + k04_r_r4*k05_r_r4*k09_r_r4*k13_r_r4*k15_r_r4*k18_r_r4*m_m8*m_m9 + k02_r_r4*k04_r_r4*k09_r_r4*k12_r_r4*k16_r_r4*k17_r_r4*m_m9*m_m13 + k04_r_r4*k05_r_r4*k08_r_r4*k11_r_r4*k16_r_r4*k17_r_r4*m_m8*m_m13 + k02_r_r4*k04_r_r4*k08_r_r4*k14_r_r4*k15_r_r4*k18_r_r4*m_m9*m_m13 + k02_r_r4*k04_r_r4*k10_r_r4*k12_r_r4*k16_r_r4*k17_r_r4*m_m9*m_m13 + k04_r_r4*k05_r_r4*k09_r_r4*k11_r_r4*k16_r_r4*k17_r_r4*m_m8*m_m13 + k02_r_r4*k04_r_r4*k09_r_r4*k14_r_r4*k15_r_r4*k18_r_r4*m_m9*m_m13 + k04_r_r4*k05_r_r4*k08_r_r4*k13_r_r4*k16_r_r4*k17_r_r4*m_m8*m_m13 + k02_r_r4*k04_r_r4*k10_r_r4*k14_r_r4*k15_r_r4*k18_r_r4*m_m9*m_m13 + k04_r_r4*k05_r_r4*k09_r_r4*k13_r_r4*k16_r_r4*k17_r_r4*m_m8*m_m13 + k02_r_r4*k08_r_r4*k10_r_r4*k12_r_r4*k16_r_r4*k17_r_r4*m_m9*m_m13 + k04_r_r4*k06_r_r4*k10_r_r4*k12_r_r4*k16_r_r4*k17_r_r4*m_m9*m_m13 + k02_r_r4*k08_r_r4*k10_r_r4*k14_r_r4*k15_r_r4*k18_r_r4*m_m9*m_m13 + k04_r_r4*k06_r_r4*k10_r_r4*k14_r_r4*k15_r_r4*k18_r_r4*m_m9*m_m13 + k01_r_r4*k04_r_r4*k05_r_r4*k09_r_r4*k12_r_r4*k13_r_r4*m_m2*m_m8*m_m9 + k02_r_r4*k03_r_r4*k07_r_r4*k09_r_r4*k12_r_r4*k13_r_r4*m_m2*m_m8*m_m9 + k01_r_r4*k04_r_r4*k05_r_r4*k09_r_r4*k11_r_r4*k14_r_r4*m_m2*m_m8*m_m13 + k01_r_r4*k04_r_r4*k05_r_r4*k09_r_r4*k12_r_r4*k17_r_r4*m_m2*m_m8*m_m9 + k01_r_r4*k04_r_r4*k05_r_r4*k10_r_r4*k12_r_r4*k17_r_r4*m_m2*m_m8*m_m9 + k02_r_r4*k03_r_r4*k07_r_r4*k09_r_r4*k11_r_r4*k14_r_r4*m_m2*m_m8*m_m13 + k02_r_r4*k03_r_r4*k07_r_r4*k09_r_r4*k12_r_r4*k17_r_r4*m_m2*m_m8*m_m9 + k02_r_r4*k03_r_r4*k07_r_r4*k10_r_r4*k12_r_r4*k17_r_r4*m_m2*m_m8*m_m9 + k01_r_r4*k04_r_r4*k05_r_r4*k09_r_r4*k14_r_r4*k15_r_r4*m_m2*m_m8*m_m13 + k01_r_r4*k04_r_r4*k05_r_r4*k12_r_r4*k13_r_r4*k17_r_r4*m_m2*m_m8*m_m9 + k01_r_r4*k04_r_r4*k06_r_r4*k10_r_r4*k12_r_r4*k14_r_r4*m_m2*m_m9*m_m13 + k01_r_r4*k04_r_r4*k05_r_r4*k10_r_r4*k14_r_r4*k15_r_r4*m_m2*m_m8*m_m13 + k01_r_r4*k05_r_r4*k08_r_r4*k10_r_r4*k12_r_r4*k17_r_r4*m_m2*m_m8*m_m9 + k01_r_r4*k04_r_r4*k05_r_r4*k11_r_r4*k14_r_r4*k15_r_r4*m_m2*m_m8*m_m13 + k01_r_r4*k04_r_r4*k08_r_r4*k10_r_r4*k12_r_r4*k14_r_r4*m_m2*m_m9*m_m13 + k02_r_r4*k03_r_r4*k07_r_r4*k09_r_r4*k14_r_r4*k15_r_r4*m_m2*m_m8*m_m13 + k02_r_r4*k03_r_r4*k07_r_r4*k12_r_r4*k13_r_r4*k17_r_r4*m_m2*m_m8*m_m9 + k02_r_r4*k03_r_r4*k07_r_r4*k10_r_r4*k14_r_r4*k15_r_r4*m_m2*m_m8*m_m13 + k03_r_r4*k06_r_r4*k07_r_r4*k10_r_r4*k12_r_r4*k17_r_r4*m_m2*m_m8*m_m9 + k01_r_r4*k05_r_r4*k08_r_r4*k12_r_r4*k13_r_r4*k17_r_r4*m_m2*m_m8*m_m9 + k02_r_r4*k03_r_r4*k07_r_r4*k11_r_r4*k14_r_r4*k15_r_r4*m_m2*m_m8*m_m13 + k02_r_r4*k06_r_r4*k07_r_r4*k10_r_r4*k12_r_r4*k14_r_r4*m_m2*m_m9*m_m13 + k01_r_r4*k05_r_r4*k08_r_r4*k10_r_r4*k14_r_r4*k15_r_r4*m_m2*m_m8*m_m13 + k01_r_r4*k05_r_r4*k08_r_r4*k11_r_r4*k14_r_r4*k15_r_r4*m_m2*m_m8*m_m13 + k02_r_r4*k03_r_r4*k06_r_r4*k10_r_r4*k12_r_r4*k14_r_r4*m_m8*m_m9*m_m13 + k03_r_r4*k06_r_r4*k07_r_r4*k12_r_r4*k13_r_r4*k17_r_r4*m_m2*m_m8*m_m9 + k03_r_r4*k06_r_r4*k07_r_r4*k10_r_r4*k14_r_r4*k15_r_r4*m_m2*m_m8*m_m13 + k02_r_r4*k03_r_r4*k08_r_r4*k10_r_r4*k12_r_r4*k14_r_r4*m_m8*m_m9*m_m13 + k03_r_r4*k06_r_r4*k07_r_r4*k11_r_r4*k14_r_r4*k15_r_r4*m_m2*m_m8*m_m13 + k02_r_r4*k06_r_r4*k07_r_r4*k12_r_r4*k13_r_r4*k16_r_r4*m_m2*m_m9*m_m13 + k02_r_r4*k06_r_r4*k07_r_r4*k11_r_r4*k14_r_r4*k18_r_r4*m_m2*m_m9*m_m13 + k05_r_r4*k07_r_r4*k09_r_r4*k12_r_r4*k13_r_r4*k17_r_r4*m_m2*m_m8*m_m9 + k02_r_r4*k07_r_r4*k09_r_r4*k12_r_r4*k13_r_r4*k16_r_r4*m_m2*m_m9*m_m13 + k04_r_r4*k05_r_r4*k08_r_r4*k10_r_r4*k12_r_r4*k14_r_r4*m_m8*m_m9*m_m13 + k02_r_r4*k06_r_r4*k07_r_r4*k12_r_r4*k16_r_r4*k17_r_r4*m_m2*m_m9*m_m13 + k05_r_r4*k07_r_r4*k09_r_r4*k11_r_r4*k14_r_r4*k15_r_r4*m_m2*m_m8*m_m13 + k05_r_r4*k07_r_r4*k09_r_r4*k11_r_r4*k15_r_r4*k18_r_r4*m_m2*m_m8*m_m9 + k02_r_r4*k07_r_r4*k09_r_r4*k11_r_r4*k14_r_r4*k18_r_r4*m_m2*m_m9*m_m13 + k02_r_r4*k06_r_r4*k07_r_r4*k14_r_r4*k15_r_r4*k18_r_r4*m_m2*m_m9*m_m13 + k05_r_r4*k07_r_r4*k09_r_r4*k13_r_r4*k15_r_r4*k18_r_r4*m_m2*m_m8*m_m9 + k02_r_r4*k07_r_r4*k09_r_r4*k12_r_r4*k16_r_r4*k17_r_r4*m_m2*m_m9*m_m13 + k02_r_r4*k07_r_r4*k10_r_r4*k12_r_r4*k16_r_r4*k17_r_r4*m_m2*m_m9*m_m13 + k04_r_r4*k05_r_r4*k08_r_r4*k12_r_r4*k13_r_r4*k16_r_r4*m_m8*m_m9*m_m13 + k05_r_r4*k07_r_r4*k09_r_r4*k11_r_r4*k16_r_r4*k17_r_r4*m_m2*m_m8*m_m13 + k02_r_r4*k07_r_r4*k09_r_r4*k14_r_r4*k15_r_r4*k18_r_r4*m_m2*m_m9*m_m13 + k04_r_r4*k05_r_r4*k09_r_r4*k12_r_r4*k13_r_r4*k16_r_r4*m_m8*m_m9*m_m13 + k02_r_r4*k07_r_r4*k10_r_r4*k14_r_r4*k15_r_r4*k18_r_r4*m_m2*m_m9*m_m13 + k04_r_r4*k05_r_r4*k08_r_r4*k11_r_r4*k14_r_r4*k18_r_r4*m_m8*m_m9*m_m13 + k05_r_r4*k07_r_r4*k09_r_r4*k13_r_r4*k16_r_r4*k17_r_r4*m_m2*m_m8*m_m13 + k04_r_r4*k05_r_r4*k09_r_r4*k11_r_r4*k14_r_r4*k18_r_r4*m_m8*m_m9*m_m13 + k04_r_r4*k05_r_r4*k08_r_r4*k12_r_r4*k16_r_r4*k17_r_r4*m_m8*m_m9*m_m13 + k06_r_r4*k07_r_r4*k10_r_r4*k12_r_r4*k16_r_r4*k17_r_r4*m_m2*m_m9*m_m13 + k04_r_r4*k05_r_r4*k09_r_r4*k12_r_r4*k16_r_r4*k17_r_r4*m_m8*m_m9*m_m13 + k04_r_r4*k05_r_r4*k08_r_r4*k14_r_r4*k15_r_r4*k18_r_r4*m_m8*m_m9*m_m13 + k04_r_r4*k05_r_r4*k10_r_r4*k12_r_r4*k16_r_r4*k17_r_r4*m_m8*m_m9*m_m13 + k06_r_r4*k07_r_r4*k10_r_r4*k14_r_r4*k15_r_r4*k18_r_r4*m_m2*m_m9*m_m13 + k04_r_r4*k05_r_r4*k09_r_r4*k14_r_r4*k15_r_r4*k18_r_r4*m_m8*m_m9*m_m13 + k04_r_r4*k05_r_r4*k10_r_r4*k14_r_r4*k15_r_r4*k18_r_r4*m_m8*m_m9*m_m13 + k05_r_r4*k08_r_r4*k10_r_r4*k12_r_r4*k16_r_r4*k17_r_r4*m_m8*m_m9*m_m13 + k05_r_r4*k08_r_r4*k10_r_r4*k14_r_r4*k15_r_r4*k18_r_r4*m_m8*m_m9*m_m13 + k01_r_r4*k05_r_r4*k07_r_r4*k09_r_r4*k12_r_r4*k13_r_r4*m_m2^2*m_m8*m_m9 + k03_r_r4*k05_r_r4*k07_r_r4*k09_r_r4*k12_r_r4*k13_r_r4*m_m2*m_m8^2*m_m9 + k01_r_r4*k05_r_r4*k07_r_r4*k09_r_r4*k11_r_r4*k14_r_r4*m_m2^2*m_m8*m_m13 + k01_r_r4*k05_r_r4*k07_r_r4*k09_r_r4*k12_r_r4*k17_r_r4*m_m2^2*m_m8*m_m9 + k01_r_r4*k05_r_r4*k07_r_r4*k10_r_r4*k12_r_r4*k17_r_r4*m_m2^2*m_m8*m_m9 + k03_r_r4*k05_r_r4*k07_r_r4*k09_r_r4*k11_r_r4*k14_r_r4*m_m2*m_m8^2*m_m13 + k03_r_r4*k05_r_r4*k07_r_r4*k09_r_r4*k12_r_r4*k17_r_r4*m_m2*m_m8^2*m_m9 + k03_r_r4*k05_r_r4*k07_r_r4*k10_r_r4*k12_r_r4*k17_r_r4*m_m2*m_m8^2*m_m9 + k01_r_r4*k05_r_r4*k07_r_r4*k09_r_r4*k14_r_r4*k15_r_r4*m_m2^2*m_m8*m_m13 + k01_r_r4*k05_r_r4*k07_r_r4*k12_r_r4*k13_r_r4*k17_r_r4*m_m2^2*m_m8*m_m9 + k01_r_r4*k06_r_r4*k07_r_r4*k10_r_r4*k12_r_r4*k14_r_r4*m_m2^2*m_m9*m_m13 + k01_r_r4*k05_r_r4*k07_r_r4*k10_r_r4*k14_r_r4*k15_r_r4*m_m2^2*m_m8*m_m13 + k01_r_r4*k05_r_r4*k07_r_r4*k11_r_r4*k14_r_r4*k15_r_r4*m_m2^2*m_m8*m_m13 + k03_r_r4*k05_r_r4*k07_r_r4*k09_r_r4*k14_r_r4*k15_r_r4*m_m2*m_m8^2*m_m13 + k03_r_r4*k05_r_r4*k07_r_r4*k12_r_r4*k13_r_r4*k17_r_r4*m_m2*m_m8^2*m_m9 + k03_r_r4*k05_r_r4*k07_r_r4*k10_r_r4*k14_r_r4*k15_r_r4*m_m2*m_m8^2*m_m13 + k03_r_r4*k05_r_r4*k07_r_r4*k11_r_r4*k14_r_r4*k15_r_r4*m_m2*m_m8^2*m_m13 + k02_r_r4*k06_r_r4*k07_r_r4*k12_r_r4*k14_r_r4*k16_r_r4*m_m2*m_m9*m_m13^2 + k03_r_r4*k05_r_r4*k08_r_r4*k10_r_r4*k12_r_r4*k14_r_r4*m_m8^2*m_m9*m_m13 + k02_r_r4*k06_r_r4*k07_r_r4*k12_r_r4*k14_r_r4*k18_r_r4*m_m2*m_m9^2*m_m13 + k05_r_r4*k07_r_r4*k09_r_r4*k12_r_r4*k13_r_r4*k18_r_r4*m_m2*m_m8*m_m9^2 + k02_r_r4*k07_r_r4*k09_r_r4*k12_r_r4*k14_r_r4*k16_r_r4*m_m2*m_m9*m_m13^2 + k02_r_r4*k07_r_r4*k10_r_r4*k12_r_r4*k14_r_r4*k16_r_r4*m_m2*m_m9*m_m13^2 + k05_r_r4*k07_r_r4*k09_r_r4*k11_r_r4*k14_r_r4*k16_r_r4*m_m2*m_m8*m_m13^2 + k02_r_r4*k07_r_r4*k09_r_r4*k12_r_r4*k14_r_r4*k18_r_r4*m_m2*m_m9^2*m_m13 + k02_r_r4*k07_r_r4*k10_r_r4*k12_r_r4*k14_r_r4*k18_r_r4*m_m2*m_m9^2*m_m13 + k04_r_r4*k05_r_r4*k08_r_r4*k12_r_r4*k14_r_r4*k16_r_r4*m_m8*m_m9*m_m13^2 + k06_r_r4*k07_r_r4*k10_r_r4*k12_r_r4*k14_r_r4*k16_r_r4*m_m2*m_m9*m_m13^2 + k04_r_r4*k05_r_r4*k09_r_r4*k12_r_r4*k14_r_r4*k16_r_r4*m_m8*m_m9*m_m13^2 + k04_r_r4*k05_r_r4*k08_r_r4*k12_r_r4*k14_r_r4*k18_r_r4*m_m8*m_m9^2*m_m13 + k04_r_r4*k05_r_r4*k10_r_r4*k12_r_r4*k14_r_r4*k16_r_r4*m_m8*m_m9*m_m13^2 + k06_r_r4*k07_r_r4*k10_r_r4*k12_r_r4*k14_r_r4*k18_r_r4*m_m2*m_m9^2*m_m13 + k04_r_r4*k05_r_r4*k09_r_r4*k12_r_r4*k14_r_r4*k18_r_r4*m_m8*m_m9^2*m_m13 + k04_r_r4*k05_r_r4*k10_r_r4*k12_r_r4*k14_r_r4*k18_r_r4*m_m8*m_m9^2*m_m13 + k05_r_r4*k08_r_r4*k10_r_r4*k12_r_r4*k14_r_r4*k16_r_r4*m_m8*m_m9*m_m13^2 + k05_r_r4*k08_r_r4*k10_r_r4*k12_r_r4*k14_r_r4*k18_r_r4*m_m8*m_m9^2*m_m13 + k01_r_r4*k04_r_r4*k05_r_r4*k09_r_r4*k12_r_r4*k14_r_r4*m_m2*m_m8*m_m9*m_m13 + k01_r_r4*k04_r_r4*k05_r_r4*k10_r_r4*k12_r_r4*k14_r_r4*m_m2*m_m8*m_m9*m_m13 + k02_r_r4*k03_r_r4*k07_r_r4*k09_r_r4*k12_r_r4*k14_r_r4*m_m2*m_m8*m_m9*m_m13 + k02_r_r4*k03_r_r4*k07_r_r4*k10_r_r4*k12_r_r4*k14_r_r4*m_m2*m_m8*m_m9*m_m13 + k01_r_r4*k05_r_r4*k08_r_r4*k10_r_r4*k12_r_r4*k14_r_r4*m_m2*m_m8*m_m9*m_m13 + k03_r_r4*k06_r_r4*k07_r_r4*k10_r_r4*k12_r_r4*k14_r_r4*m_m2*m_m8*m_m9*m_m13 + k05_r_r4*k07_r_r4*k09_r_r4*k12_r_r4*k13_r_r4*k16_r_r4*m_m2*m_m8*m_m9*m_m13 + k05_r_r4*k07_r_r4*k09_r_r4*k11_r_r4*k14_r_r4*k18_r_r4*m_m2*m_m8*m_m9*m_m13 + k05_r_r4*k07_r_r4*k09_r_r4*k12_r_r4*k16_r_r4*k17_r_r4*m_m2*m_m8*m_m9*m_m13 + k05_r_r4*k07_r_r4*k10_r_r4*k12_r_r4*k16_r_r4*k17_r_r4*m_m2*m_m8*m_m9*m_m13 + k05_r_r4*k07_r_r4*k09_r_r4*k14_r_r4*k15_r_r4*k18_r_r4*m_m2*m_m8*m_m9*m_m13 + k05_r_r4*k07_r_r4*k10_r_r4*k14_r_r4*k15_r_r4*k18_r_r4*m_m2*m_m8*m_m9*m_m13 + k01_r_r4*k05_r_r4*k07_r_r4*k09_r_r4*k12_r_r4*k14_r_r4*m_m2^2*m_m8*m_m9*m_m13 + k01_r_r4*k05_r_r4*k07_r_r4*k10_r_r4*k12_r_r4*k14_r_r4*m_m2^2*m_m8*m_m9*m_m13 + k03_r_r4*k05_r_r4*k07_r_r4*k09_r_r4*k12_r_r4*k14_r_r4*m_m2*m_m8^2*m_m9*m_m13 + k03_r_r4*k05_r_r4*k07_r_r4*k10_r_r4*k12_r_r4*k14_r_r4*m_m2*m_m8^2*m_m9*m_m13 + k05_r_r4*k07_r_r4*k09_r_r4*k12_r_r4*k14_r_r4*k16_r_r4*m_m2*m_m8*m_m9*m_m13^2 + k05_r_r4*k07_r_r4*k10_r_r4*k12_r_r4*k14_r_r4*k16_r_r4*m_m2*m_m8*m_m9*m_m13^2 + k05_r_r4*k07_r_r4*k09_r_r4*k12_r_r4*k14_r_r4*k18_r_r4*m_m2*m_m8*m_m9^2*m_m13 + k05_r_r4*k07_r_r4*k10_r_r4*k12_r_r4*k14_r_r4*k18_r_r4*m_m2*m_m8*m_m9^2*m_m13))*(1/m_m9_ref);
  m_m10' = (-(k06_r_r6*(k01_r_r6*k03_r_r6*k07_r_r6*k09_r_r6*k11_r_r6*m_m1*m_m10 - k02_r_r6*k04_r_r6*k08_r_r6*k10_r_r6*k12_r_r6*m_m11*m_m12)/(k02_r_r6*k04_r_r6*k06_r_r6*k08_r_r6*k11_r_r6 + k02_r_r6*k04_r_r6*k06_r_r6*k09_r_r6*k11_r_r6 + k02_r_r6*k06_r_r6*k07_r_r6*k09_r_r6*k11_r_r6 + k01_r_r6*k04_r_r6*k06_r_r6*k08_r_r6*k11_r_r6*m_m1 + k01_r_r6*k04_r_r6*k06_r_r6*k09_r_r6*k11_r_r6*m_m1 + k01_r_r6*k06_r_r6*k07_r_r6*k09_r_r6*k11_r_r6*m_m1 + k02_r_r6*k04_r_r6*k06_r_r6*k08_r_r6*k10_r_r6*m_m11 + k02_r_r6*k04_r_r6*k06_r_r6*k08_r_r6*k12_r_r6*m_m12 + k02_r_r6*k04_r_r6*k06_r_r6*k09_r_r6*k12_r_r6*m_m12 + k03_r_r6*k06_r_r6*k07_r_r6*k09_r_r6*k11_r_r6*m_m10 + k02_r_r6*k06_r_r6*k07_r_r6*k09_r_r6*k12_r_r6*m_m12 + k01_r_r6*k03_r_r6*k06_r_r6*k07_r_r6*k09_r_r6*m_m1*m_m10 + k01_r_r6*k03_r_r6*k06_r_r6*k07_r_r6*k11_r_r6*m_m1*m_m10 + k01_r_r6*k03_r_r6*k06_r_r6*k08_r_r6*k11_r_r6*m_m1*m_m10 + k01_r_r6*k03_r_r6*k06_r_r6*k09_r_r6*k11_r_r6*m_m1*m_m10 + k01_r_r6*k04_r_r6*k06_r_r6*k08_r_r6*k10_r_r6*m_m1*m_m11 + k02_r_r6*k04_r_r6*k06_r_r6*k10_r_r6*k12_r_r6*m_m11*m_m12 + k03_r_r6*k06_r_r6*k07_r_r6*k09_r_r6*k12_r_r6*m_m10*m_m12 + k02_r_r6*k06_r_r6*k07_r_r6*k10_r_r6*k12_r_r6*m_m11*m_m12 + k02_r_r6*k06_r_r6*k08_r_r6*k10_r_r6*k12_r_r6*m_m11*m_m12 + k04_r_r6*k06_r_r6*k08_r_r6*k10_r_r6*k12_r_r6*m_m11*m_m12 + k01_r_r6*k03_r_r6*k05_r_r6*k08_r_r6*k11_r_r6*m_m1*m_m9*m_m10 + k01_r_r6*k03_r_r6*k05_r_r6*k09_r_r6*k11_r_r6*m_m1*m_m9*m_m10 + k01_r_r6*k03_r_r6*k06_r_r6*k07_r_r6*k10_r_r6*m_m1*m_m10*m_m11 + k01_r_r6*k03_r_r6*k06_r_r6*k08_r_r6*k10_r_r6*m_m1*m_m10*m_m11 + k02_r_r6*k05_r_r6*k08_r_r6*k10_r_r6*k12_r_r6*m_m9*m_m11*m_m12 + k03_r_r6*k06_r_r6*k07_r_r6*k10_r_r6*k12_r_r6*m_m10*m_m11*m_m12 + k03_r_r6*k06_r_r6*k08_r_r6*k10_r_r6*k12_r_r6*m_m10*m_m11*m_m12 + k01_r_r6*k03_r_r6*k05_r_r6*k08_r_r6*k10_r_r6*m_m1*m_m9*m_m10*m_m11 + k03_r_r6*k05_r_r6*k08_r_r6*k10_r_r6*k12_r_r6*m_m9*m_m10*m_m11*m_m12)) + (k01_r_r5*k03_r_r5*k05_r_r5*m_m6 - k02_r_r5*k04_r_r5*k06_r_r5*m_m10)/(k02_r_r5*k04_r_r5 + k02_r_r5*k05_r_r5 + k03_r_r5*k05_r_r5 + k01_r_r5*k03_r_r5*m_m6 + k01_r_r5*k04_r_r5*m_m6 + k01_r_r5*k05_r_r5*m_m6 + k02_r_r5*k06_r_r5*m_m10 + k03_r_r5*k06_r_r5*m_m10 + k04_r_r5*k06_r_r5*m_m10))*(1/m_m10_ref);
  m_m11' = (-(k01_r_r13*m_m11 - k02_r_r13*m_m18) + k06_r_r6*(k01_r_r6*k03_r_r6*k07_r_r6*k09_r_r6*k11_r_r6*m_m1*m_m10 - k02_r_r6*k04_r_r6*k08_r_r6*k10_r_r6*k12_r_r6*m_m11*m_m12)/(k02_r_r6*k04_r_r6*k06_r_r6*k08_r_r6*k11_r_r6 + k02_r_r6*k04_r_r6*k06_r_r6*k09_r_r6*k11_r_r6 + k02_r_r6*k06_r_r6*k07_r_r6*k09_r_r6*k11_r_r6 + k01_r_r6*k04_r_r6*k06_r_r6*k08_r_r6*k11_r_r6*m_m1 + k01_r_r6*k04_r_r6*k06_r_r6*k09_r_r6*k11_r_r6*m_m1 + k01_r_r6*k06_r_r6*k07_r_r6*k09_r_r6*k11_r_r6*m_m1 + k02_r_r6*k04_r_r6*k06_r_r6*k08_r_r6*k10_r_r6*m_m11 + k02_r_r6*k04_r_r6*k06_r_r6*k08_r_r6*k12_r_r6*m_m12 + k02_r_r6*k04_r_r6*k06_r_r6*k09_r_r6*k12_r_r6*m_m12 + k03_r_r6*k06_r_r6*k07_r_r6*k09_r_r6*k11_r_r6*m_m10 + k02_r_r6*k06_r_r6*k07_r_r6*k09_r_r6*k12_r_r6*m_m12 + k01_r_r6*k03_r_r6*k06_r_r6*k07_r_r6*k09_r_r6*m_m1*m_m10 + k01_r_r6*k03_r_r6*k06_r_r6*k07_r_r6*k11_r_r6*m_m1*m_m10 + k01_r_r6*k03_r_r6*k06_r_r6*k08_r_r6*k11_r_r6*m_m1*m_m10 + k01_r_r6*k03_r_r6*k06_r_r6*k09_r_r6*k11_r_r6*m_m1*m_m10 + k01_r_r6*k04_r_r6*k06_r_r6*k08_r_r6*k10_r_r6*m_m1*m_m11 + k02_r_r6*k04_r_r6*k06_r_r6*k10_r_r6*k12_r_r6*m_m11*m_m12 + k03_r_r6*k06_r_r6*k07_r_r6*k09_r_r6*k12_r_r6*m_m10*m_m12 + k02_r_r6*k06_r_r6*k07_r_r6*k10_r_r6*k12_r_r6*m_m11*m_m12 + k02_r_r6*k06_r_r6*k08_r_r6*k10_r_r6*k12_r_r6*m_m11*m_m12 + k04_r_r6*k06_r_r6*k08_r_r6*k10_r_r6*k12_r_r6*m_m11*m_m12 + k01_r_r6*k03_r_r6*k05_r_r6*k08_r_r6*k11_r_r6*m_m1*m_m9*m_m10 + k01_r_r6*k03_r_r6*k05_r_r6*k09_r_r6*k11_r_r6*m_m1*m_m9*m_m10 + k01_r_r6*k03_r_r6*k06_r_r6*k07_r_r6*k10_r_r6*m_m1*m_m10*m_m11 + k01_r_r6*k03_r_r6*k06_r_r6*k08_r_r6*k10_r_r6*m_m1*m_m10*m_m11 + k02_r_r6*k05_r_r6*k08_r_r6*k10_r_r6*k12_r_r6*m_m9*m_m11*m_m12 + k03_r_r6*k06_r_r6*k07_r_r6*k10_r_r6*k12_r_r6*m_m10*m_m11*m_m12 + k03_r_r6*k06_r_r6*k08_r_r6*k10_r_r6*k12_r_r6*m_m10*m_m11*m_m12 + k01_r_r6*k03_r_r6*k05_r_r6*k08_r_r6*k10_r_r6*m_m1*m_m9*m_m10*m_m11 + k03_r_r6*k05_r_r6*k08_r_r6*k10_r_r6*k12_r_r6*m_m9*m_m10*m_m11*m_m12))*(1/m_m11_ref);

  // Reactions:
  r_r1: $m_m3 + m_m6 -> m_m5 + $m_m14; k04_r_r1*(k01_r_r1*k05_r_r1*k07_r_r1*k09_r_r1*k11_r_r1*m_m3*m_m6 - k02_r_r1*k06_r_r1*k08_r_r1*k10_r_r1*k12_r_r1*m_m5*m_m14)/(k02_r_r1*k04_r_r1*k06_r_r1*k08_r_r1*k11_r_r1 + k02_r_r1*k04_r_r1*k06_r_r1*k09_r_r1*k11_r_r1 + k02_r_r1*k04_r_r1*k07_r_r1*k09_r_r1*k11_r_r1 + k03_r_r1*k05_r_r1*k07_r_r1*k09_r_r1*k11_r_r1*m_m6^2 + k01_r_r1*k04_r_r1*k06_r_r1*k08_r_r1*k11_r_r1*m_m3 + k01_r_r1*k04_r_r1*k06_r_r1*k09_r_r1*k11_r_r1*m_m3 + k01_r_r1*k04_r_r1*k07_r_r1*k09_r_r1*k11_r_r1*m_m3 + k02_r_r1*k04_r_r1*k06_r_r1*k08_r_r1*k10_r_r1*m_m5 + k02_r_r1*k03_r_r1*k06_r_r1*k08_r_r1*k11_r_r1*m_m6 + k02_r_r1*k03_r_r1*k06_r_r1*k09_r_r1*k11_r_r1*m_m6 + k02_r_r1*k03_r_r1*k07_r_r1*k09_r_r1*k11_r_r1*m_m6 + k04_r_r1*k05_r_r1*k07_r_r1*k09_r_r1*k11_r_r1*m_m6 + k02_r_r1*k04_r_r1*k06_r_r1*k08_r_r1*k12_r_r1*m_m14 + k02_r_r1*k04_r_r1*k06_r_r1*k09_r_r1*k12_r_r1*m_m14 + k02_r_r1*k04_r_r1*k07_r_r1*k09_r_r1*k12_r_r1*m_m14 + k01_r_r1*k04_r_r1*k05_r_r1*k07_r_r1*k09_r_r1*m_m3*m_m6 + k01_r_r1*k04_r_r1*k05_r_r1*k07_r_r1*k11_r_r1*m_m3*m_m6 + k01_r_r1*k04_r_r1*k06_r_r1*k08_r_r1*k10_r_r1*m_m3*m_m5 + k01_r_r1*k04_r_r1*k05_r_r1*k08_r_r1*k11_r_r1*m_m3*m_m6 + k01_r_r1*k04_r_r1*k05_r_r1*k09_r_r1*k11_r_r1*m_m3*m_m6 + k02_r_r1*k03_r_r1*k06_r_r1*k08_r_r1*k10_r_r1*m_m5*m_m6 + k02_r_r1*k04_r_r1*k06_r_r1*k10_r_r1*k12_r_r1*m_m5*m_m14 + k02_r_r1*k04_r_r1*k07_r_r1*k10_r_r1*k12_r_r1*m_m5*m_m14 + k02_r_r1*k04_r_r1*k08_r_r1*k10_r_r1*k12_r_r1*m_m5*m_m14 + k04_r_r1*k05_r_r1*k07_r_r1*k09_r_r1*k12_r_r1*m_m6*m_m14 + k04_r_r1*k06_r_r1*k08_r_r1*k10_r_r1*k12_r_r1*m_m5*m_m14 + k01_r_r1*k04_r_r1*k05_r_r1*k07_r_r1*k10_r_r1*m_m3*m_m5*m_m6 + k01_r_r1*k04_r_r1*k05_r_r1*k08_r_r1*k10_r_r1*m_m3*m_m5*m_m6 + k04_r_r1*k05_r_r1*k07_r_r1*k10_r_r1*k12_r_r1*m_m5*m_m6*m_m14 + k04_r_r1*k05_r_r1*k08_r_r1*k10_r_r1*k12_r_r1*m_m5*m_m6*m_m14);
  r_r2: m_m5 -> m_m7; (k01_r_r2*k03_r_r2*k05_r_r2*m_m5 - k02_r_r2*k04_r_r2*k06_r_r2*m_m7)/(k02_r_r2*k04_r_r2 + k02_r_r2*k05_r_r2 + k03_r_r2*k05_r_r2 + k01_r_r2*k03_r_r2*m_m5 + k01_r_r2*k04_r_r2*m_m5 + k01_r_r2*k05_r_r2*m_m5 + k02_r_r2*k06_r_r2*m_m7 + k03_r_r2*k06_r_r2*m_m7 + k04_r_r2*k06_r_r2*m_m7);
  r_r3: $m_m1 + m_m7 -> m_m8 + $m_m12; k06_r_r3*(k01_r_r3*k03_r_r3*k07_r_r3*k09_r_r3*k11_r_r3*m_m1*m_m7 - k02_r_r3*k04_r_r3*k08_r_r3*k10_r_r3*k12_r_r3*m_m8*m_m12)/(k02_r_r3*k04_r_r3*k06_r_r3*k08_r_r3*k11_r_r3 + k02_r_r3*k04_r_r3*k06_r_r3*k09_r_r3*k11_r_r3 + k02_r_r3*k06_r_r3*k07_r_r3*k09_r_r3*k11_r_r3 + k01_r_r3*k04_r_r3*k06_r_r3*k08_r_r3*k11_r_r3*m_m1 + k01_r_r3*k04_r_r3*k06_r_r3*k09_r_r3*k11_r_r3*m_m1 + k01_r_r3*k06_r_r3*k07_r_r3*k09_r_r3*k11_r_r3*m_m1 + k02_r_r3*k04_r_r3*k06_r_r3*k08_r_r3*k10_r_r3*m_m8 + k03_r_r3*k06_r_r3*k07_r_r3*k09_r_r3*k11_r_r3*m_m7 + k02_r_r3*k04_r_r3*k06_r_r3*k08_r_r3*k12_r_r3*m_m12 + k02_r_r3*k04_r_r3*k06_r_r3*k09_r_r3*k12_r_r3*m_m12 + k02_r_r3*k06_r_r3*k07_r_r3*k09_r_r3*k12_r_r3*m_m12 + k01_r_r3*k03_r_r3*k06_r_r3*k07_r_r3*k09_r_r3*m_m1*m_m7 + k01_r_r3*k03_r_r3*k06_r_r3*k07_r_r3*k11_r_r3*m_m1*m_m7 + k01_r_r3*k03_r_r3*k06_r_r3*k08_r_r3*k11_r_r3*m_m1*m_m7 + k01_r_r3*k03_r_r3*k06_r_r3*k09_r_r3*k11_r_r3*m_m1*m_m7 + k01_r_r3*k04_r_r3*k06_r_r3*k08_r_r3*k10_r_r3*m_m1*m_m8 + k02_r_r3*k04_r_r3*k06_r_r3*k10_r_r3*k12_r_r3*m_m8*m_m12 + k03_r_r3*k06_r_r3*k07_r_r3*k09_r_r3*k12_r_r3*m_m7*m_m12 + k02_r_r3*k06_r_r3*k07_r_r3*k10_r_r3*k12_r_r3*m_m8*m_m12 + k02_r_r3*k06_r_r3*k08_r_r3*k10_r_r3*k12_r_r3*m_m8*m_m12 + k04_r_r3*k06_r_r3*k08_r_r3*k10_r_r3*k12_r_r3*m_m8*m_m12 + k01_r_r3*k03_r_r3*k06_r_r3*k07_r_r3*k10_r_r3*m_m1*m_m7*m_m8 + k01_r_r3*k03_r_r3*k06_r_r3*k08_r_r3*k10_r_r3*m_m1*m_m7*m_m8 + k01_r_r3*k03_r_r3*k05_r_r3*k08_r_r3*k11_r_r3*m_m1*m_m7*m_m9 + k01_r_r3*k03_r_r3*k05_r_r3*k09_r_r3*k11_r_r3*m_m1*m_m7*m_m9 + k03_r_r3*k06_r_r3*k07_r_r3*k10_r_r3*k12_r_r3*m_m7*m_m8*m_m12 + k02_r_r3*k05_r_r3*k08_r_r3*k10_r_r3*k12_r_r3*m_m8*m_m9*m_m12 + k03_r_r3*k06_r_r3*k08_r_r3*k10_r_r3*k12_r_r3*m_m7*m_m8*m_m12 + k01_r_r3*k03_r_r3*k05_r_r3*k08_r_r3*k10_r_r3*m_m1*m_m7*m_m8*m_m9 + k03_r_r3*k05_r_r3*k08_r_r3*k10_r_r3*k12_r_r3*m_m7*m_m8*m_m9*m_m12);  // modifiers: m_m9
  r_r4: $m_m2 + m_m8 -> m_m9 + $m_m13; (k01_r_r4*k04_r_r4*k05_r_r4*k09_r_r4*k11_r_r4*k15_r_r4*k17_r_r4*m_m2*m_m8 + k01_r_r4*k04_r_r4*k05_r_r4*k09_r_r4*k13_r_r4*k15_r_r4*k17_r_r4*m_m2*m_m8 + k02_r_r4*k03_r_r4*k07_r_r4*k09_r_r4*k11_r_r4*k15_r_r4*k17_r_r4*m_m2*m_m8 + k02_r_r4*k03_r_r4*k07_r_r4*k09_r_r4*k13_r_r4*k15_r_r4*k17_r_r4*m_m2*m_m8 - k02_r_r4*k04_r_r4*k06_r_r4*k10_r_r4*k12_r_r4*k16_r_r4*k17_r_r4*m_m9*m_m13 - k02_r_r4*k04_r_r4*k06_r_r4*k10_r_r4*k14_r_r4*k15_r_r4*k18_r_r4*m_m9*m_m13 - k02_r_r4*k04_r_r4*k08_r_r4*k10_r_r4*k12_r_r4*k16_r_r4*k17_r_r4*m_m9*m_m13 - k02_r_r4*k04_r_r4*k08_r_r4*k10_r_r4*k14_r_r4*k15_r_r4*k18_r_r4*m_m9*m_m13 + k01_r_r4*k05_r_r4*k07_r_r4*k09_r_r4*k11_r_r4*k15_r_r4*k17_r_r4*m_m2^2*m_m8 + k01_r_r4*k05_r_r4*k07_r_r4*k09_r_r4*k13_r_r4*k15_r_r4*k17_r_r4*m_m2^2*m_m8 + k03_r_r4*k05_r_r4*k07_r_r4*k09_r_r4*k11_r_r4*k15_r_r4*k17_r_r4*m_m2*m_m8^2 + k03_r_r4*k05_r_r4*k07_r_r4*k09_r_r4*k13_r_r4*k15_r_r4*k17_r_r4*m_m2*m_m8^2 - k02_r_r4*k04_r_r4*k06_r_r4*k10_r_r4*k12_r_r4*k14_r_r4*k16_r_r4*m_m9*m_m13^2 - k02_r_r4*k04_r_r4*k06_r_r4*k10_r_r4*k12_r_r4*k14_r_r4*k18_r_r4*m_m9^2*m_m13 - k02_r_r4*k04_r_r4*k08_r_r4*k10_r_r4*k12_r_r4*k14_r_r4*k16_r_r4*m_m9*m_m13^2 - k02_r_r4*k04_r_r4*k08_r_r4*k10_r_r4*k12_r_r4*k14_r_r4*k18_r_r4*m_m9^2*m_m13 + k01_r_r4*k04_r_r4*k05_r_r4*k09_r_r4*k12_r_r4*k13_r_r4*k17_r_r4*m_m2*m_m8*m_m9 + k01_r_r4*k04_r_r4*k05_r_r4*k09_r_r4*k11_r_r4*k14_r_r4*k15_r_r4*m_m2*m_m8*m_m13 + k02_r_r4*k03_r_r4*k07_r_r4*k09_r_r4*k12_r_r4*k13_r_r4*k17_r_r4*m_m2*m_m8*m_m9 + k02_r_r4*k03_r_r4*k07_r_r4*k09_r_r4*k11_r_r4*k14_r_r4*k15_r_r4*m_m2*m_m8*m_m13 - k02_r_r4*k06_r_r4*k07_r_r4*k10_r_r4*k12_r_r4*k16_r_r4*k17_r_r4*m_m2*m_m9*m_m13 - k02_r_r4*k06_r_r4*k07_r_r4*k10_r_r4*k14_r_r4*k15_r_r4*k18_r_r4*m_m2*m_m9*m_m13 - k04_r_r4*k05_r_r4*k08_r_r4*k10_r_r4*k12_r_r4*k16_r_r4*k17_r_r4*m_m8*m_m9*m_m13 - k04_r_r4*k05_r_r4*k08_r_r4*k10_r_r4*k14_r_r4*k15_r_r4*k18_r_r4*m_m8*m_m9*m_m13 + k01_r_r4*k05_r_r4*k07_r_r4*k09_r_r4*k12_r_r4*k13_r_r4*k17_r_r4*m_m2^2*m_m8*m_m9 + k01_r_r4*k05_r_r4*k07_r_r4*k09_r_r4*k11_r_r4*k14_r_r4*k15_r_r4*m_m2^2*m_m8*m_m13 + k03_r_r4*k05_r_r4*k07_r_r4*k09_r_r4*k12_r_r4*k13_r_r4*k17_r_r4*m_m2*m_m8^2*m_m9 + k03_r_r4*k05_r_r4*k07_r_r4*k09_r_r4*k11_r_r4*k14_r_r4*k15_r_r4*m_m2*m_m8^2*m_m13 - k02_r_r4*k06_r_r4*k07_r_r4*k10_r_r4*k12_r_r4*k14_r_r4*k16_r_r4*m_m2*m_m9*m_m13^2 - k02_r_r4*k06_r_r4*k07_r_r4*k10_r_r4*k12_r_r4*k14_r_r4*k18_r_r4*m_m2*m_m9^2*m_m13 - k04_r_r4*k05_r_r4*k08_r_r4*k10_r_r4*k12_r_r4*k14_r_r4*k16_r_r4*m_m8*m_m9*m_m13^2 - k04_r_r4*k05_r_r4*k08_r_r4*k10_r_r4*k12_r_r4*k14_r_r4*k18_r_r4*m_m8*m_m9^2*m_m13)/(k02_r_r4*k04_r_r4*k06_r_r4*k10_r_r4*k15_r_r4*k17_r_r4 + k02_r_r4*k04_r_r4*k06_r_r4*k11_r_r4*k15_r_r4*k17_r_r4 + k02_r_r4*k04_r_r4*k08_r_r4*k10_r_r4*k15_r_r4*k17_r_r4 + k02_r_r4*k04_r_r4*k06_r_r4*k13_r_r4*k15_r_r4*k17_r_r4 + k02_r_r4*k04_r_r4*k08_r_r4*k11_r_r4*k15_r_r4*k17_r_r4 + k02_r_r4*k04_r_r4*k09_r_r4*k11_r_r4*k15_r_r4*k17_r_r4 + k02_r_r4*k04_r_r4*k08_r_r4*k13_r_r4*k15_r_r4*k17_r_r4 + k02_r_r4*k04_r_r4*k09_r_r4*k13_r_r4*k15_r_r4*k17_r_r4 + k01_r_r4*k04_r_r4*k06_r_r4*k10_r_r4*k15_r_r4*k17_r_r4*m_m2 + k01_r_r4*k04_r_r4*k06_r_r4*k11_r_r4*k15_r_r4*k17_r_r4*m_m2 + k01_r_r4*k04_r_r4*k08_r_r4*k10_r_r4*k15_r_r4*k17_r_r4*m_m2 + k01_r_r4*k04_r_r4*k06_r_r4*k13_r_r4*k15_r_r4*k17_r_r4*m_m2 + k01_r_r4*k04_r_r4*k08_r_r4*k11_r_r4*k15_r_r4*k17_r_r4*m_m2 + k01_r_r4*k04_r_r4*k09_r_r4*k11_r_r4*k15_r_r4*k17_r_r4*m_m2 + k02_r_r4*k06_r_r4*k07_r_r4*k10_r_r4*k15_r_r4*k17_r_r4*m_m2 + k01_r_r4*k04_r_r4*k08_r_r4*k13_r_r4*k15_r_r4*k17_r_r4*m_m2 + k02_r_r4*k04_r_r4*k06_r_r4*k10_r_r4*k12_r_r4*k17_r_r4*m_m9 + k02_r_r4*k06_r_r4*k07_r_r4*k11_r_r4*k15_r_r4*k17_r_r4*m_m2 + k01_r_r4*k04_r_r4*k09_r_r4*k13_r_r4*k15_r_r4*k17_r_r4*m_m2 + k02_r_r4*k03_r_r4*k06_r_r4*k10_r_r4*k15_r_r4*k17_r_r4*m_m8 + k02_r_r4*k03_r_r4*k06_r_r4*k11_r_r4*k15_r_r4*k17_r_r4*m_m8 + k02_r_r4*k04_r_r4*k08_r_r4*k10_r_r4*k12_r_r4*k17_r_r4*m_m9 + k02_r_r4*k06_r_r4*k07_r_r4*k13_r_r4*k15_r_r4*k17_r_r4*m_m2 + k02_r_r4*k03_r_r4*k08_r_r4*k10_r_r4*k15_r_r4*k17_r_r4*m_m8 + k02_r_r4*k04_r_r4*k06_r_r4*k12_r_r4*k13_r_r4*k17_r_r4*m_m9 + k02_r_r4*k07_r_r4*k09_r_r4*k11_r_r4*k15_r_r4*k17_r_r4*m_m2 + k02_r_r4*k03_r_r4*k06_r_r4*k13_r_r4*k15_r_r4*k17_r_r4*m_m8 + k02_r_r4*k03_r_r4*k08_r_r4*k11_r_r4*k15_r_r4*k17_r_r4*m_m8 + k02_r_r4*k04_r_r4*k06_r_r4*k10_r_r4*k14_r_r4*k15_r_r4*m_m13 + k02_r_r4*k04_r_r4*k06_r_r4*k10_r_r4*k15_r_r4*k18_r_r4*m_m9 + k02_r_r4*k03_r_r4*k09_r_r4*k11_r_r4*k15_r_r4*k17_r_r4*m_m8 + k02_r_r4*k04_r_r4*k06_r_r4*k11_r_r4*k14_r_r4*k15_r_r4*m_m13 + k02_r_r4*k04_r_r4*k06_r_r4*k11_r_r4*k15_r_r4*k18_r_r4*m_m9 + k02_r_r4*k04_r_r4*k08_r_r4*k12_r_r4*k13_r_r4*k17_r_r4*m_m9 + k02_r_r4*k07_r_r4*k09_r_r4*k13_r_r4*k15_r_r4*k17_r_r4*m_m2 + k02_r_r4*k03_r_r4*k08_r_r4*k13_r_r4*k15_r_r4*k17_r_r4*m_m8 + k02_r_r4*k04_r_r4*k08_r_r4*k10_r_r4*k14_r_r4*k15_r_r4*m_m13 + k02_r_r4*k04_r_r4*k08_r_r4*k10_r_r4*k15_r_r4*k18_r_r4*m_m9 + k02_r_r4*k04_r_r4*k09_r_r4*k12_r_r4*k13_r_r4*k17_r_r4*m_m9 + k02_r_r4*k03_r_r4*k09_r_r4*k13_r_r4*k15_r_r4*k17_r_r4*m_m8 + k02_r_r4*k04_r_r4*k06_r_r4*k13_r_r4*k15_r_r4*k18_r_r4*m_m9 + k02_r_r4*k04_r_r4*k08_r_r4*k11_r_r4*k14_r_r4*k15_r_r4*m_m13 + k02_r_r4*k04_r_r4*k08_r_r4*k11_r_r4*k15_r_r4*k18_r_r4*m_m9 + k04_r_r4*k05_r_r4*k08_r_r4*k10_r_r4*k15_r_r4*k17_r_r4*m_m8 + k02_r_r4*k04_r_r4*k06_r_r4*k10_r_r4*k16_r_r4*k17_r_r4*m_m13 + k02_r_r4*k04_r_r4*k09_r_r4*k11_r_r4*k14_r_r4*k15_r_r4*m_m13 + k02_r_r4*k04_r_r4*k09_r_r4*k11_r_r4*k15_r_r4*k18_r_r4*m_m9 + k04_r_r4*k05_r_r4*k08_r_r4*k11_r_r4*k15_r_r4*k17_r_r4*m_m8 + k02_r_r4*k04_r_r4*k06_r_r4*k11_r_r4*k16_r_r4*k17_r_r4*m_m13 + k02_r_r4*k04_r_r4*k08_r_r4*k13_r_r4*k15_r_r4*k18_r_r4*m_m9 + k04_r_r4*k05_r_r4*k09_r_r4*k11_r_r4*k15_r_r4*k17_r_r4*m_m8 + k02_r_r4*k04_r_r4*k08_r_r4*k10_r_r4*k16_r_r4*k17_r_r4*m_m13 + k02_r_r4*k04_r_r4*k09_r_r4*k13_r_r4*k15_r_r4*k18_r_r4*m_m9 + k04_r_r4*k05_r_r4*k08_r_r4*k13_r_r4*k15_r_r4*k17_r_r4*m_m8 + k02_r_r4*k04_r_r4*k06_r_r4*k13_r_r4*k16_r_r4*k17_r_r4*m_m13 + k02_r_r4*k04_r_r4*k08_r_r4*k11_r_r4*k16_r_r4*k17_r_r4*m_m13 + k04_r_r4*k05_r_r4*k09_r_r4*k13_r_r4*k15_r_r4*k17_r_r4*m_m8 + k02_r_r4*k04_r_r4*k09_r_r4*k11_r_r4*k16_r_r4*k17_r_r4*m_m13 + k02_r_r4*k04_r_r4*k08_r_r4*k13_r_r4*k16_r_r4*k17_r_r4*m_m13 + k02_r_r4*k04_r_r4*k09_r_r4*k13_r_r4*k16_r_r4*k17_r_r4*m_m13 + k01_r_r4*k06_r_r4*k07_r_r4*k10_r_r4*k15_r_r4*k17_r_r4*m_m2^2 + k01_r_r4*k06_r_r4*k07_r_r4*k11_r_r4*k15_r_r4*k17_r_r4*m_m2^2 + k01_r_r4*k06_r_r4*k07_r_r4*k13_r_r4*k15_r_r4*k17_r_r4*m_m2^2 + k02_r_r4*k04_r_r4*k06_r_r4*k10_r_r4*k12_r_r4*k18_r_r4*m_m9^2 + k01_r_r4*k07_r_r4*k09_r_r4*k11_r_r4*k15_r_r4*k17_r_r4*m_m2^2 + k02_r_r4*k04_r_r4*k08_r_r4*k10_r_r4*k12_r_r4*k18_r_r4*m_m9^2 + k01_r_r4*k07_r_r4*k09_r_r4*k13_r_r4*k15_r_r4*k17_r_r4*m_m2^2 + k02_r_r4*k04_r_r4*k06_r_r4*k12_r_r4*k13_r_r4*k18_r_r4*m_m9^2 + k02_r_r4*k04_r_r4*k06_r_r4*k10_r_r4*k14_r_r4*k16_r_r4*m_m13^2 + k02_r_r4*k04_r_r4*k06_r_r4*k11_r_r4*k14_r_r4*k16_r_r4*m_m13^2 + k02_r_r4*k04_r_r4*k08_r_r4*k12_r_r4*k13_r_r4*k18_r_r4*m_m9^2 + k03_r_r4*k05_r_r4*k08_r_r4*k10_r_r4*k15_r_r4*k17_r_r4*m_m8^2 + k02_r_r4*k04_r_r4*k08_r_r4*k10_r_r4*k14_r_r4*k16_r_r4*m_m13^2 + k02_r_r4*k04_r_r4*k09_r_r4*k12_r_r4*k13_r_r4*k18_r_r4*m_m9^2 + k03_r_r4*k05_r_r4*k08_r_r4*k11_r_r4*k15_r_r4*k17_r_r4*m_m8^2 + k02_r_r4*k04_r_r4*k08_r_r4*k11_r_r4*k14_r_r4*k16_r_r4*m_m13^2 + k03_r_r4*k05_r_r4*k09_r_r4*k11_r_r4*k15_r_r4*k17_r_r4*m_m8^2 + k02_r_r4*k04_r_r4*k09_r_r4*k11_r_r4*k14_r_r4*k16_r_r4*m_m13^2 + k03_r_r4*k05_r_r4*k08_r_r4*k13_r_r4*k15_r_r4*k17_r_r4*m_m8^2 + k03_r_r4*k05_r_r4*k09_r_r4*k13_r_r4*k15_r_r4*k17_r_r4*m_m8^2 + k01_r_r4*k05_r_r4*k07_r_r4*k09_r_r4*k11_r_r4*k17_r_r4*m_m2^2*m_m8 + k01_r_r4*k05_r_r4*k07_r_r4*k09_r_r4*k13_r_r4*k15_r_r4*m_m2^2*m_m8 + k03_r_r4*k05_r_r4*k07_r_r4*k09_r_r4*k11_r_r4*k17_r_r4*m_m2*m_m8^2 + k03_r_r4*k05_r_r4*k07_r_r4*k09_r_r4*k13_r_r4*k15_r_r4*m_m2*m_m8^2 + k01_r_r4*k05_r_r4*k07_r_r4*k09_r_r4*k15_r_r4*k17_r_r4*m_m2^2*m_m8 + k01_r_r4*k06_r_r4*k07_r_r4*k10_r_r4*k12_r_r4*k17_r_r4*m_m2^2*m_m9 + k01_r_r4*k05_r_r4*k07_r_r4*k10_r_r4*k15_r_r4*k17_r_r4*m_m2^2*m_m8 + k01_r_r4*k05_r_r4*k07_r_r4*k11_r_r4*k15_r_r4*k17_r_r4*m_m2^2*m_m8 + k02_r_r4*k06_r_r4*k07_r_r4*k10_r_r4*k12_r_r4*k18_r_r4*m_m2*m_m9^2 + k03_r_r4*k05_r_r4*k07_r_r4*k09_r_r4*k15_r_r4*k17_r_r4*m_m2*m_m8^2 + k01_r_r4*k06_r_r4*k07_r_r4*k12_r_r4*k13_r_r4*k17_r_r4*m_m2^2*m_m9 + k03_r_r4*k05_r_r4*k07_r_r4*k10_r_r4*k15_r_r4*k17_r_r4*m_m2*m_m8^2 + k01_r_r4*k05_r_r4*k07_r_r4*k13_r_r4*k15_r_r4*k17_r_r4*m_m2^2*m_m8 + k01_r_r4*k06_r_r4*k07_r_r4*k10_r_r4*k14_r_r4*k15_r_r4*m_m2^2*m_m13 + k03_r_r4*k05_r_r4*k07_r_r4*k11_r_r4*k15_r_r4*k17_r_r4*m_m2*m_m8^2 + k01_r_r4*k06_r_r4*k07_r_r4*k11_r_r4*k14_r_r4*k15_r_r4*m_m2^2*m_m13 + k02_r_r4*k06_r_r4*k07_r_r4*k12_r_r4*k13_r_r4*k18_r_r4*m_m2*m_m9^2 + k01_r_r4*k07_r_r4*k09_r_r4*k12_r_r4*k13_r_r4*k17_r_r4*m_m2^2*m_m9 + k02_r_r4*k06_r_r4*k07_r_r4*k10_r_r4*k14_r_r4*k16_r_r4*m_m2*m_m13^2 + k03_r_r4*k05_r_r4*k07_r_r4*k13_r_r4*k15_r_r4*k17_r_r4*m_m2*m_m8^2 + k02_r_r4*k06_r_r4*k07_r_r4*k11_r_r4*k14_r_r4*k16_r_r4*m_m2*m_m13^2 + k01_r_r4*k07_r_r4*k09_r_r4*k11_r_r4*k14_r_r4*k15_r_r4*m_m2^2*m_m13 + k02_r_r4*k07_r_r4*k09_r_r4*k12_r_r4*k13_r_r4*k18_r_r4*m_m2*m_m9^2 + k03_r_r4*k05_r_r4*k08_r_r4*k10_r_r4*k12_r_r4*k17_r_r4*m_m8^2*m_m9 + k02_r_r4*k07_r_r4*k09_r_r4*k11_r_r4*k14_r_r4*k16_r_r4*m_m2*m_m13^2 + k04_r_r4*k05_r_r4*k08_r_r4*k10_r_r4*k12_r_r4*k18_r_r4*m_m8*m_m9^2 + k03_r_r4*k05_r_r4*k08_r_r4*k12_r_r4*k13_r_r4*k17_r_r4*m_m8^2*m_m9 + k02_r_r4*k04_r_r4*k06_r_r4*k12_r_r4*k14_r_r4*k16_r_r4*m_m9*m_m13^2 + k03_r_r4*k05_r_r4*k08_r_r4*k10_r_r4*k14_r_r4*k15_r_r4*m_m8^2*m_m13 + k03_r_r4*k05_r_r4*k09_r_r4*k12_r_r4*k13_r_r4*k17_r_r4*m_m8^2*m_m9 + k03_r_r4*k05_r_r4*k08_r_r4*k11_r_r4*k14_r_r4*k15_r_r4*m_m8^2*m_m13 + k04_r_r4*k05_r_r4*k08_r_r4*k12_r_r4*k13_r_r4*k18_r_r4*m_m8*m_m9^2 + k02_r_r4*k04_r_r4*k06_r_r4*k12_r_r4*k14_r_r4*k18_r_r4*m_m9^2*m_m13 + k02_r_r4*k04_r_r4*k08_r_r4*k12_r_r4*k14_r_r4*k16_r_r4*m_m9*m_m13^2 + k03_r_r4*k05_r_r4*k09_r_r4*k11_r_r4*k14_r_r4*k15_r_r4*m_m8^2*m_m13 + k04_r_r4*k05_r_r4*k08_r_r4*k10_r_r4*k14_r_r4*k16_r_r4*m_m8*m_m13^2 + k04_r_r4*k05_r_r4*k09_r_r4*k12_r_r4*k13_r_r4*k18_r_r4*m_m8*m_m9^2 + k02_r_r4*k04_r_r4*k09_r_r4*k12_r_r4*k14_r_r4*k16_r_r4*m_m9*m_m13^2 + k04_r_r4*k05_r_r4*k08_r_r4*k11_r_r4*k14_r_r4*k16_r_r4*m_m8*m_m13^2 + k02_r_r4*k04_r_r4*k08_r_r4*k12_r_r4*k14_r_r4*k18_r_r4*m_m9^2*m_m13 + k02_r_r4*k04_r_r4*k10_r_r4*k12_r_r4*k14_r_r4*k16_r_r4*m_m9*m_m13^2 + k04_r_r4*k05_r_r4*k09_r_r4*k11_r_r4*k14_r_r4*k16_r_r4*m_m8*m_m13^2 + k02_r_r4*k04_r_r4*k09_r_r4*k12_r_r4*k14_r_r4*k18_r_r4*m_m9^2*m_m13 + k02_r_r4*k04_r_r4*k10_r_r4*k12_r_r4*k14_r_r4*k18_r_r4*m_m9^2*m_m13 + k02_r_r4*k08_r_r4*k10_r_r4*k12_r_r4*k14_r_r4*k16_r_r4*m_m9*m_m13^2 + k04_r_r4*k06_r_r4*k10_r_r4*k12_r_r4*k14_r_r4*k16_r_r4*m_m9*m_m13^2 + k02_r_r4*k08_r_r4*k10_r_r4*k12_r_r4*k14_r_r4*k18_r_r4*m_m9^2*m_m13 + k04_r_r4*k06_r_r4*k10_r_r4*k12_r_r4*k14_r_r4*k18_r_r4*m_m9^2*m_m13 + k01_r_r4*k04_r_r4*k05_r_r4*k09_r_r4*k11_r_r4*k17_r_r4*m_m2*m_m8 + k01_r_r4*k04_r_r4*k05_r_r4*k09_r_r4*k13_r_r4*k15_r_r4*m_m2*m_m8 + k02_r_r4*k03_r_r4*k07_r_r4*k09_r_r4*k11_r_r4*k17_r_r4*m_m2*m_m8 + k02_r_r4*k03_r_r4*k07_r_r4*k09_r_r4*k13_r_r4*k15_r_r4*m_m2*m_m8 + k01_r_r4*k04_r_r4*k05_r_r4*k09_r_r4*k15_r_r4*k17_r_r4*m_m2*m_m8 + k01_r_r4*k04_r_r4*k06_r_r4*k10_r_r4*k12_r_r4*k17_r_r4*m_m2*m_m9 + k01_r_r4*k04_r_r4*k05_r_r4*k10_r_r4*k15_r_r4*k17_r_r4*m_m2*m_m8 + k01_r_r4*k04_r_r4*k05_r_r4*k11_r_r4*k15_r_r4*k17_r_r4*m_m2*m_m8 + k01_r_r4*k04_r_r4*k08_r_r4*k10_r_r4*k12_r_r4*k17_r_r4*m_m2*m_m9 + k02_r_r4*k03_r_r4*k07_r_r4*k09_r_r4*k15_r_r4*k17_r_r4*m_m2*m_m8 + k01_r_r4*k04_r_r4*k06_r_r4*k12_r_r4*k13_r_r4*k17_r_r4*m_m2*m_m9 + k02_r_r4*k03_r_r4*k07_r_r4*k10_r_r4*k15_r_r4*k17_r_r4*m_m2*m_m8 + k01_r_r4*k04_r_r4*k05_r_r4*k13_r_r4*k15_r_r4*k17_r_r4*m_m2*m_m8 + k01_r_r4*k04_r_r4*k06_r_r4*k10_r_r4*k14_r_r4*k15_r_r4*m_m2*m_m13 + k02_r_r4*k03_r_r4*k07_r_r4*k11_r_r4*k15_r_r4*k17_r_r4*m_m2*m_m8 + k02_r_r4*k06_r_r4*k07_r_r4*k10_r_r4*k12_r_r4*k17_r_r4*m_m2*m_m9 + k01_r_r4*k04_r_r4*k06_r_r4*k11_r_r4*k14_r_r4*k15_r_r4*m_m2*m_m13 + k01_r_r4*k04_r_r4*k08_r_r4*k12_r_r4*k13_r_r4*k17_r_r4*m_m2*m_m9 + k01_r_r4*k05_r_r4*k08_r_r4*k10_r_r4*k15_r_r4*k17_r_r4*m_m2*m_m8 + k01_r_r4*k04_r_r4*k08_r_r4*k10_r_r4*k14_r_r4*k15_r_r4*m_m2*m_m13 + k01_r_r4*k04_r_r4*k09_r_r4*k12_r_r4*k13_r_r4*k17_r_r4*m_m2*m_m9 + k01_r_r4*k05_r_r4*k08_r_r4*k11_r_r4*k15_r_r4*k17_r_r4*m_m2*m_m8 + k02_r_r4*k03_r_r4*k06_r_r4*k10_r_r4*k12_r_r4*k17_r_r4*m_m8*m_m9 + k02_r_r4*k03_r_r4*k07_r_r4*k13_r_r4*k15_r_r4*k17_r_r4*m_m2*m_m8 + k01_r_r4*k04_r_r4*k08_r_r4*k11_r_r4*k14_r_r4*k15_r_r4*m_m2*m_m13 + k02_r_r4*k06_r_r4*k07_r_r4*k12_r_r4*k13_r_r4*k17_r_r4*m_m2*m_m9 + k03_r_r4*k06_r_r4*k07_r_r4*k10_r_r4*k15_r_r4*k17_r_r4*m_m2*m_m8 + k01_r_r4*k04_r_r4*k09_r_r4*k11_r_r4*k14_r_r4*k15_r_r4*m_m2*m_m13 + k01_r_r4*k05_r_r4*k08_r_r4*k13_r_r4*k15_r_r4*k17_r_r4*m_m2*m_m8 + k02_r_r4*k03_r_r4*k08_r_r4*k10_r_r4*k12_r_r4*k17_r_r4*m_m8*m_m9 + k02_r_r4*k06_r_r4*k07_r_r4*k10_r_r4*k14_r_r4*k15_r_r4*m_m2*m_m13 + k02_r_r4*k06_r_r4*k07_r_r4*k10_r_r4*k15_r_r4*k18_r_r4*m_m2*m_m9 + k03_r_r4*k06_r_r4*k07_r_r4*k11_r_r4*k15_r_r4*k17_r_r4*m_m2*m_m8 + k02_r_r4*k03_r_r4*k06_r_r4*k12_r_r4*k13_r_r4*k17_r_r4*m_m8*m_m9 + k02_r_r4*k04_r_r4*k06_r_r4*k10_r_r4*k12_r_r4*k14_r_r4*m_m9*m_m13 + k02_r_r4*k06_r_r4*k07_r_r4*k11_r_r4*k14_r_r4*k15_r_r4*m_m2*m_m13 + k02_r_r4*k06_r_r4*k07_r_r4*k11_r_r4*k15_r_r4*k18_r_r4*m_m2*m_m9 + k02_r_r4*k03_r_r4*k06_r_r4*k10_r_r4*k14_r_r4*k15_r_r4*m_m8*m_m13 + k02_r_r4*k07_r_r4*k09_r_r4*k12_r_r4*k13_r_r4*k17_r_r4*m_m2*m_m9 + k03_r_r4*k06_r_r4*k07_r_r4*k13_r_r4*k15_r_r4*k17_r_r4*m_m2*m_m8 + k02_r_r4*k03_r_r4*k06_r_r4*k11_r_r4*k14_r_r4*k15_r_r4*m_m8*m_m13 + k02_r_r4*k03_r_r4*k08_r_r4*k12_r_r4*k13_r_r4*k17_r_r4*m_m8*m_m9 + k02_r_r4*k04_r_r4*k08_r_r4*k10_r_r4*k12_r_r4*k14_r_r4*m_m9*m_m13 + k02_r_r4*k06_r_r4*k07_r_r4*k13_r_r4*k15_r_r4*k18_r_r4*m_m2*m_m9 + k02_r_r4*k03_r_r4*k08_r_r4*k10_r_r4*k14_r_r4*k15_r_r4*m_m8*m_m13 + k02_r_r4*k03_r_r4*k09_r_r4*k12_r_r4*k13_r_r4*k17_r_r4*m_m8*m_m9 + k02_r_r4*k06_r_r4*k07_r_r4*k10_r_r4*k16_r_r4*k17_r_r4*m_m2*m_m13 + k02_r_r4*k07_r_r4*k09_r_r4*k11_r_r4*k14_r_r4*k15_r_r4*m_m2*m_m13 + k02_r_r4*k07_r_r4*k09_r_r4*k11_r_r4*k15_r_r4*k18_r_r4*m_m2*m_m9 + k04_r_r4*k05_r_r4*k08_r_r4*k10_r_r4*k12_r_r4*k17_r_r4*m_m8*m_m9 + k02_r_r4*k03_r_r4*k08_r_r4*k11_r_r4*k14_r_r4*k15_r_r4*m_m8*m_m13 + k02_r_r4*k06_r_r4*k07_r_r4*k11_r_r4*k16_r_r4*k17_r_r4*m_m2*m_m13 + k05_r_r4*k07_r_r4*k09_r_r4*k11_r_r4*k15_r_r4*k17_r_r4*m_m2*m_m8 + k02_r_r4*k03_r_r4*k09_r_r4*k11_r_r4*k14_r_r4*k15_r_r4*m_m8*m_m13 + k02_r_r4*k04_r_r4*k06_r_r4*k12_r_r4*k13_r_r4*k16_r_r4*m_m9*m_m13 + k02_r_r4*k07_r_r4*k09_r_r4*k13_r_r4*k15_r_r4*k18_r_r4*m_m2*m_m9 + k02_r_r4*k06_r_r4*k07_r_r4*k13_r_r4*k16_r_r4*k17_r_r4*m_m2*m_m13 + k04_r_r4*k05_r_r4*k08_r_r4*k12_r_r4*k13_r_r4*k17_r_r4*m_m8*m_m9 + k05_r_r4*k07_r_r4*k09_r_r4*k13_r_r4*k15_r_r4*k17_r_r4*m_m2*m_m8 + k02_r_r4*k04_r_r4*k06_r_r4*k11_r_r4*k14_r_r4*k18_r_r4*m_m9*m_m13 + k02_r_r4*k04_r_r4*k08_r_r4*k12_r_r4*k13_r_r4*k16_r_r4*m_m9*m_m13 + k02_r_r4*k07_r_r4*k09_r_r4*k11_r_r4*k16_r_r4*k17_r_r4*m_m2*m_m13 + k04_r_r4*k05_r_r4*k08_r_r4*k10_r_r4*k14_r_r4*k15_r_r4*m_m8*m_m13 + k04_r_r4*k05_r_r4*k08_r_r4*k10_r_r4*k15_r_r4*k18_r_r4*m_m8*m_m9 + k04_r_r4*k05_r_r4*k09_r_r4*k12_r_r4*k13_r_r4*k17_r_r4*m_m8*m_m9 + k02_r_r4*k04_r_r4*k09_r_r4*k12_r_r4*k13_r_r4*k16_r_r4*m_m9*m_m13 + k04_r_r4*k05_r_r4*k08_r_r4*k11_r_r4*k14_r_r4*k15_r_r4*m_m8*m_m13 + k04_r_r4*k05_r_r4*k08_r_r4*k11_r_r4*k15_r_r4*k18_r_r4*m_m8*m_m9 + k02_r_r4*k04_r_r4*k06_r_r4*k12_r_r4*k16_r_r4*k17_r_r4*m_m9*m_m13 + k02_r_r4*k04_r_r4*k08_r_r4*k11_r_r4*k14_r_r4*k18_r_r4*m_m9*m_m13 + k02_r_r4*k07_r_r4*k09_r_r4*k13_r_r4*k16_r_r4*k17_r_r4*m_m2*m_m13 + k04_r_r4*k05_r_r4*k09_r_r4*k11_r_r4*k14_r_r4*k15_r_r4*m_m8*m_m13 + k04_r_r4*k05_r_r4*k09_r_r4*k11_r_r4*k15_r_r4*k18_r_r4*m_m8*m_m9 + k02_r_r4*k04_r_r4*k09_r_r4*k11_r_r4*k14_r_r4*k18_r_r4*m_m9*m_m13 + k04_r_r4*k05_r_r4*k08_r_r4*k13_r_r4*k15_r_r4*k18_r_r4*m_m8*m_m9 + k02_r_r4*k04_r_r4*k06_r_r4*k14_r_r4*k15_r_r4*k18_r_r4*m_m9*m_m13 + k02_r_r4*k04_r_r4*k08_r_r4*k12_r_r4*k16_r_r4*k17_r_r4*m_m9*m_m13 + k04_r_r4*k05_r_r4*k08_r_r4*k10_r_r4*k16_r_r4*k17_r_r4*m_m8*m_m13 + k04_r_r4*k05_r_r4*k09_r_r4*k13_r_r4*k15_r_r4*k18_r_r4*m_m8*m_m9 + k02_r_r4*k04_r_r4*k09_r_r4*k12_r_r4*k16_r_r4*k17_r_r4*m_m9*m_m13 + k04_r_r4*k05_r_r4*k08_r_r4*k11_r_r4*k16_r_r4*k17_r_r4*m_m8*m_m13 + k02_r_r4*k04_r_r4*k08_r_r4*k14_r_r4*k15_r_r4*k18_r_r4*m_m9*m_m13 + k02_r_r4*k04_r_r4*k10_r_r4*k12_r_r4*k16_r_r4*k17_r_r4*m_m9*m_m13 + k04_r_r4*k05_r_r4*k09_r_r4*k11_r_r4*k16_r_r4*k17_r_r4*m_m8*m_m13 + k02_r_r4*k04_r_r4*k09_r_r4*k14_r_r4*k15_r_r4*k18_r_r4*m_m9*m_m13 + k04_r_r4*k05_r_r4*k08_r_r4*k13_r_r4*k16_r_r4*k17_r_r4*m_m8*m_m13 + k02_r_r4*k04_r_r4*k10_r_r4*k14_r_r4*k15_r_r4*k18_r_r4*m_m9*m_m13 + k04_r_r4*k05_r_r4*k09_r_r4*k13_r_r4*k16_r_r4*k17_r_r4*m_m8*m_m13 + k02_r_r4*k08_r_r4*k10_r_r4*k12_r_r4*k16_r_r4*k17_r_r4*m_m9*m_m13 + k04_r_r4*k06_r_r4*k10_r_r4*k12_r_r4*k16_r_r4*k17_r_r4*m_m9*m_m13 + k02_r_r4*k08_r_r4*k10_r_r4*k14_r_r4*k15_r_r4*k18_r_r4*m_m9*m_m13 + k04_r_r4*k06_r_r4*k10_r_r4*k14_r_r4*k15_r_r4*k18_r_r4*m_m9*m_m13 + k01_r_r4*k04_r_r4*k05_r_r4*k09_r_r4*k12_r_r4*k13_r_r4*m_m2*m_m8*m_m9 + k02_r_r4*k03_r_r4*k07_r_r4*k09_r_r4*k12_r_r4*k13_r_r4*m_m2*m_m8*m_m9 + k01_r_r4*k04_r_r4*k05_r_r4*k09_r_r4*k11_r_r4*k14_r_r4*m_m2*m_m8*m_m13 + k01_r_r4*k04_r_r4*k05_r_r4*k09_r_r4*k12_r_r4*k17_r_r4*m_m2*m_m8*m_m9 + k01_r_r4*k04_r_r4*k05_r_r4*k10_r_r4*k12_r_r4*k17_r_r4*m_m2*m_m8*m_m9 + k02_r_r4*k03_r_r4*k07_r_r4*k09_r_r4*k11_r_r4*k14_r_r4*m_m2*m_m8*m_m13 + k02_r_r4*k03_r_r4*k07_r_r4*k09_r_r4*k12_r_r4*k17_r_r4*m_m2*m_m8*m_m9 + k02_r_r4*k03_r_r4*k07_r_r4*k10_r_r4*k12_r_r4*k17_r_r4*m_m2*m_m8*m_m9 + k01_r_r4*k04_r_r4*k05_r_r4*k09_r_r4*k14_r_r4*k15_r_r4*m_m2*m_m8*m_m13 + k01_r_r4*k04_r_r4*k05_r_r4*k12_r_r4*k13_r_r4*k17_r_r4*m_m2*m_m8*m_m9 + k01_r_r4*k04_r_r4*k06_r_r4*k10_r_r4*k12_r_r4*k14_r_r4*m_m2*m_m9*m_m13 + k01_r_r4*k04_r_r4*k05_r_r4*k10_r_r4*k14_r_r4*k15_r_r4*m_m2*m_m8*m_m13 + k01_r_r4*k05_r_r4*k08_r_r4*k10_r_r4*k12_r_r4*k17_r_r4*m_m2*m_m8*m_m9 + k01_r_r4*k04_r_r4*k05_r_r4*k11_r_r4*k14_r_r4*k15_r_r4*m_m2*m_m8*m_m13 + k01_r_r4*k04_r_r4*k08_r_r4*k10_r_r4*k12_r_r4*k14_r_r4*m_m2*m_m9*m_m13 + k02_r_r4*k03_r_r4*k07_r_r4*k09_r_r4*k14_r_r4*k15_r_r4*m_m2*m_m8*m_m13 + k02_r_r4*k03_r_r4*k07_r_r4*k12_r_r4*k13_r_r4*k17_r_r4*m_m2*m_m8*m_m9 + k02_r_r4*k03_r_r4*k07_r_r4*k10_r_r4*k14_r_r4*k15_r_r4*m_m2*m_m8*m_m13 + k03_r_r4*k06_r_r4*k07_r_r4*k10_r_r4*k12_r_r4*k17_r_r4*m_m2*m_m8*m_m9 + k01_r_r4*k05_r_r4*k08_r_r4*k12_r_r4*k13_r_r4*k17_r_r4*m_m2*m_m8*m_m9 + k02_r_r4*k03_r_r4*k07_r_r4*k11_r_r4*k14_r_r4*k15_r_r4*m_m2*m_m8*m_m13 + k02_r_r4*k06_r_r4*k07_r_r4*k10_r_r4*k12_r_r4*k14_r_r4*m_m2*m_m9*m_m13 + k01_r_r4*k05_r_r4*k08_r_r4*k10_r_r4*k14_r_r4*k15_r_r4*m_m2*m_m8*m_m13 + k01_r_r4*k05_r_r4*k08_r_r4*k11_r_r4*k14_r_r4*k15_r_r4*m_m2*m_m8*m_m13 + k02_r_r4*k03_r_r4*k06_r_r4*k10_r_r4*k12_r_r4*k14_r_r4*m_m8*m_m9*m_m13 + k03_r_r4*k06_r_r4*k07_r_r4*k12_r_r4*k13_r_r4*k17_r_r4*m_m2*m_m8*m_m9 + k03_r_r4*k06_r_r4*k07_r_r4*k10_r_r4*k14_r_r4*k15_r_r4*m_m2*m_m8*m_m13 + k02_r_r4*k03_r_r4*k08_r_r4*k10_r_r4*k12_r_r4*k14_r_r4*m_m8*m_m9*m_m13 + k03_r_r4*k06_r_r4*k07_r_r4*k11_r_r4*k14_r_r4*k15_r_r4*m_m2*m_m8*m_m13 + k02_r_r4*k06_r_r4*k07_r_r4*k12_r_r4*k13_r_r4*k16_r_r4*m_m2*m_m9*m_m13 + k02_r_r4*k06_r_r4*k07_r_r4*k11_r_r4*k14_r_r4*k18_r_r4*m_m2*m_m9*m_m13 + k05_r_r4*k07_r_r4*k09_r_r4*k12_r_r4*k13_r_r4*k17_r_r4*m_m2*m_m8*m_m9 + k02_r_r4*k07_r_r4*k09_r_r4*k12_r_r4*k13_r_r4*k16_r_r4*m_m2*m_m9*m_m13 + k04_r_r4*k05_r_r4*k08_r_r4*k10_r_r4*k12_r_r4*k14_r_r4*m_m8*m_m9*m_m13 + k02_r_r4*k06_r_r4*k07_r_r4*k12_r_r4*k16_r_r4*k17_r_r4*m_m2*m_m9*m_m13 + k05_r_r4*k07_r_r4*k09_r_r4*k11_r_r4*k14_r_r4*k15_r_r4*m_m2*m_m8*m_m13 + k05_r_r4*k07_r_r4*k09_r_r4*k11_r_r4*k15_r_r4*k18_r_r4*m_m2*m_m8*m_m9 + k02_r_r4*k07_r_r4*k09_r_r4*k11_r_r4*k14_r_r4*k18_r_r4*m_m2*m_m9*m_m13 + k02_r_r4*k06_r_r4*k07_r_r4*k14_r_r4*k15_r_r4*k18_r_r4*m_m2*m_m9*m_m13 + k05_r_r4*k07_r_r4*k09_r_r4*k13_r_r4*k15_r_r4*k18_r_r4*m_m2*m_m8*m_m9 + k02_r_r4*k07_r_r4*k09_r_r4*k12_r_r4*k16_r_r4*k17_r_r4*m_m2*m_m9*m_m13 + k02_r_r4*k07_r_r4*k10_r_r4*k12_r_r4*k16_r_r4*k17_r_r4*m_m2*m_m9*m_m13 + k04_r_r4*k05_r_r4*k08_r_r4*k12_r_r4*k13_r_r4*k16_r_r4*m_m8*m_m9*m_m13 + k05_r_r4*k07_r_r4*k09_r_r4*k11_r_r4*k16_r_r4*k17_r_r4*m_m2*m_m8*m_m13 + k02_r_r4*k07_r_r4*k09_r_r4*k14_r_r4*k15_r_r4*k18_r_r4*m_m2*m_m9*m_m13 + k04_r_r4*k05_r_r4*k09_r_r4*k12_r_r4*k13_r_r4*k16_r_r4*m_m8*m_m9*m_m13 + k02_r_r4*k07_r_r4*k10_r_r4*k14_r_r4*k15_r_r4*k18_r_r4*m_m2*m_m9*m_m13 + k04_r_r4*k05_r_r4*k08_r_r4*k11_r_r4*k14_r_r4*k18_r_r4*m_m8*m_m9*m_m13 + k05_r_r4*k07_r_r4*k09_r_r4*k13_r_r4*k16_r_r4*k17_r_r4*m_m2*m_m8*m_m13 + k04_r_r4*k05_r_r4*k09_r_r4*k11_r_r4*k14_r_r4*k18_r_r4*m_m8*m_m9*m_m13 + k04_r_r4*k05_r_r4*k08_r_r4*k12_r_r4*k16_r_r4*k17_r_r4*m_m8*m_m9*m_m13 + k06_r_r4*k07_r_r4*k10_r_r4*k12_r_r4*k16_r_r4*k17_r_r4*m_m2*m_m9*m_m13 + k04_r_r4*k05_r_r4*k09_r_r4*k12_r_r4*k16_r_r4*k17_r_r4*m_m8*m_m9*m_m13 + k04_r_r4*k05_r_r4*k08_r_r4*k14_r_r4*k15_r_r4*k18_r_r4*m_m8*m_m9*m_m13 + k04_r_r4*k05_r_r4*k10_r_r4*k12_r_r4*k16_r_r4*k17_r_r4*m_m8*m_m9*m_m13 + k06_r_r4*k07_r_r4*k10_r_r4*k14_r_r4*k15_r_r4*k18_r_r4*m_m2*m_m9*m_m13 + k04_r_r4*k05_r_r4*k09_r_r4*k14_r_r4*k15_r_r4*k18_r_r4*m_m8*m_m9*m_m13 + k04_r_r4*k05_r_r4*k10_r_r4*k14_r_r4*k15_r_r4*k18_r_r4*m_m8*m_m9*m_m13 + k05_r_r4*k08_r_r4*k10_r_r4*k12_r_r4*k16_r_r4*k17_r_r4*m_m8*m_m9*m_m13 + k05_r_r4*k08_r_r4*k10_r_r4*k14_r_r4*k15_r_r4*k18_r_r4*m_m8*m_m9*m_m13 + k01_r_r4*k05_r_r4*k07_r_r4*k09_r_r4*k12_r_r4*k13_r_r4*m_m2^2*m_m8*m_m9 + k03_r_r4*k05_r_r4*k07_r_r4*k09_r_r4*k12_r_r4*k13_r_r4*m_m2*m_m8^2*m_m9 + k01_r_r4*k05_r_r4*k07_r_r4*k09_r_r4*k11_r_r4*k14_r_r4*m_m2^2*m_m8*m_m13 + k01_r_r4*k05_r_r4*k07_r_r4*k09_r_r4*k12_r_r4*k17_r_r4*m_m2^2*m_m8*m_m9 + k01_r_r4*k05_r_r4*k07_r_r4*k10_r_r4*k12_r_r4*k17_r_r4*m_m2^2*m_m8*m_m9 + k03_r_r4*k05_r_r4*k07_r_r4*k09_r_r4*k11_r_r4*k14_r_r4*m_m2*m_m8^2*m_m13 + k03_r_r4*k05_r_r4*k07_r_r4*k09_r_r4*k12_r_r4*k17_r_r4*m_m2*m_m8^2*m_m9 + k03_r_r4*k05_r_r4*k07_r_r4*k10_r_r4*k12_r_r4*k17_r_r4*m_m2*m_m8^2*m_m9 + k01_r_r4*k05_r_r4*k07_r_r4*k09_r_r4*k14_r_r4*k15_r_r4*m_m2^2*m_m8*m_m13 + k01_r_r4*k05_r_r4*k07_r_r4*k12_r_r4*k13_r_r4*k17_r_r4*m_m2^2*m_m8*m_m9 + k01_r_r4*k06_r_r4*k07_r_r4*k10_r_r4*k12_r_r4*k14_r_r4*m_m2^2*m_m9*m_m13 + k01_r_r4*k05_r_r4*k07_r_r4*k10_r_r4*k14_r_r4*k15_r_r4*m_m2^2*m_m8*m_m13 + k01_r_r4*k05_r_r4*k07_r_r4*k11_r_r4*k14_r_r4*k15_r_r4*m_m2^2*m_m8*m_m13 + k03_r_r4*k05_r_r4*k07_r_r4*k09_r_r4*k14_r_r4*k15_r_r4*m_m2*m_m8^2*m_m13 + k03_r_r4*k05_r_r4*k07_r_r4*k12_r_r4*k13_r_r4*k17_r_r4*m_m2*m_m8^2*m_m9 + k03_r_r4*k05_r_r4*k07_r_r4*k10_r_r4*k14_r_r4*k15_r_r4*m_m2*m_m8^2*m_m13 + k03_r_r4*k05_r_r4*k07_r_r4*k11_r_r4*k14_r_r4*k15_r_r4*m_m2*m_m8^2*m_m13 + k02_r_r4*k06_r_r4*k07_r_r4*k12_r_r4*k14_r_r4*k16_r_r4*m_m2*m_m9*m_m13^2 + k03_r_r4*k05_r_r4*k08_r_r4*k10_r_r4*k12_r_r4*k14_r_r4*m_m8^2*m_m9*m_m13 + k02_r_r4*k06_r_r4*k07_r_r4*k12_r_r4*k14_r_r4*k18_r_r4*m_m2*m_m9^2*m_m13 + k05_r_r4*k07_r_r4*k09_r_r4*k12_r_r4*k13_r_r4*k18_r_r4*m_m2*m_m8*m_m9^2 + k02_r_r4*k07_r_r4*k09_r_r4*k12_r_r4*k14_r_r4*k16_r_r4*m_m2*m_m9*m_m13^2 + k02_r_r4*k07_r_r4*k10_r_r4*k12_r_r4*k14_r_r4*k16_r_r4*m_m2*m_m9*m_m13^2 + k05_r_r4*k07_r_r4*k09_r_r4*k11_r_r4*k14_r_r4*k16_r_r4*m_m2*m_m8*m_m13^2 + k02_r_r4*k07_r_r4*k09_r_r4*k12_r_r4*k14_r_r4*k18_r_r4*m_m2*m_m9^2*m_m13 + k02_r_r4*k07_r_r4*k10_r_r4*k12_r_r4*k14_r_r4*k18_r_r4*m_m2*m_m9^2*m_m13 + k04_r_r4*k05_r_r4*k08_r_r4*k12_r_r4*k14_r_r4*k16_r_r4*m_m8*m_m9*m_m13^2 + k06_r_r4*k07_r_r4*k10_r_r4*k12_r_r4*k14_r_r4*k16_r_r4*m_m2*m_m9*m_m13^2 + k04_r_r4*k05_r_r4*k09_r_r4*k12_r_r4*k14_r_r4*k16_r_r4*m_m8*m_m9*m_m13^2 + k04_r_r4*k05_r_r4*k08_r_r4*k12_r_r4*k14_r_r4*k18_r_r4*m_m8*m_m9^2*m_m13 + k04_r_r4*k05_r_r4*k10_r_r4*k12_r_r4*k14_r_r4*k16_r_r4*m_m8*m_m9*m_m13^2 + k06_r_r4*k07_r_r4*k10_r_r4*k12_r_r4*k14_r_r4*k18_r_r4*m_m2*m_m9^2*m_m13 + k04_r_r4*k05_r_r4*k09_r_r4*k12_r_r4*k14_r_r4*k18_r_r4*m_m8*m_m9^2*m_m13 + k04_r_r4*k05_r_r4*k10_r_r4*k12_r_r4*k14_r_r4*k18_r_r4*m_m8*m_m9^2*m_m13 + k05_r_r4*k08_r_r4*k10_r_r4*k12_r_r4*k14_r_r4*k16_r_r4*m_m8*m_m9*m_m13^2 + k05_r_r4*k08_r_r4*k10_r_r4*k12_r_r4*k14_r_r4*k18_r_r4*m_m8*m_m9^2*m_m13 + k01_r_r4*k04_r_r4*k05_r_r4*k09_r_r4*k12_r_r4*k14_r_r4*m_m2*m_m8*m_m9*m_m13 + k01_r_r4*k04_r_r4*k05_r_r4*k10_r_r4*k12_r_r4*k14_r_r4*m_m2*m_m8*m_m9*m_m13 + k02_r_r4*k03_r_r4*k07_r_r4*k09_r_r4*k12_r_r4*k14_r_r4*m_m2*m_m8*m_m9*m_m13 + k02_r_r4*k03_r_r4*k07_r_r4*k10_r_r4*k12_r_r4*k14_r_r4*m_m2*m_m8*m_m9*m_m13 + k01_r_r4*k05_r_r4*k08_r_r4*k10_r_r4*k12_r_r4*k14_r_r4*m_m2*m_m8*m_m9*m_m13 + k03_r_r4*k06_r_r4*k07_r_r4*k10_r_r4*k12_r_r4*k14_r_r4*m_m2*m_m8*m_m9*m_m13 + k05_r_r4*k07_r_r4*k09_r_r4*k12_r_r4*k13_r_r4*k16_r_r4*m_m2*m_m8*m_m9*m_m13 + k05_r_r4*k07_r_r4*k09_r_r4*k11_r_r4*k14_r_r4*k18_r_r4*m_m2*m_m8*m_m9*m_m13 + k05_r_r4*k07_r_r4*k09_r_r4*k12_r_r4*k16_r_r4*k17_r_r4*m_m2*m_m8*m_m9*m_m13 + k05_r_r4*k07_r_r4*k10_r_r4*k12_r_r4*k16_r_r4*k17_r_r4*m_m2*m_m8*m_m9*m_m13 + k05_r_r4*k07_r_r4*k09_r_r4*k14_r_r4*k15_r_r4*k18_r_r4*m_m2*m_m8*m_m9*m_m13 + k05_r_r4*k07_r_r4*k10_r_r4*k14_r_r4*k15_r_r4*k18_r_r4*m_m2*m_m8*m_m9*m_m13 + k01_r_r4*k05_r_r4*k07_r_r4*k09_r_r4*k12_r_r4*k14_r_r4*m_m2^2*m_m8*m_m9*m_m13 + k01_r_r4*k05_r_r4*k07_r_r4*k10_r_r4*k12_r_r4*k14_r_r4*m_m2^2*m_m8*m_m9*m_m13 + k03_r_r4*k05_r_r4*k07_r_r4*k09_r_r4*k12_r_r4*k14_r_r4*m_m2*m_m8^2*m_m9*m_m13 + k03_r_r4*k05_r_r4*k07_r_r4*k10_r_r4*k12_r_r4*k14_r_r4*m_m2*m_m8^2*m_m9*m_m13 + k05_r_r4*k07_r_r4*k09_r_r4*k12_r_r4*k14_r_r4*k16_r_r4*m_m2*m_m8*m_m9*m_m13^2 + k05_r_r4*k07_r_r4*k10_r_r4*k12_r_r4*k14_r_r4*k16_r_r4*m_m2*m_m8*m_m9*m_m13^2 + k05_r_r4*k07_r_r4*k09_r_r4*k12_r_r4*k14_r_r4*k18_r_r4*m_m2*m_m8*m_m9^2*m_m13 + k05_r_r4*k07_r_r4*k10_r_r4*k12_r_r4*k14_r_r4*k18_r_r4*m_m2*m_m8*m_m9^2*m_m13);
  r_r5: m_m6 -> m_m10; (k01_r_r5*k03_r_r5*k05_r_r5*m_m6 - k02_r_r5*k04_r_r5*k06_r_r5*m_m10)/(k02_r_r5*k04_r_r5 + k02_r_r5*k05_r_r5 + k03_r_r5*k05_r_r5 + k01_r_r5*k03_r_r5*m_m6 + k01_r_r5*k04_r_r5*m_m6 + k01_r_r5*k05_r_r5*m_m6 + k02_r_r5*k06_r_r5*m_m10 + k03_r_r5*k06_r_r5*m_m10 + k04_r_r5*k06_r_r5*m_m10);
  r_r6: $m_m1 + m_m10 -> m_m11 + $m_m12; k06_r_r6*(k01_r_r6*k03_r_r6*k07_r_r6*k09_r_r6*k11_r_r6*m_m1*m_m10 - k02_r_r6*k04_r_r6*k08_r_r6*k10_r_r6*k12_r_r6*m_m11*m_m12)/(k02_r_r6*k04_r_r6*k06_r_r6*k08_r_r6*k11_r_r6 + k02_r_r6*k04_r_r6*k06_r_r6*k09_r_r6*k11_r_r6 + k02_r_r6*k06_r_r6*k07_r_r6*k09_r_r6*k11_r_r6 + k01_r_r6*k04_r_r6*k06_r_r6*k08_r_r6*k11_r_r6*m_m1 + k01_r_r6*k04_r_r6*k06_r_r6*k09_r_r6*k11_r_r6*m_m1 + k01_r_r6*k06_r_r6*k07_r_r6*k09_r_r6*k11_r_r6*m_m1 + k02_r_r6*k04_r_r6*k06_r_r6*k08_r_r6*k10_r_r6*m_m11 + k02_r_r6*k04_r_r6*k06_r_r6*k08_r_r6*k12_r_r6*m_m12 + k02_r_r6*k04_r_r6*k06_r_r6*k09_r_r6*k12_r_r6*m_m12 + k03_r_r6*k06_r_r6*k07_r_r6*k09_r_r6*k11_r_r6*m_m10 + k02_r_r6*k06_r_r6*k07_r_r6*k09_r_r6*k12_r_r6*m_m12 + k01_r_r6*k03_r_r6*k06_r_r6*k07_r_r6*k09_r_r6*m_m1*m_m10 + k01_r_r6*k03_r_r6*k06_r_r6*k07_r_r6*k11_r_r6*m_m1*m_m10 + k01_r_r6*k03_r_r6*k06_r_r6*k08_r_r6*k11_r_r6*m_m1*m_m10 + k01_r_r6*k03_r_r6*k06_r_r6*k09_r_r6*k11_r_r6*m_m1*m_m10 + k01_r_r6*k04_r_r6*k06_r_r6*k08_r_r6*k10_r_r6*m_m1*m_m11 + k02_r_r6*k04_r_r6*k06_r_r6*k10_r_r6*k12_r_r6*m_m11*m_m12 + k03_r_r6*k06_r_r6*k07_r_r6*k09_r_r6*k12_r_r6*m_m10*m_m12 + k02_r_r6*k06_r_r6*k07_r_r6*k10_r_r6*k12_r_r6*m_m11*m_m12 + k02_r_r6*k06_r_r6*k08_r_r6*k10_r_r6*k12_r_r6*m_m11*m_m12 + k04_r_r6*k06_r_r6*k08_r_r6*k10_r_r6*k12_r_r6*m_m11*m_m12 + k01_r_r6*k03_r_r6*k05_r_r6*k08_r_r6*k11_r_r6*m_m1*m_m9*m_m10 + k01_r_r6*k03_r_r6*k05_r_r6*k09_r_r6*k11_r_r6*m_m1*m_m9*m_m10 + k01_r_r6*k03_r_r6*k06_r_r6*k07_r_r6*k10_r_r6*m_m1*m_m10*m_m11 + k01_r_r6*k03_r_r6*k06_r_r6*k08_r_r6*k10_r_r6*m_m1*m_m10*m_m11 + k02_r_r6*k05_r_r6*k08_r_r6*k10_r_r6*k12_r_r6*m_m9*m_m11*m_m12 + k03_r_r6*k06_r_r6*k07_r_r6*k10_r_r6*k12_r_r6*m_m10*m_m11*m_m12 + k03_r_r6*k06_r_r6*k08_r_r6*k10_r_r6*k12_r_r6*m_m10*m_m11*m_m12 + k01_r_r6*k03_r_r6*k05_r_r6*k08_r_r6*k10_r_r6*m_m1*m_m9*m_m10*m_m11 + k03_r_r6*k05_r_r6*k08_r_r6*k10_r_r6*k12_r_r6*m_m9*m_m10*m_m11*m_m12);  // modifiers: m_m9
  r_r7: $m_m4 -> m_m6; k01_r_r7*m_m4 - k02_r_r7*m_m6;
  r_r8: m_m6 -> $m_m16; k01_r_r8*m_m6 - k02_r_r8*m_m16;
  r_r9: m_m7 -> $m_m20; k01_r_r9*m_m7 - k02_r_r9*m_m20;
  r_r10: m_m5 -> $m_m15; k01_r_r10*m_m5 - k02_r_r10*m_m15;
  r_r11: m_m8 -> $m_m17; k01_r_r11*m_m8 - k02_r_r11*m_m17;
  r_r12: m_m9 -> $m_m19; k01_r_r12*m_m9 - k02_r_r12*m_m19;
  r_r13: m_m11 -> $m_m18; k01_r_r13*m_m11 - k02_r_r13*m_m18;
end
